// SBML level 3 version 1

model main()
  // model units - substance: substance, time: second, volume: volume, area: area, length: metre, extent: substance

  // Compartments:
  compartment c = 1 volume; c is "Cytoplasm";
  compartment e; e has volume; e is "Extracellular";

  // Species:
  // FORMULA: C21H26N7O14P2
  // CHARGE: -1
  species $M_cpd00003_c in c = 1; M_cpd00003_c is "NAD";
  // FORMULA: C21H27N7O14P2
  // CHARGE: -2
  species $M_cpd00004_c in c = 1; M_cpd00004_c is "NADH";
  // FORMULA: H
  // CHARGE: 1
  species $M_cpd00067_c in c = 1; M_cpd00067_c is "H+";
  // FORMULA: H2O
  // CHARGE: 0
  species $M_cpd00001_c in c = 1; M_cpd00001_c is "H2O";
  // FORMULA: C21H26N7O17P3
  // CHARGE: -2
  species $M_cpd00006_c in c = 1; M_cpd00006_c is "NADP";
  // FORMULA: C21H27N7O17P3
  // CHARGE: -3
  species $M_cpd00005_c in c = 1; M_cpd00005_c is "NADPH";
  // FORMULA: C21H33N7O16P3S
  // CHARGE: -3
  species $M_cpd00010_c in c = 1; M_cpd00010_c is "CoA";
  // FORMULA: CO2
  // CHARGE: 0
  species $M_cpd00011_c in c = 1; M_cpd00011_c is "CO2";
  // FORMULA: C23H35N7O17P3S
  // CHARGE: -3
  species $M_cpd00022_c in c = 1; M_cpd00022_c is "Acetyl-CoA";
  // FORMULA: C4H6NO4
  // CHARGE: -1
  species $M_cpd00041_c in c = 1; M_cpd00041_c is "L-Aspartate";
  // FORMULA: HO4P
  // CHARGE: -2
  species $M_cpd00009_c in c = 1; M_cpd00009_c is "Phosphate";
  // FORMULA: C49H74O4
  // CHARGE: 0
  species $M_cpd15560_c in c = 1; M_cpd15560_c is "Ubiquinone-8";
  // FORMULA: C49H76O4
  // CHARGE: 0
  species $M_cpd15561_c in c = 1; M_cpd15561_c is "Ubiquinol-8";
  // FORMULA: C54H82O4
  // CHARGE: 0
  species $M_cpd01351_c in c = 1; M_cpd01351_c is "Ubiquinone-9";
  // FORMULA: C54H84O4
  // CHARGE: 0
  species $M_cJB00125_c in c = 1; M_cJB00125_c is "Ubiquinol-9";
  // FORMULA: C2H3O2
  // CHARGE: -1
  species $M_cpd00029_c in c = 1; M_cpd00029_c is "Acetate";
  // FORMULA: C5H10O8P
  // CHARGE: -1
  species $M_cpd00171_c in c = 1; M_cpd00171_c is "D-Ribulose5-phosphate";
  // FORMULA: O2
  // CHARGE: 0
  species $M_cpd00007_c in c = 1; M_cpd00007_c is "O2";
  // FORMULA: H2O2
  // CHARGE: 0
  species $M_cpd00025_c in c = 1; M_cpd00025_c is "H2O2";
  // FORMULA: C23H43N2O8PRS
  // CHARGE: -1
  species $M_cpd11468_c in c = 1; M_cpd11468_c is "Dodecanoyl-ACP";
  // FORMULA: C21H39N2O9PRS
  // CHARGE: -1
  species $M_cpd11482_c in c = 1; M_cpd11482_c is "(R)-3-Hydroxydecanoyl-[acyl-carrier protein]";
  // FORMULA: C23H43N2O9PRS
  // CHARGE: -1
  species $M_cpd11480_c in c = 1; M_cpd11480_c is "D-3-Hydroxydodecanoyl-[acp]";
  // FORMULA: C10H13N5O13P3
  // CHARGE: -3
  species $M_cpd00002_c in c = 1; M_cpd00002_c is "ATP";
  // FORMULA: C10H13N5O10P2
  // CHARGE: -2
  species $M_cpd00008_c in c = 1; M_cpd00008_c is "ADP";
  // FORMULA: C6H7NO2R2S2
  // CHARGE: 0
  species $M_cpd11420_c in c = 1; M_cpd11420_c is "trdox";
  // FORMULA: C6H9NO2R2S2
  // CHARGE: 0
  species $M_cpd11421_c in c = 1; M_cpd11421_c is "trdrd";
  // FORMULA: C17H25N3O17P2
  // CHARGE: -2
  species $M_cpd00175_c in c = 1; M_cpd00175_c is "UDP-N-acetyl-D-galactosamine";
  // FORMULA: C17H25N3O16P2
  // CHARGE: 0
  species $M_cpd17092_c in c = 1; M_cpd17092_c is "UDP-N-acetyl fucosamine";
  // FORMULA: C15H22N2O17P2
  // CHARGE: -2
  species $M_cpd00026_c in c = 1; M_cpd00026_c is "UDP-glucose";
  // FORMULA: C5H8NO4
  // CHARGE: -1
  species $M_cpd00023_c in c = 1; M_cpd00023_c is "L-Glutamate";
  // FORMULA: C5H10N2O3
  // CHARGE: 0
  species $M_cpd00053_c in c = 1; M_cpd00053_c is "L-Glutamine";
  // FORMULA: C19H19N7O6
  // CHARGE: -2
  species $M_cpd00330_c in c = 1; M_cpd00330_c is "Dihydrofolate";
  // FORMULA: C20H21N7O6
  // CHARGE: -2
  species $M_cpd00125_c in c = 1; M_cpd00125_c is "5-10-Methylenetetrahydrofolate";
  // FORMULA: C20H28N3O19P2
  // CHARGE: -3
  species $M_cpd00773_c in c = 1; M_cpd00773_c is "UDP-MurNAc";
  // FORMULA: C20H26N3O19P2
  // CHARGE: -3
  species $M_cpd02820_c in c = 1; M_cpd02820_c is "UDP-N-acetylglucosamine enolpyruvate";
  // FORMULA: H4N
  // CHARGE: 1
  species $M_cpd00013_c in c = 1; M_cpd00013_c is "NH3";
  // FORMULA: H2O7P2
  // CHARGE: -2
  species $M_cpd00012_c in c = 1; M_cpd00012_c is "PPi";
  // FORMULA: C16H24N2O15P2
  // CHARGE: -2
  species $M_cpd02113_c in c = 1; M_cpd02113_c is "dTDP-rhamnose";
  // FORMULA: C16H23N5O15P2
  // CHARGE: -2
  species $M_cpd01999_c in c = 1; M_cpd01999_c is "GDP-D-rhamnose";
  // FORMULA: C11H21N2O7PRS
  // CHARGE: -1
  species $M_cpd11493_c in c = 1; M_cpd11493_c is "ACP";
  // FORMULA: C13H23N2O8PRS
  // CHARGE: -1
  species $M_cpd11494_c in c = 1; M_cpd11494_c is "Acetyl-ACP";
  // FORMULA: C9H13N3O14P3
  // CHARGE: -3
  species $M_cpd00052_c in c = 1; M_cpd00052_c is "CTP";
  // FORMULA: C5H3N2O4
  // CHARGE: -1
  species $M_cpd00247_c in c = 1; M_cpd00247_c is "Orotate";
  // FORMULA: C12H23O2X
  // CHARGE: 0
  species $M_cpd17046_c in c = 1; M_cpd17046_c is "2-hydroxydodecanoyl-[acyl-carrier protein]";
  // FORMULA: C56H102N2O23P2
  // CHARGE: 0
  species $M_cpd17068_c in c = 1; M_cpd17068_c is "Pseudomonas aeruginosa Lipid A precursor";
  // FORMULA: C80H146N2O25P2
  // CHARGE: 0
  species $M_cpd17066_c in c = 1; M_cpd17066_c is "Pseudomonas aeruginosa Lipid A";
  // FORMULA: C4H5N3O
  // CHARGE: 0
  species $M_cpd00307_c in c = 1; M_cpd00307_c is "Cytosine";
  // FORMULA: C9H13N3O5
  // CHARGE: 0
  species $M_cpd00367_c in c = 1; M_cpd00367_c is "Cytidine";
  // FORMULA: C9H13N3O4
  // CHARGE: 0
  species $M_cpd00654_c in c = 1; M_cpd00654_c is "Deoxycytidine";
  // FORMULA: C10H14N2O5
  // CHARGE: 0
  species $M_cpd00184_c in c = 1; M_cpd00184_c is "Thymidine";
  // FORMULA: C9H12N2O6
  // CHARGE: 0
  species $M_cpd00249_c in c = 1; M_cpd00249_c is "Uridine";
  // FORMULA: C3H7NO2
  // CHARGE: 0
  species $M_cpd00035_c in c = 1; M_cpd00035_c is "L-Alanine";
  // FORMULA: C9H13N3O11P2
  // CHARGE: -2
  species $M_cpd00096_c in c = 1; M_cpd00096_c is "CDP";
  // FORMULA: C9H13N3O10P2
  // CHARGE: -2
  species $M_cpd00533_c in c = 1; M_cpd00533_c is "dCDP";
  // FORMULA: C9H12N2O12P2
  // CHARGE: -2
  species $M_cpd00014_c in c = 1; M_cpd00014_c is "UDP";
  // FORMULA: C9H12N2O11P2
  // CHARGE: -2
  species $M_cpd00978_c in c = 1; M_cpd00978_c is "dUDP";
  // FORMULA: C4H4N2O2
  // CHARGE: 0
  species $M_cpd00092_c in c = 1; M_cpd00092_c is "Uracil";
  // FORMULA: C51H74O2
  // CHARGE: 0
  species $M_cpd15499_c in c = 1; M_cpd15499_c is "Menaquinol_8";
  // FORMULA: C51H72O2
  // CHARGE: 0
  species $M_cpd15500_c in c = 1; M_cpd15500_c is "Menaquinone_8";
  // FORMULA: C3H3O6P
  // CHARGE: -2
  species $M_cpd00061_c in c = 1; M_cpd00061_c is "Phosphoenolpyruvate";
  // FORMULA: C9H13N3O8P
  // CHARGE: -1
  species $M_cpd00046_c in c = 1; M_cpd00046_c is "CMP";
  // FORMULA: C15H22N2O17P2
  // CHARGE: -2
  species $M_cpd00043_c in c = 1; M_cpd00043_c is "UDP-galactose";
  // FORMULA: C81H137O28N5P4
  // CHARGE: 0
  species $M_cpd17100_c in c = 1; M_cpd17100_c is "Man(2NAc3N)(3,-CH3C=NH)A-(beta1,4)-Man(2NAc3NAc)A-(beta1,3)-Fuc2NAc-PP-Undecaprenyl";
  // FORMULA: C156H274N4O95P5
  // CHARGE: 0
  species $M_cpd17065_c in c = 1; M_cpd17065_c is "Pseudomonas aeruginosa LPS core + KDO2-lipidA";
  // FORMULA: C55H90O7P2
  // CHARGE: -2
  species $M_cpd02229_c in c = 1; M_cpd02229_c is "Bactoprenyl diphosphate";
  // FORMULA: C182H322O116N9P7
  // CHARGE: 0
  species $M_cpd17057_c in c = 1; M_cpd17057_c is "Pseudomonas aeruginosa B-band lipopolysaccharide";
  // FORMULA: C17H27O17N4P2
  // CHARGE: 0
  species $M_cpd17094_c in c = 1; M_cpd17094_c is "UDP-N-acetyl-D-mannosamine (2NAc3N) acid";
  // FORMULA: C19H29O18N4P2
  // CHARGE: 0
  species $M_cpd17095_c in c = 1; M_cpd17095_c is "UDP-N-acetyl-D-manosamine (2NAc3NAc) acid";
  // FORMULA: CH3NO5P
  // CHARGE: -1
  species $M_cpd00146_c in c = 1; M_cpd00146_c is "Carbamoylphosphate";
  // FORMULA: C8H15NO9P
  // CHARGE: -1
  species $M_cpd00293_c in c = 1; M_cpd00293_c is "N-Acetyl-D-glucosamine 6-phosphate";
  // FORMULA: C5H10O14P3
  // CHARGE: -3
  species $M_cpd00103_c in c = 1; M_cpd00103_c is "PRPP";
  // FORMULA: C9H12N2O9P
  // CHARGE: -1
  species $M_cpd00091_c in c = 1; M_cpd00091_c is "UMP";
  // FORMULA: C5H10O8P
  // CHARGE: -1
  species $M_cpd00101_c in c = 1; M_cpd00101_c is "ribose-5-phosphate";
  // FORMULA: C9H12N2O9P
  // CHARGE: -1
  species $M_cpd00859_c in c = 1; M_cpd00859_c is "Pseudouridine 5'-phosphate";
  // FORMULA: C152H271N2O84P2
  // CHARGE: 0
  species $M_cpd17063_c in c = 1; M_cpd17063_c is "PA_core6_lipidA";
  // FORMULA: C152H268N2O93P5
  // CHARGE: 0
  species $M_cpd17064_c in c = 1; M_cpd17064_c is "PA_core7_lipidA";
  // FORMULA: C55H90O4P
  // CHARGE: -1
  species $M_cpd00286_c in c = 1; M_cpd00286_c is "Undecaprenylphosphate";
  // FORMULA: C7H14O13P2
  // CHARGE: -2
  species $M_cpd08316_c in c = 1; M_cpd08316_c is "D-Glycero-D-manno-heptose1-7-bisphosphate";
  // FORMULA: C7H14O10P
  // CHARGE: -1
  species $M_cpd04920_c in c = 1; M_cpd04920_c is "D-Glycero-D-manno-heptose1-phosphate";
  // FORMULA: C9H12N2O8P
  // CHARGE: -1
  species $M_cpd00299_c in c = 1; M_cpd00299_c is "dUMP";
  // FORMULA: C10H14N2O8P
  // CHARGE: -1
  species $M_cpd00298_c in c = 1; M_cpd00298_c is "dTMP";
  // FORMULA: C5H6N2O5
  // CHARGE: -2
  species $M_cpd00343_c in c = 1; M_cpd00343_c is "N-Carbamoyl-L-aspartate";
  // FORMULA: C7H14O10P
  // CHARGE: -1
  species $M_cpd00238_c in c = 1; M_cpd00238_c is "Sedoheptulose7-phosphate";
  // FORMULA: C10H14N2O11P2
  // CHARGE: -2
  species $M_cpd00297_c in c = 1; M_cpd00297_c is "dTDP";
  // FORMULA: C37H63N3O20P2
  // CHARGE: 0
  species $M_cpd17070_c in c = 1; M_cpd17070_c is "UDP-2-NH-(3OH-C12:0),3-O-(3OH-C10:0)glucosamine";
  // FORMULA: C28H52NO12P
  // CHARGE: 0
  species $M_cpd17069_c in c = 1; M_cpd17069_c is "Pseudomonas aeruginosa Lipid X";
  // FORMULA: C9H13N3O13P3
  // CHARGE: -3
  species $M_cpd00356_c in c = 1; M_cpd00356_c is "dCTP";
  // FORMULA: C9H12N2O15P3
  // CHARGE: -3
  species $M_cpd00062_c in c = 1; M_cpd00062_c is "UTP";
  // FORMULA: C9H12N2O14P3
  // CHARGE: -3
  species $M_cpd00358_c in c = 1; M_cpd00358_c is "dUTP";
  // FORMULA: C6H12O9P
  // CHARGE: -1
  species $M_cpd00089_c in c = 1; M_cpd00089_c is "Glucose-1-phosphate";
  // FORMULA: C10H11N2O11P
  // CHARGE: -2
  species $M_cpd00810_c in c = 1; M_cpd00810_c is "Orotidylic acid";
  // FORMULA: C8H13O8
  // CHARGE: -1
  species $M_cpd00875_c in c = 1; M_cpd00875_c is "KDO";
  // FORMULA: C17H24N3O15P
  // CHARGE: -2
  species $M_cpd02546_c in c = 1; M_cpd02546_c is "CMP-KDO";
  // FORMULA: C56H103N2O20P
  // CHARGE: 0
  species $M_cpd17067_c in c = 1; M_cpd17067_c is "Pseudomonas Lipid A Disaccharide";
  // FORMULA: C5H5N2O4
  // CHARGE: -1
  species $M_cpd00282_c in c = 1; M_cpd00282_c is "S-Dihydroorotate";
  // FORMULA: C17H25N3O17P2
  // CHARGE: -2
  species $M_cpd00037_c in c = 1; M_cpd00037_c is "UDP-N-acetylglucosamine";
  // FORMULA: C63H103O11N1P2
  // CHARGE: 0
  species $M_cpd17098_c in c = 1; M_cpd17098_c is "Fuc2NAc-PP-Undecaprenyl";
  // FORMULA: C63H103NO12P2
  // CHARGE: -2
  species $M_cpd00946_c in c = 1; M_cpd00946_c is "Undecaprenyl diphospho N-acetyl-glucosamine";
  // FORMULA: C17H27O17N4P2
  // CHARGE: 0
  species $M_cpd17093_c in c = 1; M_cpd17093_c is "UDP-N-acetyl-D-mannosamine (2NAc(CH3C=NH)) acid";
  // FORMULA: C71H119O19N3P3
  // CHARGE: 0
  species $M_cpd17099_c in c = 1; M_cpd17099_c is "Man(2NAc3NAc)A-(beta1,3)-Fuc2NAc-PP-Undecaprenyl";
  // FORMULA: C17H25N3O17P2
  // CHARGE: -2
  species $M_cpd00861_c in c = 1; M_cpd00861_c is "UDP-N-acetyl-D-mannosamine";
  // FORMULA: C17H28O17N4P2
  // CHARGE: 0
  species $M_cpd17096_c in c = 1; M_cpd17096_c is "UDP-N-acetyl-D-mannosamine-3-N";
  // FORMULA: C9H13N3O7P
  // CHARGE: -1
  species $M_cpd00206_c in c = 1; M_cpd00206_c is "dCMP";
  // FORMULA: C17H25N5O16P2
  // CHARGE: -2
  species $M_cpd03830_c in c = 1; M_cpd03830_c is "ADP-D-glycero-D-manno-heptose";
  // FORMULA: C17H25N5O16P2
  // CHARGE: -2
  species $M_cpd03831_c in c = 1; M_cpd03831_c is "ADP-L-glycero-D-manno-heptose";
  // FORMULA: C10H13N5O8P
  // CHARGE: -1
  species $M_cpd00126_c in c = 1; M_cpd00126_c is "GMP";
  // FORMULA: C5H10O8P
  // CHARGE: -1
  species $M_cpd00817_c in c = 1; M_cpd00817_c is "D-Arabinose5-phosphate";
  // FORMULA: C8H13O11P
  // CHARGE: -2
  species $M_cpd02730_c in c = 1; M_cpd02730_c is "3-Deoxy-D-manno-octulosonate8-phosphate";
  // FORMULA: C27H43N3O19P2
  // CHARGE: 0
  species $M_cpd17071_c in c = 1; M_cpd17071_c is "UDP-3-O-(3OH-C10:0)-N-acetylglucosamine";
  // FORMULA: C25H42N3O18P2
  // CHARGE: 0
  species $M_cpd17072_c in c = 1; M_cpd17072_c is "UDP-3-O-(3OH-C10:0)-D-glucosamine";
  // FORMULA: C6H14NO8P
  // CHARGE: 0
  species $M_cpd00288_c in c = 1; M_cpd00288_c is "D-Glucosamine phosphate";
  // FORMULA: C10H14N2O14P3
  // CHARGE: -3
  species $M_cpd00357_c in c = 1; M_cpd00357_c is "TTP";
  // FORMULA: C7H14O10P
  // CHARGE: -1
  species $M_cpd04918_c in c = 1; M_cpd04918_c is "D-Glycero-D-manno-heptose7-phosphate";
  // FORMULA: C6H14NO8P
  // CHARGE: 0
  species $M_cpd03671_c in c = 1; M_cpd03671_c is "D-Glucosamine1-phosphate";
  // FORMULA: C88H157N2O32P2
  // CHARGE: 0
  species $M_cpd17055_c in c = 1; M_cpd17055_c is "Pseudomonas aeruginosa KDO-lipidA";
  // FORMULA: C96H168N2O39P2
  // CHARGE: 0
  species $M_cpd17054_c in c = 1; M_cpd17054_c is "Pseudomonas aeruginosa KDO2-lipidA";
  // FORMULA: C116H205N2O56P2
  // CHARGE: 0
  species $M_cpd17060_c in c = 1; M_cpd17060_c is "PA_core3_lipidA";
  // FORMULA: C134H238N2O71P2
  // CHARGE: 0
  species $M_cpd17061_c in c = 1; M_cpd17061_c is "PA_core4_lipidA";
  // FORMULA: C110H194N2O51P2
  // CHARGE: 0
  species $M_cpd17059_c in c = 1; M_cpd17059_c is "PA_core2_lipidA";
  // FORMULA: C146H260N2O79P2
  // CHARGE: 0
  species $M_cpd17062_c in c = 1; M_cpd17062_c is "PA_core5_lipidA";
  // FORMULA: C103H181N2O45P2
  // CHARGE: 0
  species $M_cpd17058_c in c = 1; M_cpd17058_c is "PA_core1_lipidA";
  // FORMULA: C70H117P3O18N4
  // CHARGE: 0
  species $M_cpd17086_c in c = 1; M_cpd17086_c is "rha1glcnacppund";
  // FORMULA: C82H143P5O32N4
  // CHARGE: 0
  species $M_cpd17087_c in c = 1; M_cpd17087_c is "rha3glcnacppund";
  // FORMULA: C88H156P6O39N4
  // CHARGE: 0
  species $M_cpd17088_c in c = 1; M_cpd17088_c is "rha4glcnacppund";
  // FORMULA: C8H15NO9P
  // CHARGE: -1
  species $M_cpd02611_c in c = 1; M_cpd02611_c is "N-Acetyl-D-glucosamine1-phosphate";
  // FORMULA: C189H341P9O127N8
  // CHARGE: 0
  species $M_cpd17056_c in c = 1; M_cpd17056_c is "Pseudomonas aeruginosa A-band lipopolysaccharide";

  // Parameters:
  LOWER_BOUND_rxn05289 = -1000;
  UPPER_BOUND_rxn05289 = 1000;
  LOWER_BOUND_rJB00277 = -1000;
  UPPER_BOUND_rJB00277 = 1000;
  LOWER_BOUND_rxn02285 = -1000;
  UPPER_BOUND_rxn02285 = 1000;
  LOWER_BOUND_rxn13872 = -1000;
  UPPER_BOUND_rxn13872 = 1000;
  LOWER_BOUND_rxn06076 = 0;
  UPPER_BOUND_rxn06076 = 1000;
  LOWER_BOUND_rxn06075 = 0;
  UPPER_BOUND_rxn06075 = 1000;
  LOWER_BOUND_rxn13877 = -1000;
  UPPER_BOUND_rxn13877 = 1000;
  LOWER_BOUND_rxn13913 = -1000;
  UPPER_BOUND_rxn13913 = 1000;
  LOWER_BOUND_rxn00711 = 0;
  UPPER_BOUND_rxn00711 = 1000;
  LOWER_BOUND_rxn00776 = 0;
  UPPER_BOUND_rxn00776 = 1000;
  LOWER_BOUND_rxn13870 = 0;
  UPPER_BOUND_rxn13870 = 1000;
  LOWER_BOUND_rxn03919 = 0;
  UPPER_BOUND_rxn03919 = 1000;
  LOWER_BOUND_rxn01520 = 0;
  UPPER_BOUND_rxn01520 = 1000;
  LOWER_BOUND_rxn01018 = 0;
  UPPER_BOUND_rxn01018 = 1000;
  LOWER_BOUND_rxn00717 = 0;
  UPPER_BOUND_rxn00717 = 1000;
  LOWER_BOUND_rxn13884 = -1000;
  UPPER_BOUND_rxn13884 = 1000;
  LOWER_BOUND_rxn00213 = -1000;
  UPPER_BOUND_rxn00213 = 1000;
  LOWER_BOUND_rxn00710 = 0;
  UPPER_BOUND_rxn00710 = 1000;
  LOWER_BOUND_rxn01513 = -1000;
  UPPER_BOUND_rxn01513 = 1000;
  LOWER_BOUND_rxn02405 = 0;
  UPPER_BOUND_rxn02405 = 1000;
  LOWER_BOUND_rxn13880 = -1000;
  UPPER_BOUND_rxn13880 = 1000;
  LOWER_BOUND_rxn01360 = 0;
  UPPER_BOUND_rxn01360 = 1000;
  LOWER_BOUND_rxn08335 = -1000;
  UPPER_BOUND_rxn08335 = 1000;
  LOWER_BOUND_rJB00259 = -1000;
  UPPER_BOUND_rJB00259 = 1000;
  LOWER_BOUND_rxn08336 = 0;
  UPPER_BOUND_rxn08336 = 0;
  LOWER_BOUND_rxn00295 = -1000;
  UPPER_BOUND_rxn00295 = 1000;
  LOWER_BOUND_rxn13833 = -1000;
  UPPER_BOUND_rxn13833 = 1000;
  LOWER_BOUND_rxn08040 = -1000;
  UPPER_BOUND_rxn08040 = 1000;
  LOWER_BOUND_rxn13922 = -1000;
  UPPER_BOUND_rxn13922 = 1000;
  LOWER_BOUND_rxn00297 = -1000;
  UPPER_BOUND_rxn00297 = 1000;
  LOWER_BOUND_rxn13923 = -1000;
  UPPER_BOUND_rxn13923 = 1000;
  LOWER_BOUND_rxn13912 = -1000;
  UPPER_BOUND_rxn13912 = 1000;
  LOWER_BOUND_rxn13911 = -1000;
  UPPER_BOUND_rxn13911 = 1000;
  LOWER_BOUND_rxn00364 = -1000;
  UPPER_BOUND_rxn00364 = 1000;
  LOWER_BOUND_rxn01219 = -1000;
  UPPER_BOUND_rxn01219 = 1000;
  LOWER_BOUND_rxn13873 = -1000;
  UPPER_BOUND_rxn13873 = 1000;
  LOWER_BOUND_rxn03511 = 0;
  UPPER_BOUND_rxn03511 = 1000;
  LOWER_BOUND_rxn01672 = 0;
  UPPER_BOUND_rxn01672 = 1000;
  LOWER_BOUND_rxn01465 = -1000;
  UPPER_BOUND_rxn01465 = 1000;
  LOWER_BOUND_rxn00363 = 0;
  UPPER_BOUND_rxn00363 = 1000;
  LOWER_BOUND_rxn01218 = 0;
  UPPER_BOUND_rxn01218 = 1000;
  LOWER_BOUND_rxn01145 = 0;
  UPPER_BOUND_rxn01145 = 1000;
  LOWER_BOUND_rxn00708 = 0;
  UPPER_BOUND_rxn00708 = 1000;
  LOWER_BOUND_rxn02331 = 0;
  UPPER_BOUND_rxn02331 = 1000;
  LOWER_BOUND_rxn00412 = 0;
  UPPER_BOUND_rxn00412 = 1000;
  LOWER_BOUND_rxn00410 = -1000;
  UPPER_BOUND_rxn00410 = 1000;
  LOWER_BOUND_rxn13874 = -1000;
  UPPER_BOUND_rxn13874 = 1000;
  LOWER_BOUND_rxn13882 = -1000;
  UPPER_BOUND_rxn13882 = 1000;
  LOWER_BOUND_rxn13881 = -1000;
  UPPER_BOUND_rxn13881 = 1000;
  LOWER_BOUND_rxn00119 = -1000;
  UPPER_BOUND_rxn00119 = 1000;
  LOWER_BOUND_rxn01517 = -1000;
  UPPER_BOUND_rxn01517 = 1000;
  LOWER_BOUND_rxn01484 = -1000;
  UPPER_BOUND_rxn01484 = 1000;
  LOWER_BOUND_rxn00409 = -1000;
  UPPER_BOUND_rxn00409 = 1000;
  LOWER_BOUND_rxn01673 = -1000;
  UPPER_BOUND_rxn01673 = 1000;
  LOWER_BOUND_rxn01512 = -1000;
  UPPER_BOUND_rxn01512 = 1000;
  LOWER_BOUND_rxn01678 = -1000;
  UPPER_BOUND_rxn01678 = 1000;
  LOWER_BOUND_rxn00117 = -1000;
  UPPER_BOUND_rxn00117 = 1000;
  LOWER_BOUND_rxn13883 = -1000;
  UPPER_BOUND_rxn13883 = 1000;
  LOWER_BOUND_rxn03917 = -1000;
  UPPER_BOUND_rxn03917 = 1000;
  LOWER_BOUND_rxn00461 = -1000;
  UPPER_BOUND_rxn00461 = 1000;
  LOWER_BOUND_rxn01117 = -1000;
  UPPER_BOUND_rxn01117 = 1000;
  LOWER_BOUND_rxn02404 = 0;
  UPPER_BOUND_rxn02404 = 1000;
  LOWER_BOUND_rxn01485 = -1000;
  UPPER_BOUND_rxn01485 = 1000;
  LOWER_BOUND_rxn13878 = -1000;
  UPPER_BOUND_rxn13878 = 1000;
  LOWER_BOUND_rxn13879 = -1000;
  UPPER_BOUND_rxn13879 = 1000;
  LOWER_BOUND_rxn03916 = -1000;
  UPPER_BOUND_rxn03916 = 1000;
  LOWER_BOUND_rxn03918 = -1000;
  UPPER_BOUND_rxn03918 = 1000;
  LOWER_BOUND_rxn13867 = 0;
  UPPER_BOUND_rxn13867 = 1000;
  LOWER_BOUND_rxn13866 = 0;
  UPPER_BOUND_rxn13866 = 1000;
  LOWER_BOUND_rxn13869 = 0;
  UPPER_BOUND_rxn13869 = 1000;
  LOWER_BOUND_rPY00222 = 0;
  UPPER_BOUND_rPY00222 = 1000;
  LOWER_BOUND_rPY00221 = 0;
  UPPER_BOUND_rPY00221 = 1000;
  LOWER_BOUND_rxn01514 = 0;
  UPPER_BOUND_rxn01514 = 1000;
  LOWER_BOUND_rxn01519 = 0;
  UPPER_BOUND_rxn01519 = 1000;
  LOWER_BOUND_rxn01362 = -1000;
  UPPER_BOUND_rxn01362 = 1000;
  LOWER_BOUND_rxn13899 = 0;
  UPPER_BOUND_rxn13899 = 1000;
  LOWER_BOUND_rxn13900 = 0;
  UPPER_BOUND_rxn13900 = 1000;
  LOWER_BOUND_rxn13901 = 0;
  UPPER_BOUND_rxn13901 = 1000;
  LOWER_BOUND_rxn03638 = 0;
  UPPER_BOUND_rxn03638 = 1000;
  LOWER_BOUND_rxn00293 = -1000;
  UPPER_BOUND_rxn00293 = 1000;
  LOWER_BOUND_rxn13868 = 0;
  UPPER_BOUND_rxn13868 = 1000;
  LOWER_BOUND_rxn13876 = 0;
  UPPER_BOUND_rxn13876 = 1000;
  LOWER_BOUND_rxn13871 = 0;
  UPPER_BOUND_rxn13871 = 1000;
  LOWER_BOUND_rxn13926 = 0;
  UPPER_BOUND_rxn13926 = 1000;
  kG_M_cpd11421_c = 1 dimensionless; kG_M_cpd11421_c is "Energy constant of species trdrd";
  kG_M_cpd00096_c = 1 dimensionless; kG_M_cpd00096_c is "Energy constant of species CDP";
  kG_M_cpd00001_c = 1 dimensionless; kG_M_cpd00001_c is "Energy constant of species H2O";
  kG_M_cpd11420_c = 1 dimensionless; kG_M_cpd11420_c is "Energy constant of species trdox";
  kG_M_cpd00533_c = 1 dimensionless; kG_M_cpd00533_c is "Energy constant of species dCDP";
  kG_M_cpd00014_c = 1 dimensionless; kG_M_cpd00014_c is "Energy constant of species UDP";
  kG_M_cpd00978_c = 1 dimensionless; kG_M_cpd00978_c is "Energy constant of species dUDP";
  kG_M_cpd00002_c = 1 dimensionless; kG_M_cpd00002_c is "Energy constant of species ATP";
  kG_M_cpd17063_c = 1 dimensionless; kG_M_cpd17063_c is "Energy constant of species PA_core6_lipidA";
  kG_M_cpd00067_c = 1 dimensionless; kG_M_cpd00067_c is "Energy constant of species H+";
  kG_M_cpd00008_c = 1 dimensionless; kG_M_cpd00008_c is "Energy constant of species ADP";
  kG_M_cpd17064_c = 1 dimensionless; kG_M_cpd17064_c is "Energy constant of species PA_core7_lipidA";
  kG_M_cpd08316_c = 1 dimensionless; kG_M_cpd08316_c is "Energy constant of species D-Glycero-D-manno-heptose1-7-bisphosphate";
  kG_M_cpd00009_c = 1 dimensionless; kG_M_cpd00009_c is "Energy constant of species Phosphate";
  kG_M_cpd04920_c = 1 dimensionless; kG_M_cpd04920_c is "Energy constant of species D-Glycero-D-manno-heptose1-phosphate";
  kG_M_cpd00041_c = 1 dimensionless; kG_M_cpd00041_c is "Energy constant of species L-Aspartate";
  kG_M_cpd00146_c = 1 dimensionless; kG_M_cpd00146_c is "Energy constant of species Carbamoylphosphate";
  kG_M_cpd00343_c = 1 dimensionless; kG_M_cpd00343_c is "Energy constant of species N-Carbamoyl-L-aspartate";
  kG_M_cpd00307_c = 1 dimensionless; kG_M_cpd00307_c is "Energy constant of species Cytosine";
  kG_M_cpd00013_c = 1 dimensionless; kG_M_cpd00013_c is "Energy constant of species NH3";
  kG_M_cpd00092_c = 1 dimensionless; kG_M_cpd00092_c is "Energy constant of species Uracil";
  kG_M_cpd00356_c = 1 dimensionless; kG_M_cpd00356_c is "Energy constant of species dCTP";
  kG_M_cpd00358_c = 1 dimensionless; kG_M_cpd00358_c is "Energy constant of species dUTP";
  kG_M_cpd00046_c = 1 dimensionless; kG_M_cpd00046_c is "Energy constant of species CMP";
  kG_M_cpd00367_c = 1 dimensionless; kG_M_cpd00367_c is "Energy constant of species Cytidine";
  kG_M_cpd00206_c = 1 dimensionless; kG_M_cpd00206_c is "Energy constant of species dCMP";
  kG_M_cpd00654_c = 1 dimensionless; kG_M_cpd00654_c is "Energy constant of species Deoxycytidine";
  kG_M_cpd00298_c = 1 dimensionless; kG_M_cpd00298_c is "Energy constant of species dTMP";
  kG_M_cpd00184_c = 1 dimensionless; kG_M_cpd00184_c is "Energy constant of species Thymidine";
  kG_M_cpd00091_c = 1 dimensionless; kG_M_cpd00091_c is "Energy constant of species UMP";
  kG_M_cpd00249_c = 1 dimensionless; kG_M_cpd00249_c is "Energy constant of species Uridine";
  kG_M_cpd00061_c = 1 dimensionless; kG_M_cpd00061_c is "Energy constant of species Phosphoenolpyruvate";
  kG_M_cpd00817_c = 1 dimensionless; kG_M_cpd00817_c is "Energy constant of species D-Arabinose5-phosphate";
  kG_M_cpd02730_c = 1 dimensionless; kG_M_cpd02730_c is "Energy constant of species 3-Deoxy-D-manno-octulosonate8-phosphate";
  kG_M_cpd00053_c = 1 dimensionless; kG_M_cpd00053_c is "Energy constant of species L-Glutamine";
  kG_M_cpd00062_c = 1 dimensionless; kG_M_cpd00062_c is "Energy constant of species UTP";
  kG_M_cpd00023_c = 1 dimensionless; kG_M_cpd00023_c is "Energy constant of species L-Glutamate";
  kG_M_cpd00052_c = 1 dimensionless; kG_M_cpd00052_c is "Energy constant of species CTP";
  kG_M_cpd00875_c = 1 dimensionless; kG_M_cpd00875_c is "Energy constant of species KDO";
  kG_M_cpd00026_c = 1 dimensionless; kG_M_cpd00026_c is "Energy constant of species UDP-glucose";
  kG_M_cpd17060_c = 1 dimensionless; kG_M_cpd17060_c is "Energy constant of species PA_core3_lipidA";
  kG_M_cpd17061_c = 1 dimensionless; kG_M_cpd17061_c is "Energy constant of species PA_core4_lipidA";
  kG_M_cpd00357_c = 1 dimensionless; kG_M_cpd00357_c is "Energy constant of species TTP";
  kG_M_cpd00297_c = 1 dimensionless; kG_M_cpd00297_c is "Energy constant of species dTDP";
  kG_M_cpd01999_c = 1 dimensionless; kG_M_cpd01999_c is "Energy constant of species GDP-D-rhamnose";
  kG_M_cpd17086_c = 1 dimensionless; kG_M_cpd17086_c is "Energy constant of species rha1glcnacppund";
  kG_M_cpd00126_c = 1 dimensionless; kG_M_cpd00126_c is "Energy constant of species GMP";
  kG_M_cpd17087_c = 1 dimensionless; kG_M_cpd17087_c is "Energy constant of species rha3glcnacppund";
  kG_M_cpd00022_c = 1 dimensionless; kG_M_cpd00022_c is "Energy constant of species Acetyl-CoA";
  kG_M_cpd03671_c = 1 dimensionless; kG_M_cpd03671_c is "Energy constant of species D-Glucosamine1-phosphate";
  kG_M_cpd00010_c = 1 dimensionless; kG_M_cpd00010_c is "Energy constant of species CoA";
  kG_M_cpd02611_c = 1 dimensionless; kG_M_cpd02611_c is "Energy constant of species N-Acetyl-D-glucosamine1-phosphate";
  kG_M_cpd02113_c = 1 dimensionless; kG_M_cpd02113_c is "Energy constant of species dTDP-rhamnose";
  kG_M_cpd17062_c = 1 dimensionless; kG_M_cpd17062_c is "Energy constant of species PA_core5_lipidA";
  kG_M_cpd00035_c = 1 dimensionless; kG_M_cpd00035_c is "Energy constant of species L-Alanine";
  kG_M_cpd17065_c = 1 dimensionless; kG_M_cpd17065_c is "Energy constant of species Pseudomonas aeruginosa LPS core + KDO2-lipidA";

  // Rate rules:
  M_cpd00003_c' = -9;
  M_cpd02611_c' = 1;
  M_cpd17068_c' = -33;
  M_cpd00249_c' = 13;
  M_cpd00946_c' = 25;
  M_cpd00367_c' = 16;
  M_cpd00007_c' = -24;
  M_cpd00356_c' = -11;
  M_cpd11468_c' = -93;
  M_cpd00282_c' = -107;
  M_cpd17059_c' = -3;
  M_cpd00171_c' = 18;
  M_cpd17054_c' = 6;
  M_cpd03830_c' = -11;
  M_cpd02229_c' = 43;
  M_cpd04920_c' = 24;
  M_cpd00023_c' = 12;
  M_cpd11494_c' = -7;
  M_cpd11421_c' = -31;
  M_cpd00238_c' = -19;
  M_cpd00533_c' = 45;
  M_cpd01999_c' = -24;
  M_cpd02546_c' = 4;
  M_cpd00029_c' = 25;
  M_cpd17092_c' = -24;
  M_cpd00773_c' = -8;
  M_cpd00103_c' = -30;
  M_cpd00861_c' = 2;
  M_cpd08316_c' = -25;
  M_cpd15561_c' = 23;
  M_cJB00125_c' = 22;
  M_cpd00026_c' = -10;
  M_cpd17061_c' = 8;
  M_cpd17065_c' = -41;
  M_cpd00043_c' = -11;
  M_cpd00022_c' = -2;
  M_cpd00125_c' = -29;
  M_cpd00046_c' = -5;
  M_cpd00654_c' = 15;
  M_cpd00025_c' = 24;
  M_cpd00357_c' = 3;
  M_cpd17100_c' = -11;
  M_cpd00330_c' = 29;
  M_cpd03831_c' = 8;
  M_cpd00184_c' = 14;
  M_cpd17072_c' = -1;
  M_cpd17096_c' = 1;
  M_cpd00286_c' = -65;
  M_cpd00297_c' = 30;
  M_cpd00875_c' = -18;
  M_cpd17098_c' = 2;
  M_cpd00035_c' = -2;
  M_cpd02113_c' = -8;
  M_cpd17056_c' = 3;
  M_cpd00037_c' = -93;
  M_cpd00067_c' = 514;
  M_cpd00817_c' = -42;
  M_cpd00101_c' = -30;
  M_cpd00298_c' = -10;
  M_cpd17070_c' = -39;
  M_cpd00004_c' = 9;
  M_cpd00052_c' = -4;
  M_cpd00091_c' = 203;
  M_cpd00247_c' = 91;
  M_cpd00859_c' = 30;
  M_cpd11480_c' = -21;
  M_cpd15560_c' = -23;
  M_cpd01351_c' = -22;
  M_cpd11493_c' = 184;
  M_cpd04918_c' = 6;
  M_cpd00002_c' = -314;
  M_cpd00978_c' = 36;
  M_cpd03671_c' = -5;
  M_cpd00006_c' = 26;
  M_cpd17067_c' = -11;
  M_cpd17064_c' = 37;
  M_cpd00061_c' = -28;
  M_cpd00146_c' = -30;
  M_cpd17063_c' = -29;
  M_cpd17095_c' = -22;
  M_cpd15500_c' = -21;
  M_cpd00092_c' = -34;
  M_cpd00008_c' = 317;
  M_cpd00005_c' = -26;
  M_cpd11420_c' = 31;
  M_cpd00009_c' = 197;
  M_cpd02730_c' = 7;
  M_cpd00126_c' = 17;
  M_cpd00307_c' = -27;
  M_cpd00011_c' = 26;
  M_cpd00089_c' = -36;
  M_cpd00299_c' = -36;
  M_cpd00001_c' = -172;
  M_cpd00096_c' = -21;
  M_cpd17086_c' = 1;
  M_cpd17058_c' = 1;
  M_cpd00041_c' = -28;
  M_cpd00293_c' = -5;
  M_cpd17088_c' = 2;
  M_cpd17057_c' = 40;
  M_cpd00012_c' = 118;
  M_cpd17046_c' = -41;
  M_cpd00206_c' = -34;
  M_cpd00810_c' = -27;
  M_cpd15499_c' = 21;
  M_cpd17055_c' = 1;
  M_cpd00175_c' = -3;
  M_cpd11482_c' = -22;
  M_cpd17062_c' = -6;
  M_cpd17071_c' = 2;
  M_cpd17069_c' = 14;
  M_cpd00053_c' = -12;
  M_cpd00288_c' = 8;
  M_cpd17093_c' = -30;
  M_cpd00062_c' = -56;
  M_cpd17066_c' = 51;
  M_cpd17099_c' = 2;
  M_cpd00013_c' = 6;
  M_cpd17060_c' = -1;
  M_cpd00014_c' = 54;
  M_cpd17087_c' = 1;
  M_cpd00343_c' = 45;
  M_cpd00358_c' = 21;
  M_cpd17094_c' = 19;
  M_cpd00010_c' = 2;
  M_cpd02820_c' = 12;

  // Reactions:
  // GENE_ASSOCIATION: (PA2616 or PA0849)
  // SUBSYSTEM: Pyrimidine metabolism
  // EC Number: 1.6.4.5,1.8.1.9
  // Confidence Level:
  // AUTHORS:
  R_rxn05289: $M_cpd00067_c + $M_cpd00005_c + $M_cpd11420_c -> $M_cpd00006_c + $M_cpd11421_c; (vmaf_R_rxn05289*(M_cpd00067_c*c/kmc_R_rxn05289_M_cpd00067_c)^hco_R_rxn05289*(M_cpd00005_c*c/kmc_R_rxn05289_M_cpd00005_c)^hco_R_rxn05289*(M_cpd11420_c*c/kmc_R_rxn05289_M_cpd11420_c)^hco_R_rxn05289 - vmar_R_rxn05289*(M_cpd00006_c*c/kmc_R_rxn05289_M_cpd00006_c)^hco_R_rxn05289*(M_cpd11421_c*c/kmc_R_rxn05289_M_cpd11421_c)^hco_R_rxn05289)/((1 + M_cpd00067_c*c/kmc_R_rxn05289_M_cpd00067_c)^hco_R_rxn05289*(1 + M_cpd00005_c*c/kmc_R_rxn05289_M_cpd00005_c)^hco_R_rxn05289*(1 + M_cpd11420_c*c/kmc_R_rxn05289_M_cpd11420_c)^hco_R_rxn05289 + (1 + M_cpd00006_c*c/kmc_R_rxn05289_M_cpd00006_c)^hco_R_rxn05289*(1 + M_cpd11421_c*c/kmc_R_rxn05289_M_cpd11421_c)^hco_R_rxn05289 - 1); R_rxn05289 is "thioredoxin reductase (NADPH)";  // hasProperty ec-code:1.6.4.5 ec-code:1.8.1.9
    vmaf_R_rxn05289 = 1 mole_per_second; hco_R_rxn05289 = 1 dimensionless; kmc_R_rxn05289_M_cpd00067_c = 1 substance; kmc_R_rxn05289_M_cpd00005_c = 1 substance; kmc_R_rxn05289_M_cpd11420_c = 1 substance; vmar_R_rxn05289 = 1 mole_per_second; kmc_R_rxn05289_M_cpd00006_c = 1 substance; kmc_R_rxn05289_M_cpd11421_c = 1 substance;
  // GENE_ASSOCIATION: (PA3158 and PA3146)
  // SUBSYSTEM: Amino sugar and nucleotide sugar metabolism
  // Confidence Level:
  // AUTHORS:
  R_rJB00277: $M_cpd00003_c + $M_cpd00067_c + $M_cpd00175_c -> $M_cpd00004_c + $M_cpd00001_c + $M_cpd17092_c; (vmaf_R_rJB00277*(M_cpd00003_c*c/kmc_R_rJB00277_M_cpd00003_c)^hco_R_rJB00277*(M_cpd00067_c*c/kmc_R_rJB00277_M_cpd00067_c)^hco_R_rJB00277*(M_cpd00175_c*c/kmc_R_rJB00277_M_cpd00175_c)^hco_R_rJB00277 - vmar_R_rJB00277*(M_cpd00004_c*c/kmc_R_rJB00277_M_cpd00004_c)^hco_R_rJB00277*(M_cpd00001_c*c/kmc_R_rJB00277_M_cpd00001_c)^hco_R_rJB00277*(M_cpd17092_c*c/kmc_R_rJB00277_M_cpd17092_c)^hco_R_rJB00277)/((1 + M_cpd00003_c*c/kmc_R_rJB00277_M_cpd00003_c)^hco_R_rJB00277*(1 + M_cpd00067_c*c/kmc_R_rJB00277_M_cpd00067_c)^hco_R_rJB00277*(1 + M_cpd00175_c*c/kmc_R_rJB00277_M_cpd00175_c)^hco_R_rJB00277 + (1 + M_cpd00004_c*c/kmc_R_rJB00277_M_cpd00004_c)^hco_R_rJB00277*(1 + M_cpd00001_c*c/kmc_R_rJB00277_M_cpd00001_c)^hco_R_rJB00277*(1 + M_cpd17092_c*c/kmc_R_rJB00277_M_cpd17092_c)^hco_R_rJB00277 - 1); R_rJB00277 is "UDP-N-acetyl fucosamine synthase";
    vmaf_R_rJB00277 = 1 mole_per_second; hco_R_rJB00277 = 1 dimensionless; kmc_R_rJB00277_M_cpd00003_c = 1 substance; kmc_R_rJB00277_M_cpd00067_c = 1 substance; kmc_R_rJB00277_M_cpd00175_c = 1 substance; vmar_R_rJB00277 = 1 mole_per_second; kmc_R_rJB00277_M_cpd00004_c = 1 substance; kmc_R_rJB00277_M_cpd00001_c = 1 substance; kmc_R_rJB00277_M_cpd17092_c = 1 substance;
  // GENE_ASSOCIATION: PA2977
  // SUBSYSTEM: Amino sugar and nucleotide sugar metabolism
  // EC Number: 1.1.1.158
  // Confidence Level:
  // AUTHORS:
  R_rxn02285: $M_cpd00006_c + $M_cpd00773_c -> $M_cpd00067_c + $M_cpd00005_c + $M_cpd02820_c; (vmaf_R_rxn02285*(M_cpd00006_c*c/kmc_R_rxn02285_M_cpd00006_c)^hco_R_rxn02285*(M_cpd00773_c*c/kmc_R_rxn02285_M_cpd00773_c)^hco_R_rxn02285 - vmar_R_rxn02285*(M_cpd00067_c*c/kmc_R_rxn02285_M_cpd00067_c)^hco_R_rxn02285*(M_cpd00005_c*c/kmc_R_rxn02285_M_cpd00005_c)^hco_R_rxn02285*(M_cpd02820_c*c/kmc_R_rxn02285_M_cpd02820_c)^hco_R_rxn02285)/((1 + M_cpd00006_c*c/kmc_R_rxn02285_M_cpd00006_c)^hco_R_rxn02285*(1 + M_cpd00773_c*c/kmc_R_rxn02285_M_cpd00773_c)^hco_R_rxn02285 + (1 + M_cpd00067_c*c/kmc_R_rxn02285_M_cpd00067_c)^hco_R_rxn02285*(1 + M_cpd00005_c*c/kmc_R_rxn02285_M_cpd00005_c)^hco_R_rxn02285*(1 + M_cpd02820_c*c/kmc_R_rxn02285_M_cpd02820_c)^hco_R_rxn02285 - 1); R_rxn02285 is "UDP-N-acetylenolpyruvoylglucosamine reductase";  // hasProperty ec-code:1.1.1.158
    vmaf_R_rxn02285 = 1 mole_per_second; hco_R_rxn02285 = 1 dimensionless; kmc_R_rxn02285_M_cpd00006_c = 1 substance; kmc_R_rxn02285_M_cpd00773_c = 1 substance; vmar_R_rxn02285 = 1 mole_per_second; kmc_R_rxn02285_M_cpd00067_c = 1 substance; kmc_R_rxn02285_M_cpd00005_c = 1 substance; kmc_R_rxn02285_M_cpd02820_c = 1 substance;
  // GENE_ASSOCIATION: (PA0011 or PA3242)
  // SUBSYSTEM: Lipopolysaccharide biosynthesis
  // Confidence Level:
  // AUTHORS:
  R_rxn13872: $M_cpd11468_c + $M_cpd17046_c + $M_cpd17068_c -> 2 $M_cpd11493_c + $M_cpd17066_c; (vmaf_R_rxn13872*(M_cpd11468_c*c/kmc_R_rxn13872_M_cpd11468_c)^hco_R_rxn13872*(M_cpd17046_c*c/kmc_R_rxn13872_M_cpd17046_c)^hco_R_rxn13872*(M_cpd17068_c*c/kmc_R_rxn13872_M_cpd17068_c)^hco_R_rxn13872 - vmar_R_rxn13872*(M_cpd11493_c*c/kmc_R_rxn13872_M_cpd11493_c)^(2*hco_R_rxn13872)*(M_cpd17066_c*c/kmc_R_rxn13872_M_cpd17066_c)^hco_R_rxn13872)/((1 + M_cpd11468_c*c/kmc_R_rxn13872_M_cpd11468_c)^hco_R_rxn13872*(1 + M_cpd17046_c*c/kmc_R_rxn13872_M_cpd17046_c)^hco_R_rxn13872*(1 + M_cpd17068_c*c/kmc_R_rxn13872_M_cpd17068_c)^hco_R_rxn13872 + (1 + M_cpd11493_c*c/kmc_R_rxn13872_M_cpd11493_c)^(2*hco_R_rxn13872)*(1 + M_cpd17066_c*c/kmc_R_rxn13872_M_cpd17066_c)^hco_R_rxn13872 - 1); R_rxn13872 is "Pseudomonas Lipid A Reaction";
    vmaf_R_rxn13872 = 1 mole_per_second; hco_R_rxn13872 = 1 dimensionless; kmc_R_rxn13872_M_cpd11468_c = 1 substance; kmc_R_rxn13872_M_cpd17046_c = 1 substance; kmc_R_rxn13872_M_cpd17068_c = 1 substance; vmar_R_rxn13872 = 1 mole_per_second; kmc_R_rxn13872_M_cpd11493_c = 1 substance; kmc_R_rxn13872_M_cpd17066_c = 1 substance;
  // Thermodynamically independent convenience kinetics
  // GENE_ASSOCIATION: (PA1156 and PA1155)
  // SUBSYSTEM: Pyrimidine metabolism
  // EC Number: 1.17.4.1
  // Confidence Level:
  // AUTHORS:
  R_rxn06076: $M_cpd11421_c + $M_cpd00096_c => $M_cpd00001_c + $M_cpd11420_c + $M_cpd00533_c; vmag_R_rxn06076*(M_cpd11421_c*c/kmc_R_rxn06076_M_cpd11421_c*(M_cpd00096_c*c/kmc_R_rxn06076_M_cpd00096_c)*sqrt((kG_M_cpd11421_c*kmc_R_rxn06076_M_cpd11421_c)^1*(kG_M_cpd00096_c*kmc_R_rxn06076_M_cpd00096_c)^1/((kG_M_cpd00001_c*kmc_R_rxn06076_M_cpd00001_c)^1*(kG_M_cpd00533_c*kmc_R_rxn06076_M_cpd00533_c)^1*(kG_M_cpd11420_c*kmc_R_rxn06076_M_cpd11420_c)^1))/((1 + M_cpd11421_c*c/kmc_R_rxn06076_M_cpd11421_c)*(1 + M_cpd00096_c*c/kmc_R_rxn06076_M_cpd00096_c))); R_rxn06076 is "ribonucleoside-diphosphate reductase (CDP)";  // hasProperty ec-code:1.17.4.1
    kmc_R_rxn06076_M_cpd11421_c = 1 substance; kmc_R_rxn06076_M_cpd00096_c = 1 substance; kmc_R_rxn06076_M_cpd00001_c = 1 substance; kmc_R_rxn06076_M_cpd11420_c = 1 substance; kmc_R_rxn06076_M_cpd00533_c = 1 substance; vmag_R_rxn06076 = 1 mole_per_second;
  // Thermodynamically independent convenience kinetics
  // GENE_ASSOCIATION: (PA1156 and PA1155)
  // SUBSYSTEM: Pyrimidine metabolism
  // EC Number: 1.17.4.1
  // Confidence Level:
  // AUTHORS:
  R_rxn06075: $M_cpd11421_c + $M_cpd00014_c => $M_cpd00001_c + $M_cpd11420_c + $M_cpd00978_c; vmag_R_rxn06075*(M_cpd11421_c*c/kmc_R_rxn06075_M_cpd11421_c*(M_cpd00014_c*c/kmc_R_rxn06075_M_cpd00014_c)*sqrt((kG_M_cpd11421_c*kmc_R_rxn06075_M_cpd11421_c)^1*(kG_M_cpd00014_c*kmc_R_rxn06075_M_cpd00014_c)^1/((kG_M_cpd00001_c*kmc_R_rxn06075_M_cpd00001_c)^1*(kG_M_cpd00978_c*kmc_R_rxn06075_M_cpd00978_c)^1*(kG_M_cpd11420_c*kmc_R_rxn06075_M_cpd11420_c)^1))/((1 + M_cpd11421_c*c/kmc_R_rxn06075_M_cpd11421_c)*(1 + M_cpd00014_c*c/kmc_R_rxn06075_M_cpd00014_c))); R_rxn06075 is "ribonucleoside-diphosphate reductase (UDP)";  // hasProperty ec-code:1.17.4.1
    kmc_R_rxn06075_M_cpd11421_c = 1 substance; kmc_R_rxn06075_M_cpd00014_c = 1 substance; kmc_R_rxn06075_M_cpd00001_c = 1 substance; kmc_R_rxn06075_M_cpd11420_c = 1 substance; kmc_R_rxn06075_M_cpd00978_c = 1 substance; vmag_R_rxn06075 = 1 mole_per_second;
  // Reversibel rapid-equilibrium random order ternary-complex mechanism, two products
  // GENE_ASSOCIATION: (PA3153 and PA3154 and PA3160)
  // SUBSYSTEM: Lipopolysaccharide biosynthesis
  // Confidence Level:
  // AUTHORS:
  R_rxn13877: $M_cpd17100_c + $M_cpd17065_c -> $M_cpd02229_c + $M_cpd17057_c; (vmaf_R_rxn13877/(kic_R_rxn13877_M_cpd17100_c*kmc_R_rxn13877_M_cpd17065_c)*M_cpd17100_c*c*M_cpd17065_c*c - vmar_R_rxn13877/(kic_R_rxn13877_M_cpd17057_c*kmc_R_rxn13877_M_cpd02229_c)*M_cpd02229_c*c*M_cpd17057_c*c)/(1 + M_cpd17100_c*c*M_cpd17065_c*c/(kic_R_rxn13877_M_cpd17100_c*kmc_R_rxn13877_M_cpd17065_c) + M_cpd17100_c*c/kic_R_rxn13877_M_cpd17100_c + M_cpd02229_c*c*M_cpd17057_c*c/(kic_R_rxn13877_M_cpd17057_c*kmc_R_rxn13877_M_cpd02229_c) + M_cpd17065_c*c/kic_R_rxn13877_M_cpd17065_c + M_cpd17057_c*c/kic_R_rxn13877_M_cpd17057_c + M_cpd02229_c*c/kic_R_rxn13877_M_cpd02229_c); R_rxn13877 is "Pseudomonas aeruginosa LPS B band synthesis";
    vmaf_R_rxn13877 = 1 mole_per_second; vmar_R_rxn13877 = 1 mole_per_second; kmc_R_rxn13877_M_cpd17065_c = 1 substance; kmc_R_rxn13877_M_cpd02229_c = 1 substance; kic_R_rxn13877_M_cpd02229_c = 1 substance; kic_R_rxn13877_M_cpd17057_c = 1 substance; kic_R_rxn13877_M_cpd17100_c = 1 substance; kic_R_rxn13877_M_cpd17065_c = 1 substance;
  // Reversibel rapid-equilibrium random order ternary-complex mechanism, two products
  // GENE_ASSOCIATION: (PA3157 or PA3156)
  // SUBSYSTEM: Amino sugar and nucleotide sugar metabolism
  // Confidence Level:
  // AUTHORS:
  R_rxn13913: $M_cpd11494_c + $M_cpd17094_c -> $M_cpd11493_c + $M_cpd17095_c; (vmaf_R_rxn13913/(kic_R_rxn13913_M_cpd11494_c*kmc_R_rxn13913_M_cpd17094_c)*M_cpd11494_c*c*M_cpd17094_c*c - vmar_R_rxn13913/(kic_R_rxn13913_M_cpd17095_c*kmc_R_rxn13913_M_cpd11493_c)*M_cpd11493_c*c*M_cpd17095_c*c)/(1 + M_cpd11494_c*c*M_cpd17094_c*c/(kic_R_rxn13913_M_cpd11494_c*kmc_R_rxn13913_M_cpd17094_c) + M_cpd11494_c*c/kic_R_rxn13913_M_cpd11494_c + M_cpd11493_c*c*M_cpd17095_c*c/(kic_R_rxn13913_M_cpd17095_c*kmc_R_rxn13913_M_cpd11493_c) + M_cpd17094_c*c/kic_R_rxn13913_M_cpd17094_c + M_cpd17095_c*c/kic_R_rxn13913_M_cpd17095_c + M_cpd11493_c*c/kic_R_rxn13913_M_cpd11493_c); R_rxn13913 is "UDP-N-acetyl-mannosamine (2NAc3N) acid acetylase";
    vmaf_R_rxn13913 = 1 mole_per_second; vmar_R_rxn13913 = 1 mole_per_second; kmc_R_rxn13913_M_cpd17094_c = 1 substance; kmc_R_rxn13913_M_cpd11493_c = 1 substance; kic_R_rxn13913_M_cpd11493_c = 1 substance; kic_R_rxn13913_M_cpd17095_c = 1 substance; kic_R_rxn13913_M_cpd11494_c = 1 substance; kic_R_rxn13913_M_cpd17094_c = 1 substance;
  // Irreversibel rapid-equilibrium random order ternary-complex mechanism, two products
  // GENE_ASSOCIATION: (PA4646 or PA0403)
  // SUBSYSTEM: Pyrimidine metabolism
  // EC Number: 2.4.2.9
  // Confidence Level:
  // AUTHORS:
  R_rxn00711: $M_cpd00092_c + $M_cpd00103_c => $M_cpd00012_c + $M_cpd00091_c; vmax_R_rxn00711*M_cpd00103_c*c*M_cpd00092_c*c/(kic_R_rxn00711_M_cpd00092_c*kmc_R_rxn00711_M_cpd00103_c + M_cpd00092_c*c*M_cpd00103_c*c + kmc_R_rxn00711_M_cpd00103_c*M_cpd00092_c*c + kmc_R_rxn00711_M_cpd00092_c*M_cpd00103_c*c); R_rxn00711 is "uracil phosphoribosyltransferase";  // hasProperty ec-code:2.4.2.9
    vmax_R_rxn00711 = 1 mole_per_second; kmc_R_rxn00711_M_cpd00092_c = 1 substance; kmc_R_rxn00711_M_cpd00103_c = 1 substance; kic_R_rxn00711_M_cpd00092_c = 1 substance;
  // Irreversibel rapid-equilibrium random order ternary-complex mechanism, two products
  // GENE_ASSOCIATION: (PA4742 or PA2975 or PA3246 or PA3114 or PA4544)
  // SUBSYSTEM: Pyrimidine metabolism
  // EC Number: 4.2.1.70
  // Confidence Level:
  // AUTHORS:
  R_rxn00776: $M_cpd00092_c + $M_cpd00101_c => $M_cpd00001_c + $M_cpd00859_c; vmax_R_rxn00776*M_cpd00101_c*c*M_cpd00092_c*c/(kic_R_rxn00776_M_cpd00092_c*kmc_R_rxn00776_M_cpd00101_c + M_cpd00092_c*c*M_cpd00101_c*c + kmc_R_rxn00776_M_cpd00101_c*M_cpd00092_c*c + kmc_R_rxn00776_M_cpd00092_c*M_cpd00101_c*c); R_rxn00776 is "yUMP synthetase";  // hasProperty ec-code:4.2.1.70
    vmax_R_rxn00776 = 1 mole_per_second; kmc_R_rxn00776_M_cpd00092_c = 1 substance; kmc_R_rxn00776_M_cpd00101_c = 1 substance; kic_R_rxn00776_M_cpd00092_c = 1 substance;
  // Thermodynamically independent convenience kinetics
  // GENE_ASSOCIATION: (PA5009 and PA5008)
  // SUBSYSTEM: Lipopolysaccharide biosynthesis
  // Confidence Level:
  // AUTHORS:
  R_rxn13870: 3 $M_cpd00002_c + $M_cpd17063_c => 3 $M_cpd00067_c + 3 $M_cpd00008_c + $M_cpd17064_c; vmag_R_rxn13870*((M_cpd00002_c*c/kmc_R_rxn13870_M_cpd00002_c)^3*(M_cpd17063_c*c/kmc_R_rxn13870_M_cpd17063_c)*sqrt((kG_M_cpd00002_c*kmc_R_rxn13870_M_cpd00002_c)^3*(kG_M_cpd17063_c*kmc_R_rxn13870_M_cpd17063_c)^1/((kG_M_cpd00067_c*kmc_R_rxn13870_M_cpd00067_c)^3*(kG_M_cpd17064_c*kmc_R_rxn13870_M_cpd17064_c)^1*(kG_M_cpd00008_c*kmc_R_rxn13870_M_cpd00008_c)^3))/((1 + M_cpd00002_c*c/kmc_R_rxn13870_M_cpd00002_c + (M_cpd00002_c*c/kmc_R_rxn13870_M_cpd00002_c)^2 + (M_cpd00002_c*c/kmc_R_rxn13870_M_cpd00002_c)^3)*(1 + M_cpd17063_c*c/kmc_R_rxn13870_M_cpd17063_c))); R_rxn13870 is "Pseudomonas aeruginosa LPS lumped 2,4,and 6 heptokinases";
    kmc_R_rxn13870_M_cpd00002_c = 1 substance; kmc_R_rxn13870_M_cpd17063_c = 1 substance; kmc_R_rxn13870_M_cpd00067_c = 1 substance; kmc_R_rxn13870_M_cpd00008_c = 1 substance; kmc_R_rxn13870_M_cpd17064_c = 1 substance; vmag_R_rxn13870 = 1 mole_per_second;
  // Thermodynamically independent convenience kinetics
  // GENE_ASSOCIATION: PA0006
  // SUBSYSTEM: Lipopolysaccharide biosynthesis
  // EC Number: 3.1.-.-
  // Confidence Level:
  // AUTHORS:
  R_rxn03919: $M_cpd00001_c + $M_cpd08316_c => $M_cpd00067_c + $M_cpd00009_c + $M_cpd04920_c; vmag_R_rxn03919*(M_cpd00001_c*c/kmc_R_rxn03919_M_cpd00001_c*(M_cpd08316_c*c/kmc_R_rxn03919_M_cpd08316_c)*sqrt((kG_M_cpd00001_c*kmc_R_rxn03919_M_cpd00001_c)^1*(kG_M_cpd08316_c*kmc_R_rxn03919_M_cpd08316_c)^1/((kG_M_cpd00067_c*kmc_R_rxn03919_M_cpd00067_c)^1*(kG_M_cpd04920_c*kmc_R_rxn03919_M_cpd04920_c)^1*(kG_M_cpd00009_c*kmc_R_rxn03919_M_cpd00009_c)^1))/((1 + M_cpd00001_c*c/kmc_R_rxn03919_M_cpd00001_c)*(1 + M_cpd08316_c*c/kmc_R_rxn03919_M_cpd08316_c))); R_rxn03919 is "D-glycero-D-manno-heptose 1,7-bisphosphate phosphatase";  // hasProperty ec-code:3.1.-.-
    kmc_R_rxn03919_M_cpd00001_c = 1 substance; kmc_R_rxn03919_M_cpd08316_c = 1 substance; kmc_R_rxn03919_M_cpd00067_c = 1 substance; kmc_R_rxn03919_M_cpd00009_c = 1 substance; kmc_R_rxn03919_M_cpd04920_c = 1 substance; vmag_R_rxn03919 = 1 mole_per_second;
  // Irreversibel rapid-equilibrium random order ternary-complex mechanism, two products
  // GENE_ASSOCIATION: PA0342
  // SUBSYSTEM: Pyrimidine metabolism
  // EC Number: 2.1.1.45
  // Confidence Level:
  // AUTHORS:
  R_rxn01520: $M_cpd00125_c + $M_cpd00299_c => $M_cpd00330_c + $M_cpd00298_c; vmax_R_rxn01520*M_cpd00299_c*c*M_cpd00125_c*c/(kic_R_rxn01520_M_cpd00125_c*kmc_R_rxn01520_M_cpd00299_c + M_cpd00125_c*c*M_cpd00299_c*c + kmc_R_rxn01520_M_cpd00299_c*M_cpd00125_c*c + kmc_R_rxn01520_M_cpd00125_c*M_cpd00299_c*c); R_rxn01520 is "thymidylate synthase";  // hasProperty ec-code:2.1.1.45
    vmax_R_rxn01520 = 1 mole_per_second; kmc_R_rxn01520_M_cpd00125_c = 1 substance; kmc_R_rxn01520_M_cpd00299_c = 1 substance; kic_R_rxn01520_M_cpd00125_c = 1 substance;
  // Thermodynamically independent convenience kinetics
  // GENE_ASSOCIATION: PA0402
  // SUBSYSTEM: Pyrimidine metabolism
  // EC Number: 2.1.3.2
  // Confidence Level:
  // AUTHORS:
  R_rxn01018: $M_cpd00041_c + $M_cpd00146_c => 2 $M_cpd00067_c + $M_cpd00009_c + $M_cpd00343_c; vmag_R_rxn01018*(M_cpd00041_c*c/kmc_R_rxn01018_M_cpd00041_c*(M_cpd00146_c*c/kmc_R_rxn01018_M_cpd00146_c)*sqrt((kG_M_cpd00041_c*kmc_R_rxn01018_M_cpd00041_c)^1*(kG_M_cpd00146_c*kmc_R_rxn01018_M_cpd00146_c)^1/((kG_M_cpd00067_c*kmc_R_rxn01018_M_cpd00067_c)^2*(kG_M_cpd00343_c*kmc_R_rxn01018_M_cpd00343_c)^1*(kG_M_cpd00009_c*kmc_R_rxn01018_M_cpd00009_c)^1))/((1 + M_cpd00041_c*c/kmc_R_rxn01018_M_cpd00041_c)*(1 + M_cpd00146_c*c/kmc_R_rxn01018_M_cpd00146_c))); R_rxn01018 is "aspartate carbamoyltransferase";  // hasProperty ec-code:2.1.3.2
    kmc_R_rxn01018_M_cpd00041_c = 1 substance; kmc_R_rxn01018_M_cpd00146_c = 1 substance; kmc_R_rxn01018_M_cpd00067_c = 1 substance; kmc_R_rxn01018_M_cpd00009_c = 1 substance; kmc_R_rxn01018_M_cpd00343_c = 1 substance; vmag_R_rxn01018 = 1 mole_per_second;
  // Thermodynamically independent convenience kinetics
  // GENE_ASSOCIATION: PA0437
  // SUBSYSTEM: Pyrimidine metabolism
  // EC Number: 3.5.4.1
  // Confidence Level:
  // AUTHORS:
  R_rxn00717: $M_cpd00067_c + $M_cpd00001_c + $M_cpd00307_c => $M_cpd00013_c + $M_cpd00092_c; vmag_R_rxn00717*(M_cpd00067_c*c/kmc_R_rxn00717_M_cpd00067_c*(M_cpd00307_c*c/kmc_R_rxn00717_M_cpd00307_c)*(M_cpd00001_c*c/kmc_R_rxn00717_M_cpd00001_c)*sqrt((kG_M_cpd00067_c*kmc_R_rxn00717_M_cpd00067_c)^1*(kG_M_cpd00307_c*kmc_R_rxn00717_M_cpd00307_c)^1*(kG_M_cpd00001_c*kmc_R_rxn00717_M_cpd00001_c)^1/((kG_M_cpd00013_c*kmc_R_rxn00717_M_cpd00013_c)^1*(kG_M_cpd00092_c*kmc_R_rxn00717_M_cpd00092_c)^1))/((1 + M_cpd00067_c*c/kmc_R_rxn00717_M_cpd00067_c)*(1 + M_cpd00307_c*c/kmc_R_rxn00717_M_cpd00307_c)*(1 + M_cpd00001_c*c/kmc_R_rxn00717_M_cpd00001_c))); R_rxn00717 is "Cytosine deaminase";  // hasProperty ec-code:3.5.4.1
    kmc_R_rxn00717_M_cpd00067_c = 1 substance; kmc_R_rxn00717_M_cpd00001_c = 1 substance; kmc_R_rxn00717_M_cpd00307_c = 1 substance; kmc_R_rxn00717_M_cpd00013_c = 1 substance; kmc_R_rxn00717_M_cpd00092_c = 1 substance; vmag_R_rxn00717 = 1 mole_per_second;
  // GENE_ASSOCIATION: PA1792
  // SUBSYSTEM: Lipopolysaccharide biosynthesis
  // Confidence Level:
  // AUTHORS:
  R_rxn13884: $M_cpd00001_c + $M_cpd17070_c -> 2 $M_cpd00067_c + $M_cpd00091_c + $M_cpd17069_c; (vmaf_R_rxn13884*(M_cpd00001_c*c/kmc_R_rxn13884_M_cpd00001_c)^hco_R_rxn13884*(M_cpd17070_c*c/kmc_R_rxn13884_M_cpd17070_c)^hco_R_rxn13884 - vmar_R_rxn13884*(M_cpd00067_c*c/kmc_R_rxn13884_M_cpd00067_c)^(2*hco_R_rxn13884)*(M_cpd00091_c*c/kmc_R_rxn13884_M_cpd00091_c)^hco_R_rxn13884*(M_cpd17069_c*c/kmc_R_rxn13884_M_cpd17069_c)^hco_R_rxn13884)/((1 + M_cpd00001_c*c/kmc_R_rxn13884_M_cpd00001_c)^hco_R_rxn13884*(1 + M_cpd17070_c*c/kmc_R_rxn13884_M_cpd17070_c)^hco_R_rxn13884 + (1 + M_cpd00067_c*c/kmc_R_rxn13884_M_cpd00067_c)^(2*hco_R_rxn13884)*(1 + M_cpd00091_c*c/kmc_R_rxn13884_M_cpd00091_c)^hco_R_rxn13884*(1 + M_cpd17069_c*c/kmc_R_rxn13884_M_cpd17069_c)^hco_R_rxn13884 - 1); R_rxn13884 is "UDP-diacyl-GlcN pyrophosphatase";
    vmaf_R_rxn13884 = 1 mole_per_second; hco_R_rxn13884 = 1 dimensionless; kmc_R_rxn13884_M_cpd00001_c = 1 substance; kmc_R_rxn13884_M_cpd17070_c = 1 substance; vmar_R_rxn13884 = 1 mole_per_second; kmc_R_rxn13884_M_cpd00067_c = 1 substance; kmc_R_rxn13884_M_cpd00091_c = 1 substance; kmc_R_rxn13884_M_cpd17069_c = 1 substance;
  // Reversibel rapid-equilibrium random order ternary-complex mechanism, two products
  // GENE_ASSOCIATION: PA2023
  // SUBSYSTEM: Lipopolysaccharide biosynthesis
  // Confidence Level:
  // AUTHORS:
  R_rxn00213: $M_cpd00062_c + $M_cpd00089_c -> $M_cpd00026_c + $M_cpd00012_c; (vmaf_R_rxn00213/(kic_R_rxn00213_M_cpd00062_c*kmc_R_rxn00213_M_cpd00089_c)*M_cpd00062_c*c*M_cpd00089_c*c - vmar_R_rxn00213/(kic_R_rxn00213_M_cpd00012_c*kmc_R_rxn00213_M_cpd00026_c)*M_cpd00026_c*c*M_cpd00012_c*c)/(1 + M_cpd00062_c*c*M_cpd00089_c*c/(kic_R_rxn00213_M_cpd00062_c*kmc_R_rxn00213_M_cpd00089_c) + M_cpd00062_c*c/kic_R_rxn00213_M_cpd00062_c + M_cpd00026_c*c*M_cpd00012_c*c/(kic_R_rxn00213_M_cpd00012_c*kmc_R_rxn00213_M_cpd00026_c) + M_cpd00089_c*c/kic_R_rxn00213_M_cpd00089_c + M_cpd00012_c*c/kic_R_rxn00213_M_cpd00012_c + M_cpd00026_c*c/kic_R_rxn00213_M_cpd00026_c); R_rxn00213 is "UTP-glucose-1-phosphate uridylyltransferase";
    vmaf_R_rxn00213 = 1 mole_per_second; vmar_R_rxn00213 = 1 mole_per_second; kmc_R_rxn00213_M_cpd00089_c = 1 substance; kmc_R_rxn00213_M_cpd00026_c = 1 substance; kic_R_rxn00213_M_cpd00026_c = 1 substance; kic_R_rxn00213_M_cpd00012_c = 1 substance; kic_R_rxn00213_M_cpd00062_c = 1 substance; kic_R_rxn00213_M_cpd00089_c = 1 substance;
  // Irreversibel rapid-equilibrium random order ternary-complex mechanism, two products
  // GENE_ASSOCIATION: PA2876
  // SUBSYSTEM: Pyrimidine metabolism
  // EC Number: 4.1.1.23
  // Confidence Level:
  // AUTHORS:
  R_rxn00710: $M_cpd00067_c + $M_cpd00810_c => $M_cpd00011_c + $M_cpd00091_c; vmax_R_rxn00710*M_cpd00810_c*c*M_cpd00067_c*c/(kic_R_rxn00710_M_cpd00067_c*kmc_R_rxn00710_M_cpd00810_c + M_cpd00067_c*c*M_cpd00810_c*c + kmc_R_rxn00710_M_cpd00810_c*M_cpd00067_c*c + kmc_R_rxn00710_M_cpd00067_c*M_cpd00810_c*c); R_rxn00710 is "orotidine-5'-phosphate decarboxylase";  // hasProperty ec-code:4.1.1.23
    vmax_R_rxn00710 = 1 mole_per_second; kmc_R_rxn00710_M_cpd00067_c = 1 substance; kmc_R_rxn00710_M_cpd00810_c = 1 substance; kic_R_rxn00710_M_cpd00067_c = 1 substance;
  // Reversibel rapid-equilibrium random order ternary-complex mechanism, two products
  // GENE_ASSOCIATION: PA2962
  // SUBSYSTEM: Pyrimidine metabolism
  // EC Number: 2.7.4.12,2.7.4.9
  // Confidence Level:
  // AUTHORS:
  R_rxn01513: $M_cpd00002_c + $M_cpd00298_c -> $M_cpd00008_c + $M_cpd00297_c; (vmaf_R_rxn01513/(kic_R_rxn01513_M_cpd00002_c*kmc_R_rxn01513_M_cpd00298_c)*M_cpd00002_c*c*M_cpd00298_c*c - vmar_R_rxn01513/(kic_R_rxn01513_M_cpd00297_c*kmc_R_rxn01513_M_cpd00008_c)*M_cpd00008_c*c*M_cpd00297_c*c)/(1 + M_cpd00002_c*c*M_cpd00298_c*c/(kic_R_rxn01513_M_cpd00002_c*kmc_R_rxn01513_M_cpd00298_c) + M_cpd00002_c*c/kic_R_rxn01513_M_cpd00002_c + M_cpd00008_c*c*M_cpd00297_c*c/(kic_R_rxn01513_M_cpd00297_c*kmc_R_rxn01513_M_cpd00008_c) + M_cpd00298_c*c/kic_R_rxn01513_M_cpd00298_c + M_cpd00297_c*c/kic_R_rxn01513_M_cpd00297_c + M_cpd00008_c*c/kic_R_rxn01513_M_cpd00008_c); R_rxn01513 is "dTMP kinase";  // hasProperty ec-code:2.7.4.12 ec-code:2.7.4.9
    vmaf_R_rxn01513 = 1 mole_per_second; vmar_R_rxn01513 = 1 mole_per_second; kmc_R_rxn01513_M_cpd00298_c = 1 substance; kmc_R_rxn01513_M_cpd00008_c = 1 substance; kic_R_rxn01513_M_cpd00008_c = 1 substance; kic_R_rxn01513_M_cpd00297_c = 1 substance; kic_R_rxn01513_M_cpd00002_c = 1 substance; kic_R_rxn01513_M_cpd00298_c = 1 substance;
  // Irreversibel rapid-equilibrium random order ternary-complex mechanism, two products
  // GENE_ASSOCIATION: PA2979
  // SUBSYSTEM: Lipopolysaccharide biosynthesis
  // EC Number: 2.7.7.38
  // Confidence Level:
  // AUTHORS:
  R_rxn02405: $M_cpd00052_c + $M_cpd00875_c => $M_cpd00012_c + $M_cpd02546_c; vmax_R_rxn02405*M_cpd00875_c*c*M_cpd00052_c*c/(kic_R_rxn02405_M_cpd00052_c*kmc_R_rxn02405_M_cpd00875_c + M_cpd00052_c*c*M_cpd00875_c*c + kmc_R_rxn02405_M_cpd00875_c*M_cpd00052_c*c + kmc_R_rxn02405_M_cpd00052_c*M_cpd00875_c*c); R_rxn02405 is "3-deoxy-manno-octulosonate cytidylyltransferase";  // hasProperty ec-code:2.7.7.38
    vmax_R_rxn02405 = 1 mole_per_second; kmc_R_rxn02405_M_cpd00052_c = 1 substance; kmc_R_rxn02405_M_cpd00875_c = 1 substance; kic_R_rxn02405_M_cpd00052_c = 1 substance;
  // GENE_ASSOCIATION: PA2981
  // SUBSYSTEM: Lipopolysaccharide biosynthesis
  // Confidence Level:
  // AUTHORS:
  R_rxn13880: $M_cpd00002_c + $M_cpd17067_c -> $M_cpd00067_c + $M_cpd00008_c + $M_cpd17068_c; (vmaf_R_rxn13880*(M_cpd00002_c*c/kmc_R_rxn13880_M_cpd00002_c)^hco_R_rxn13880*(M_cpd17067_c*c/kmc_R_rxn13880_M_cpd17067_c)^hco_R_rxn13880 - vmar_R_rxn13880*(M_cpd00067_c*c/kmc_R_rxn13880_M_cpd00067_c)^hco_R_rxn13880*(M_cpd00008_c*c/kmc_R_rxn13880_M_cpd00008_c)^hco_R_rxn13880*(M_cpd17068_c*c/kmc_R_rxn13880_M_cpd17068_c)^hco_R_rxn13880)/((1 + M_cpd00002_c*c/kmc_R_rxn13880_M_cpd00002_c)^hco_R_rxn13880*(1 + M_cpd17067_c*c/kmc_R_rxn13880_M_cpd17067_c)^hco_R_rxn13880 + (1 + M_cpd00067_c*c/kmc_R_rxn13880_M_cpd00067_c)^hco_R_rxn13880*(1 + M_cpd00008_c*c/kmc_R_rxn13880_M_cpd00008_c)^hco_R_rxn13880*(1 + M_cpd17068_c*c/kmc_R_rxn13880_M_cpd17068_c)^hco_R_rxn13880 - 1); R_rxn13880 is "Pseudomonas Tetraacyldisaccharide 4'kinase";
    vmaf_R_rxn13880 = 1 mole_per_second; hco_R_rxn13880 = 1 dimensionless; kmc_R_rxn13880_M_cpd00002_c = 1 substance; kmc_R_rxn13880_M_cpd17067_c = 1 substance; vmar_R_rxn13880 = 1 mole_per_second; kmc_R_rxn13880_M_cpd00067_c = 1 substance; kmc_R_rxn13880_M_cpd00008_c = 1 substance; kmc_R_rxn13880_M_cpd17068_c = 1 substance;
  // Irreversibel rapid-equilibrium random order ternary-complex mechanism, two products
  // GENE_ASSOCIATION: PA3050
  // SUBSYSTEM: Pyrimidine metabolism
  // EC Number: 1.3.3.1,1.3.99.11
  // Confidence Level:
  // AUTHORS:
  R_rxn01360: $M_cpd00007_c + $M_cpd00282_c => $M_cpd00025_c + $M_cpd00247_c; vmax_R_rxn01360*M_cpd00282_c*c*M_cpd00007_c*c/(kic_R_rxn01360_M_cpd00007_c*kmc_R_rxn01360_M_cpd00282_c + M_cpd00007_c*c*M_cpd00282_c*c + kmc_R_rxn01360_M_cpd00282_c*M_cpd00007_c*c + kmc_R_rxn01360_M_cpd00007_c*M_cpd00282_c*c); R_rxn01360 is "(S)-Dihydroorotateoxygen oxidoreductase";  // hasProperty ec-code:1.3.3.1 ec-code:1.3.99.11
    vmax_R_rxn01360 = 1 mole_per_second; kmc_R_rxn01360_M_cpd00007_c = 1 substance; kmc_R_rxn01360_M_cpd00282_c = 1 substance; kic_R_rxn01360_M_cpd00007_c = 1 substance;
  // Reversibel rapid-equilibrium random order ternary-complex mechanism, two products
  // GENE_ASSOCIATION: PA3050
  // SUBSYSTEM: Pyrimidine metabolism
  // Confidence Level:
  // AUTHORS:
  R_rxn08335: $M_cpd15560_c + $M_cpd00282_c -> $M_cpd15561_c + $M_cpd00247_c; (vmaf_R_rxn08335/(kic_R_rxn08335_M_cpd15560_c*kmc_R_rxn08335_M_cpd00282_c)*M_cpd15560_c*c*M_cpd00282_c*c - vmar_R_rxn08335/(kic_R_rxn08335_M_cpd00247_c*kmc_R_rxn08335_M_cpd15561_c)*M_cpd15561_c*c*M_cpd00247_c*c)/(1 + M_cpd15560_c*c*M_cpd00282_c*c/(kic_R_rxn08335_M_cpd15560_c*kmc_R_rxn08335_M_cpd00282_c) + M_cpd15560_c*c/kic_R_rxn08335_M_cpd15560_c + M_cpd15561_c*c*M_cpd00247_c*c/(kic_R_rxn08335_M_cpd00247_c*kmc_R_rxn08335_M_cpd15561_c) + M_cpd00282_c*c/kic_R_rxn08335_M_cpd00282_c + M_cpd00247_c*c/kic_R_rxn08335_M_cpd00247_c + M_cpd15561_c*c/kic_R_rxn08335_M_cpd15561_c); R_rxn08335 is "dihydoorotic acid dehydrogenase (quinone8)";
    vmaf_R_rxn08335 = 1 mole_per_second; vmar_R_rxn08335 = 1 mole_per_second; kmc_R_rxn08335_M_cpd00282_c = 1 substance; kmc_R_rxn08335_M_cpd15561_c = 1 substance; kic_R_rxn08335_M_cpd15561_c = 1 substance; kic_R_rxn08335_M_cpd00247_c = 1 substance; kic_R_rxn08335_M_cpd15560_c = 1 substance; kic_R_rxn08335_M_cpd00282_c = 1 substance;
  // Reversibel rapid-equilibrium random order ternary-complex mechanism, two products
  // GENE_ASSOCIATION: PA3050
  // SUBSYSTEM: Pyrimidine metabolism
  // Confidence Level:
  // AUTHORS:
  R_rJB00259: $M_cpd01351_c + $M_cpd00282_c -> $M_cJB00125_c + $M_cpd00247_c; (vmaf_R_rJB00259/(kic_R_rJB00259_M_cpd01351_c*kmc_R_rJB00259_M_cpd00282_c)*M_cpd01351_c*c*M_cpd00282_c*c - vmar_R_rJB00259/(kic_R_rJB00259_M_cpd00247_c*kmc_R_rJB00259_M_cJB00125_c)*M_cJB00125_c*c*M_cpd00247_c*c)/(1 + M_cpd01351_c*c*M_cpd00282_c*c/(kic_R_rJB00259_M_cpd01351_c*kmc_R_rJB00259_M_cpd00282_c) + M_cpd01351_c*c/kic_R_rJB00259_M_cpd01351_c + M_cJB00125_c*c*M_cpd00247_c*c/(kic_R_rJB00259_M_cpd00247_c*kmc_R_rJB00259_M_cJB00125_c) + M_cpd00282_c*c/kic_R_rJB00259_M_cpd00282_c + M_cpd00247_c*c/kic_R_rJB00259_M_cpd00247_c + M_cJB00125_c*c/kic_R_rJB00259_M_cJB00125_c); R_rJB00259 is "dihydoorotic acid dehydrogenase (quinone9)";
    vmaf_R_rJB00259 = 1 mole_per_second; vmar_R_rJB00259 = 1 mole_per_second; kmc_R_rJB00259_M_cpd00282_c = 1 substance; kmc_R_rJB00259_M_cJB00125_c = 1 substance; kic_R_rJB00259_M_cJB00125_c = 1 substance; kic_R_rJB00259_M_cpd00247_c = 1 substance; kic_R_rJB00259_M_cpd01351_c = 1 substance; kic_R_rJB00259_M_cpd00282_c = 1 substance;
  // Irreversibel rapid-equilibrium random order ternary-complex mechanism, two products
  // GENE_ASSOCIATION: PA3050
  // SUBSYSTEM: Pyrimidine metabolism
  // EC Number: 1.3.3.1
  // Confidence Level:
  // AUTHORS:
  R_rxn08336: $M_cpd15500_c + $M_cpd00282_c => $M_cpd00247_c + $M_cpd15499_c; vmax_R_rxn08336*M_cpd00282_c*c*M_cpd15500_c*c/(kic_R_rxn08336_M_cpd15500_c*kmc_R_rxn08336_M_cpd00282_c + M_cpd15500_c*c*M_cpd00282_c*c + kmc_R_rxn08336_M_cpd00282_c*M_cpd15500_c*c + kmc_R_rxn08336_M_cpd15500_c*M_cpd00282_c*c); R_rxn08336 is "dihydroorotic acid (menaquinone-8)";  // hasProperty ec-code:1.3.3.1
    vmax_R_rxn08336 = 1 mole_per_second; kmc_R_rxn08336_M_cpd15500_c = 1 substance; kmc_R_rxn08336_M_cpd00282_c = 1 substance; kic_R_rxn08336_M_cpd15500_c = 1 substance;
  // GENE_ASSOCIATION: PA3141
  // SUBSYSTEM: Amino sugar and nucleotide sugar metabolism
  // EC Number: 5.1.3.7
  // Confidence Level:
  // AUTHORS:
  R_rxn00295: $M_cpd00037_c -> $M_cpd00175_c; (vmaf_R_rxn00295/kmc_R_rxn00295_M_cpd00037_c*M_cpd00037_c*c - vmar_R_rxn00295/kmc_R_rxn00295_M_cpd00175_c*M_cpd00175_c*c)/(1 substance + M_cpd00037_c*c/kmc_R_rxn00295_M_cpd00037_c + M_cpd00175_c*c/kmc_R_rxn00295_M_cpd00175_c); R_rxn00295 is "UDP-N-acetylglucosamine 4-epimerase";  // hasProperty ec-code:5.1.3.7
    vmaf_R_rxn00295 = 1 mole_per_second; kmc_R_rxn00295_M_cpd00037_c = 1 substance; vmar_R_rxn00295 = 1 mole_per_second; kmc_R_rxn00295_M_cpd00175_c = 1 substance;
  // Reversibel rapid-equilibrium random order ternary-complex mechanism, two products
  // GENE_ASSOCIATION: PA3145
  // SUBSYSTEM: Lipopolysaccharide biosynthesis
  // Confidence Level:
  // AUTHORS:
  R_rxn13833: $M_cpd17092_c + $M_cpd00286_c -> $M_cpd00091_c + $M_cpd17098_c; (vmaf_R_rxn13833/(kic_R_rxn13833_M_cpd17092_c*kmc_R_rxn13833_M_cpd00286_c)*M_cpd17092_c*c*M_cpd00286_c*c - vmar_R_rxn13833/(kic_R_rxn13833_M_cpd17098_c*kmc_R_rxn13833_M_cpd00091_c)*M_cpd00091_c*c*M_cpd17098_c*c)/(1 + M_cpd17092_c*c*M_cpd00286_c*c/(kic_R_rxn13833_M_cpd17092_c*kmc_R_rxn13833_M_cpd00286_c) + M_cpd17092_c*c/kic_R_rxn13833_M_cpd17092_c + M_cpd00091_c*c*M_cpd17098_c*c/(kic_R_rxn13833_M_cpd17098_c*kmc_R_rxn13833_M_cpd00091_c) + M_cpd00286_c*c/kic_R_rxn13833_M_cpd00286_c + M_cpd17098_c*c/kic_R_rxn13833_M_cpd17098_c + M_cpd00091_c*c/kic_R_rxn13833_M_cpd00091_c); R_rxn13833 is "Fuc2NAc-PP-undecap synthesis";
    vmaf_R_rxn13833 = 1 mole_per_second; vmar_R_rxn13833 = 1 mole_per_second; kmc_R_rxn13833_M_cpd00286_c = 1 substance; kmc_R_rxn13833_M_cpd00091_c = 1 substance; kic_R_rxn13833_M_cpd00091_c = 1 substance; kic_R_rxn13833_M_cpd17098_c = 1 substance; kic_R_rxn13833_M_cpd17092_c = 1 substance; kic_R_rxn13833_M_cpd00286_c = 1 substance;
  // Reversibel rapid-equilibrium random order ternary-complex mechanism, two products
  // GENE_ASSOCIATION: PA3145
  // SUBSYSTEM: Lipopolysaccharide biosynthesis
  // EC Number: Undetermined
  // Confidence Level:
  // AUTHORS:
  R_rxn08040: $M_cpd00286_c + $M_cpd00037_c -> $M_cpd00091_c + $M_cpd00946_c; (vmaf_R_rxn08040/(kic_R_rxn08040_M_cpd00286_c*kmc_R_rxn08040_M_cpd00037_c)*M_cpd00286_c*c*M_cpd00037_c*c - vmar_R_rxn08040/(kic_R_rxn08040_M_cpd00946_c*kmc_R_rxn08040_M_cpd00091_c)*M_cpd00091_c*c*M_cpd00946_c*c)/(1 + M_cpd00286_c*c*M_cpd00037_c*c/(kic_R_rxn08040_M_cpd00286_c*kmc_R_rxn08040_M_cpd00037_c) + M_cpd00286_c*c/kic_R_rxn08040_M_cpd00286_c + M_cpd00091_c*c*M_cpd00946_c*c/(kic_R_rxn08040_M_cpd00946_c*kmc_R_rxn08040_M_cpd00091_c) + M_cpd00037_c*c/kic_R_rxn08040_M_cpd00037_c + M_cpd00946_c*c/kic_R_rxn08040_M_cpd00946_c + M_cpd00091_c*c/kic_R_rxn08040_M_cpd00091_c); R_rxn08040 is "GlcNac-pyrophosphorylundecaprenol synthesis";  // hasProperty ec-code:Undetermined
    vmaf_R_rxn08040 = 1 mole_per_second; vmar_R_rxn08040 = 1 mole_per_second; kmc_R_rxn08040_M_cpd00037_c = 1 substance; kmc_R_rxn08040_M_cpd00091_c = 1 substance; kic_R_rxn08040_M_cpd00091_c = 1 substance; kic_R_rxn08040_M_cpd00946_c = 1 substance; kic_R_rxn08040_M_cpd00286_c = 1 substance; kic_R_rxn08040_M_cpd00037_c = 1 substance;
  // Reversibel rapid-equilibrium random order ternary-complex mechanism, two products
  // GENE_ASSOCIATION: PA3147
  // SUBSYSTEM: Lipopolysaccharide biosynthesis
  // Confidence Level:
  // AUTHORS:
  R_rxn13922: $M_cpd17098_c + $M_cpd17093_c -> $M_cpd00091_c + $M_cpd17099_c; (vmaf_R_rxn13922/(kic_R_rxn13922_M_cpd17098_c*kmc_R_rxn13922_M_cpd17093_c)*M_cpd17098_c*c*M_cpd17093_c*c - vmar_R_rxn13922/(kic_R_rxn13922_M_cpd17099_c*kmc_R_rxn13922_M_cpd00091_c)*M_cpd00091_c*c*M_cpd17099_c*c)/(1 + M_cpd17098_c*c*M_cpd17093_c*c/(kic_R_rxn13922_M_cpd17098_c*kmc_R_rxn13922_M_cpd17093_c) + M_cpd17098_c*c/kic_R_rxn13922_M_cpd17098_c + M_cpd00091_c*c*M_cpd17099_c*c/(kic_R_rxn13922_M_cpd17099_c*kmc_R_rxn13922_M_cpd00091_c) + M_cpd17093_c*c/kic_R_rxn13922_M_cpd17093_c + M_cpd17099_c*c/kic_R_rxn13922_M_cpd17099_c + M_cpd00091_c*c/kic_R_rxn13922_M_cpd00091_c); R_rxn13922 is "Man(2NAc3NAc)A-(beta1,3)-Fuc2NAc-PP-undecap synthesis";
    vmaf_R_rxn13922 = 1 mole_per_second; vmar_R_rxn13922 = 1 mole_per_second; kmc_R_rxn13922_M_cpd17093_c = 1 substance; kmc_R_rxn13922_M_cpd00091_c = 1 substance; kic_R_rxn13922_M_cpd00091_c = 1 substance; kic_R_rxn13922_M_cpd17099_c = 1 substance; kic_R_rxn13922_M_cpd17098_c = 1 substance; kic_R_rxn13922_M_cpd17093_c = 1 substance;
  // GENE_ASSOCIATION: PA3148
  // SUBSYSTEM: Lipopolysaccharide biosynthesis
  // EC Number: 5.1.3.14
  // Confidence Level:
  // AUTHORS:
  R_rxn00297: $M_cpd00037_c -> $M_cpd00861_c; (vmaf_R_rxn00297/kmc_R_rxn00297_M_cpd00037_c*M_cpd00037_c*c - vmar_R_rxn00297/kmc_R_rxn00297_M_cpd00861_c*M_cpd00861_c*c)/(1 substance + M_cpd00037_c*c/kmc_R_rxn00297_M_cpd00037_c + M_cpd00861_c*c/kmc_R_rxn00297_M_cpd00861_c); R_rxn00297 is "UDP-N-acetylglucosamine 2-epimerase";  // hasProperty ec-code:5.1.3.14
    vmaf_R_rxn00297 = 1 mole_per_second; kmc_R_rxn00297_M_cpd00037_c = 1 substance; vmar_R_rxn00297 = 1 mole_per_second; kmc_R_rxn00297_M_cpd00861_c = 1 substance;
  // Reversibel rapid-equilibrium random order ternary-complex mechanism, two products
  // GENE_ASSOCIATION: PA3149
  // SUBSYSTEM: Lipopolysaccharide biosynthesis
  // Confidence Level:
  // AUTHORS:
  R_rxn13923: $M_cpd17095_c + $M_cpd17099_c -> $M_cpd17100_c + $M_cpd00091_c; (vmaf_R_rxn13923/(kic_R_rxn13923_M_cpd17095_c*kmc_R_rxn13923_M_cpd17099_c)*M_cpd17095_c*c*M_cpd17099_c*c - vmar_R_rxn13923/(kic_R_rxn13923_M_cpd00091_c*kmc_R_rxn13923_M_cpd17100_c)*M_cpd17100_c*c*M_cpd00091_c*c)/(1 + M_cpd17095_c*c*M_cpd17099_c*c/(kic_R_rxn13923_M_cpd17095_c*kmc_R_rxn13923_M_cpd17099_c) + M_cpd17095_c*c/kic_R_rxn13923_M_cpd17095_c + M_cpd17100_c*c*M_cpd00091_c*c/(kic_R_rxn13923_M_cpd00091_c*kmc_R_rxn13923_M_cpd17100_c) + M_cpd17099_c*c/kic_R_rxn13923_M_cpd17099_c + M_cpd00091_c*c/kic_R_rxn13923_M_cpd00091_c + M_cpd17100_c*c/kic_R_rxn13923_M_cpd17100_c); R_rxn13923 is "Man(2NAc3N)(3,-CH3C=NH)A-(beta1,4)-Man(2NAc3NAc)A-(beta1,3)-Fuc2NAc-PP-undecap synthesis";
    vmaf_R_rxn13923 = 1 mole_per_second; vmar_R_rxn13923 = 1 mole_per_second; kmc_R_rxn13923_M_cpd17099_c = 1 substance; kmc_R_rxn13923_M_cpd17100_c = 1 substance; kic_R_rxn13923_M_cpd17100_c = 1 substance; kic_R_rxn13923_M_cpd00091_c = 1 substance; kic_R_rxn13923_M_cpd17095_c = 1 substance; kic_R_rxn13923_M_cpd17099_c = 1 substance;
  // Reversibel rapid-equilibrium random order ternary-complex mechanism, two products
  // GENE_ASSOCIATION: PA3155
  // SUBSYSTEM: Lipopolysaccharide biosynthesis
  // Confidence Level:
  // AUTHORS:
  R_rxn13912: $M_cpd00013_c + $M_cpd00861_c -> $M_cpd00067_c + $M_cpd17096_c; (vmaf_R_rxn13912/(kic_R_rxn13912_M_cpd00013_c*kmc_R_rxn13912_M_cpd00861_c)*M_cpd00013_c*c*M_cpd00861_c*c - vmar_R_rxn13912/(kic_R_rxn13912_M_cpd17096_c*kmc_R_rxn13912_M_cpd00067_c)*M_cpd00067_c*c*M_cpd17096_c*c)/(1 + M_cpd00013_c*c*M_cpd00861_c*c/(kic_R_rxn13912_M_cpd00013_c*kmc_R_rxn13912_M_cpd00861_c) + M_cpd00013_c*c/kic_R_rxn13912_M_cpd00013_c + M_cpd00067_c*c*M_cpd17096_c*c/(kic_R_rxn13912_M_cpd17096_c*kmc_R_rxn13912_M_cpd00067_c) + M_cpd00861_c*c/kic_R_rxn13912_M_cpd00861_c + M_cpd17096_c*c/kic_R_rxn13912_M_cpd17096_c + M_cpd00067_c*c/kic_R_rxn13912_M_cpd00067_c); R_rxn13912 is "UDP-N-acetyl-mannosamine aminase";
    vmaf_R_rxn13912 = 1 mole_per_second; vmar_R_rxn13912 = 1 mole_per_second; kmc_R_rxn13912_M_cpd00861_c = 1 substance; kmc_R_rxn13912_M_cpd00067_c = 1 substance; kic_R_rxn13912_M_cpd00067_c = 1 substance; kic_R_rxn13912_M_cpd17096_c = 1 substance; kic_R_rxn13912_M_cpd00013_c = 1 substance; kic_R_rxn13912_M_cpd00861_c = 1 substance;
  // GENE_ASSOCIATION: PA3159
  // SUBSYSTEM: Lipopolysaccharide biosynthesis
  // Confidence Level:
  // AUTHORS:
  R_rxn13911: $M_cpd17096_c -> $M_cpd00067_c + $M_cpd17094_c; (vmaf_R_rxn13911*(M_cpd17096_c*c/kmc_R_rxn13911_M_cpd17096_c)^hco_R_rxn13911 - vmar_R_rxn13911*(M_cpd00067_c*c/kmc_R_rxn13911_M_cpd00067_c)^hco_R_rxn13911*(M_cpd17094_c*c/kmc_R_rxn13911_M_cpd17094_c)^hco_R_rxn13911)/((1 + M_cpd17096_c*c/kmc_R_rxn13911_M_cpd17096_c)^hco_R_rxn13911 + (1 + M_cpd00067_c*c/kmc_R_rxn13911_M_cpd00067_c)^hco_R_rxn13911*(1 + M_cpd17094_c*c/kmc_R_rxn13911_M_cpd17094_c)^hco_R_rxn13911 - 1); R_rxn13911 is "UDP-N-acetyl-mannosamine-3-N dehydrogenase";
    vmaf_R_rxn13911 = 1 mole_per_second; hco_R_rxn13911 = 1 dimensionless; kmc_R_rxn13911_M_cpd17096_c = 1 substance; vmar_R_rxn13911 = 1 mole_per_second; kmc_R_rxn13911_M_cpd00067_c = 1 substance; kmc_R_rxn13911_M_cpd17094_c = 1 substance;
  // Reversibel rapid-equilibrium random order ternary-complex mechanism, two products
  // GENE_ASSOCIATION: PA3163
  // SUBSYSTEM: Pyrimidine metabolism
  // EC Number: 2.7.4.14
  // Confidence Level:
  // AUTHORS:
  R_rxn00364: $M_cpd00002_c + $M_cpd00046_c -> $M_cpd00008_c + $M_cpd00096_c; (vmaf_R_rxn00364/(kic_R_rxn00364_M_cpd00002_c*kmc_R_rxn00364_M_cpd00046_c)*M_cpd00002_c*c*M_cpd00046_c*c - vmar_R_rxn00364/(kic_R_rxn00364_M_cpd00096_c*kmc_R_rxn00364_M_cpd00008_c)*M_cpd00008_c*c*M_cpd00096_c*c)/(1 + M_cpd00002_c*c*M_cpd00046_c*c/(kic_R_rxn00364_M_cpd00002_c*kmc_R_rxn00364_M_cpd00046_c) + M_cpd00002_c*c/kic_R_rxn00364_M_cpd00002_c + M_cpd00008_c*c*M_cpd00096_c*c/(kic_R_rxn00364_M_cpd00096_c*kmc_R_rxn00364_M_cpd00008_c) + M_cpd00046_c*c/kic_R_rxn00364_M_cpd00046_c + M_cpd00096_c*c/kic_R_rxn00364_M_cpd00096_c + M_cpd00008_c*c/kic_R_rxn00364_M_cpd00008_c); R_rxn00364 is "cytidylate kinase (CMP)";  // hasProperty ec-code:2.7.4.14
    vmaf_R_rxn00364 = 1 mole_per_second; vmar_R_rxn00364 = 1 mole_per_second; kmc_R_rxn00364_M_cpd00046_c = 1 substance; kmc_R_rxn00364_M_cpd00008_c = 1 substance; kic_R_rxn00364_M_cpd00008_c = 1 substance; kic_R_rxn00364_M_cpd00096_c = 1 substance; kic_R_rxn00364_M_cpd00002_c = 1 substance; kic_R_rxn00364_M_cpd00046_c = 1 substance;
  // Reversibel rapid-equilibrium random order ternary-complex mechanism, two products
  // GENE_ASSOCIATION: PA3163
  // SUBSYSTEM: Pyrimidine metabolism
  // EC Number: 2.7.4.14
  // Confidence Level:
  // AUTHORS:
  R_rxn01219: $M_cpd00002_c + $M_cpd00206_c -> $M_cpd00008_c + $M_cpd00533_c; (vmaf_R_rxn01219/(kic_R_rxn01219_M_cpd00002_c*kmc_R_rxn01219_M_cpd00206_c)*M_cpd00002_c*c*M_cpd00206_c*c - vmar_R_rxn01219/(kic_R_rxn01219_M_cpd00533_c*kmc_R_rxn01219_M_cpd00008_c)*M_cpd00008_c*c*M_cpd00533_c*c)/(1 + M_cpd00002_c*c*M_cpd00206_c*c/(kic_R_rxn01219_M_cpd00002_c*kmc_R_rxn01219_M_cpd00206_c) + M_cpd00002_c*c/kic_R_rxn01219_M_cpd00002_c + M_cpd00008_c*c*M_cpd00533_c*c/(kic_R_rxn01219_M_cpd00533_c*kmc_R_rxn01219_M_cpd00008_c) + M_cpd00206_c*c/kic_R_rxn01219_M_cpd00206_c + M_cpd00533_c*c/kic_R_rxn01219_M_cpd00533_c + M_cpd00008_c*c/kic_R_rxn01219_M_cpd00008_c); R_rxn01219 is "cytidylate kinase (dCMP)";  // hasProperty ec-code:2.7.4.14
    vmaf_R_rxn01219 = 1 mole_per_second; vmar_R_rxn01219 = 1 mole_per_second; kmc_R_rxn01219_M_cpd00206_c = 1 substance; kmc_R_rxn01219_M_cpd00008_c = 1 substance; kic_R_rxn01219_M_cpd00008_c = 1 substance; kic_R_rxn01219_M_cpd00533_c = 1 substance; kic_R_rxn01219_M_cpd00002_c = 1 substance; kic_R_rxn01219_M_cpd00206_c = 1 substance;
  // GENE_ASSOCIATION: PA3242
  // SUBSYSTEM: Lipopolysaccharide biosynthesis
  // Confidence Level:
  // AUTHORS:
  R_rxn13873: 2 $M_cpd11468_c + $M_cpd17068_c -> 2 $M_cpd11493_c + $M_cpd17066_c; (vmaf_R_rxn13873*(M_cpd11468_c*c/kmc_R_rxn13873_M_cpd11468_c)^(2*hco_R_rxn13873)*(M_cpd17068_c*c/kmc_R_rxn13873_M_cpd17068_c)^hco_R_rxn13873 - vmar_R_rxn13873*(M_cpd11493_c*c/kmc_R_rxn13873_M_cpd11493_c)^(2*hco_R_rxn13873)*(M_cpd17066_c*c/kmc_R_rxn13873_M_cpd17066_c)^hco_R_rxn13873)/((1 + M_cpd11468_c*c/kmc_R_rxn13873_M_cpd11468_c)^(2*hco_R_rxn13873)*(1 + M_cpd17068_c*c/kmc_R_rxn13873_M_cpd17068_c)^hco_R_rxn13873 + (1 + M_cpd11493_c*c/kmc_R_rxn13873_M_cpd11493_c)^(2*hco_R_rxn13873)*(1 + M_cpd17066_c*c/kmc_R_rxn13873_M_cpd17066_c)^hco_R_rxn13873 - 1); R_rxn13873 is "Pseudomonas lipid A reaction 2";
    vmaf_R_rxn13873 = 1 mole_per_second; hco_R_rxn13873 = 1 dimensionless; kmc_R_rxn13873_M_cpd11468_c = 1 substance; kmc_R_rxn13873_M_cpd17068_c = 1 substance; vmar_R_rxn13873 = 1 mole_per_second; kmc_R_rxn13873_M_cpd11493_c = 1 substance; kmc_R_rxn13873_M_cpd17066_c = 1 substance;
  // GENE_ASSOCIATION: PA3337
  // SUBSYSTEM: Lipopolysaccharide biosynthesis
  // Confidence Level:
  // AUTHORS:
  R_rxn03511: $M_cpd03830_c => $M_cpd03831_c; vmax_R_rxn03511*M_cpd03830_c*c/(kmc_R_rxn03511_M_cpd03830_c + M_cpd03830_c*c); R_rxn03511 is "ADP-D-glycero-D-manno-heptose epimerase";
    vmax_R_rxn03511 = 1 mole_per_second; kmc_R_rxn03511_M_cpd03830_c = 1 substance;
  // Thermodynamically independent convenience kinetics
  // GENE_ASSOCIATION: PA3480
  // SUBSYSTEM: Pyrimidine metabolism
  // EC Number: 3.5.4.13
  // Confidence Level:
  // AUTHORS:
  R_rxn01672: $M_cpd00067_c + $M_cpd00001_c + $M_cpd00356_c => $M_cpd00013_c + $M_cpd00358_c; vmag_R_rxn01672*(M_cpd00067_c*c/kmc_R_rxn01672_M_cpd00067_c*(M_cpd00356_c*c/kmc_R_rxn01672_M_cpd00356_c)*(M_cpd00001_c*c/kmc_R_rxn01672_M_cpd00001_c)*sqrt((kG_M_cpd00067_c*kmc_R_rxn01672_M_cpd00067_c)^1*(kG_M_cpd00356_c*kmc_R_rxn01672_M_cpd00356_c)^1*(kG_M_cpd00001_c*kmc_R_rxn01672_M_cpd00001_c)^1/((kG_M_cpd00013_c*kmc_R_rxn01672_M_cpd00013_c)^1*(kG_M_cpd00358_c*kmc_R_rxn01672_M_cpd00358_c)^1))/((1 + M_cpd00067_c*c/kmc_R_rxn01672_M_cpd00067_c)*(1 + M_cpd00356_c*c/kmc_R_rxn01672_M_cpd00356_c)*(1 + M_cpd00001_c*c/kmc_R_rxn01672_M_cpd00001_c))); R_rxn01672 is "dCTP deaminase";  // hasProperty ec-code:3.5.4.13
    kmc_R_rxn01672_M_cpd00067_c = 1 substance; kmc_R_rxn01672_M_cpd00001_c = 1 substance; kmc_R_rxn01672_M_cpd00356_c = 1 substance; kmc_R_rxn01672_M_cpd00013_c = 1 substance; kmc_R_rxn01672_M_cpd00358_c = 1 substance; vmag_R_rxn01672 = 1 mole_per_second;
  // Reversibel rapid-equilibrium random order ternary-complex mechanism, two products
  // GENE_ASSOCIATION: PA3527
  // SUBSYSTEM: Pyrimidine metabolism
  // EC Number: 3.5.2.3
  // Confidence Level:
  // AUTHORS:
  R_rxn01465: $M_cpd00001_c + $M_cpd00282_c -> $M_cpd00067_c + $M_cpd00343_c; (vmaf_R_rxn01465/(kic_R_rxn01465_M_cpd00001_c*kmc_R_rxn01465_M_cpd00282_c)*M_cpd00001_c*c*M_cpd00282_c*c - vmar_R_rxn01465/(kic_R_rxn01465_M_cpd00343_c*kmc_R_rxn01465_M_cpd00067_c)*M_cpd00067_c*c*M_cpd00343_c*c)/(1 + M_cpd00001_c*c*M_cpd00282_c*c/(kic_R_rxn01465_M_cpd00001_c*kmc_R_rxn01465_M_cpd00282_c) + M_cpd00001_c*c/kic_R_rxn01465_M_cpd00001_c + M_cpd00067_c*c*M_cpd00343_c*c/(kic_R_rxn01465_M_cpd00343_c*kmc_R_rxn01465_M_cpd00067_c) + M_cpd00282_c*c/kic_R_rxn01465_M_cpd00282_c + M_cpd00343_c*c/kic_R_rxn01465_M_cpd00343_c + M_cpd00067_c*c/kic_R_rxn01465_M_cpd00067_c); R_rxn01465 is "dihydroorotase";  // hasProperty ec-code:3.5.2.3
    vmaf_R_rxn01465 = 1 mole_per_second; vmar_R_rxn01465 = 1 mole_per_second; kmc_R_rxn01465_M_cpd00282_c = 1 substance; kmc_R_rxn01465_M_cpd00067_c = 1 substance; kic_R_rxn01465_M_cpd00067_c = 1 substance; kic_R_rxn01465_M_cpd00343_c = 1 substance; kic_R_rxn01465_M_cpd00001_c = 1 substance; kic_R_rxn01465_M_cpd00282_c = 1 substance;
  // Thermodynamically independent convenience kinetics
  // GENE_ASSOCIATION: PA3625
  // SUBSYSTEM: Pyrimidine metabolism
  // EC Number: 3.1.3.5
  // Confidence Level:
  // AUTHORS:
  R_rxn00363: $M_cpd00001_c + $M_cpd00046_c => $M_cpd00067_c + $M_cpd00009_c + $M_cpd00367_c; vmag_R_rxn00363*(M_cpd00001_c*c/kmc_R_rxn00363_M_cpd00001_c*(M_cpd00046_c*c/kmc_R_rxn00363_M_cpd00046_c)*sqrt((kG_M_cpd00001_c*kmc_R_rxn00363_M_cpd00001_c)^1*(kG_M_cpd00046_c*kmc_R_rxn00363_M_cpd00046_c)^1/((kG_M_cpd00067_c*kmc_R_rxn00363_M_cpd00067_c)^1*(kG_M_cpd00367_c*kmc_R_rxn00363_M_cpd00367_c)^1*(kG_M_cpd00009_c*kmc_R_rxn00363_M_cpd00009_c)^1))/((1 + M_cpd00001_c*c/kmc_R_rxn00363_M_cpd00001_c)*(1 + M_cpd00046_c*c/kmc_R_rxn00363_M_cpd00046_c))); R_rxn00363 is "5'-nucleotidase (CMP)";  // hasProperty ec-code:3.1.3.5
    kmc_R_rxn00363_M_cpd00001_c = 1 substance; kmc_R_rxn00363_M_cpd00046_c = 1 substance; kmc_R_rxn00363_M_cpd00067_c = 1 substance; kmc_R_rxn00363_M_cpd00009_c = 1 substance; kmc_R_rxn00363_M_cpd00367_c = 1 substance; vmag_R_rxn00363 = 1 mole_per_second;
  // Thermodynamically independent convenience kinetics
  // GENE_ASSOCIATION: PA3625
  // SUBSYSTEM: Pyrimidine metabolism
  // EC Number: 3.1.3.5
  // Confidence Level:
  // AUTHORS:
  R_rxn01218: $M_cpd00001_c + $M_cpd00206_c => $M_cpd00067_c + $M_cpd00009_c + $M_cpd00654_c; vmag_R_rxn01218*(M_cpd00001_c*c/kmc_R_rxn01218_M_cpd00001_c*(M_cpd00206_c*c/kmc_R_rxn01218_M_cpd00206_c)*sqrt((kG_M_cpd00001_c*kmc_R_rxn01218_M_cpd00001_c)^1*(kG_M_cpd00206_c*kmc_R_rxn01218_M_cpd00206_c)^1/((kG_M_cpd00067_c*kmc_R_rxn01218_M_cpd00067_c)^1*(kG_M_cpd00654_c*kmc_R_rxn01218_M_cpd00654_c)^1*(kG_M_cpd00009_c*kmc_R_rxn01218_M_cpd00009_c)^1))/((1 + M_cpd00001_c*c/kmc_R_rxn01218_M_cpd00001_c)*(1 + M_cpd00206_c*c/kmc_R_rxn01218_M_cpd00206_c))); R_rxn01218 is "5'-nucleotidase (dCMP)";  // hasProperty ec-code:3.1.3.5
    kmc_R_rxn01218_M_cpd00001_c = 1 substance; kmc_R_rxn01218_M_cpd00206_c = 1 substance; kmc_R_rxn01218_M_cpd00067_c = 1 substance; kmc_R_rxn01218_M_cpd00009_c = 1 substance; kmc_R_rxn01218_M_cpd00654_c = 1 substance; vmag_R_rxn01218 = 1 mole_per_second;
  // Thermodynamically independent convenience kinetics
  // GENE_ASSOCIATION: PA3625
  // SUBSYSTEM: Pyrimidine metabolism
  // EC Number: 3.1.3.5
  // Confidence Level:
  // AUTHORS:
  R_rxn01145: $M_cpd00001_c + $M_cpd00298_c => $M_cpd00067_c + $M_cpd00009_c + $M_cpd00184_c; vmag_R_rxn01145*(M_cpd00001_c*c/kmc_R_rxn01145_M_cpd00001_c*(M_cpd00298_c*c/kmc_R_rxn01145_M_cpd00298_c)*sqrt((kG_M_cpd00001_c*kmc_R_rxn01145_M_cpd00001_c)^1*(kG_M_cpd00298_c*kmc_R_rxn01145_M_cpd00298_c)^1/((kG_M_cpd00067_c*kmc_R_rxn01145_M_cpd00067_c)^1*(kG_M_cpd00184_c*kmc_R_rxn01145_M_cpd00184_c)^1*(kG_M_cpd00009_c*kmc_R_rxn01145_M_cpd00009_c)^1))/((1 + M_cpd00001_c*c/kmc_R_rxn01145_M_cpd00001_c)*(1 + M_cpd00298_c*c/kmc_R_rxn01145_M_cpd00298_c))); R_rxn01145 is "5'-nucleotidase (dTMP)";  // hasProperty ec-code:3.1.3.5
    kmc_R_rxn01145_M_cpd00001_c = 1 substance; kmc_R_rxn01145_M_cpd00298_c = 1 substance; kmc_R_rxn01145_M_cpd00067_c = 1 substance; kmc_R_rxn01145_M_cpd00009_c = 1 substance; kmc_R_rxn01145_M_cpd00184_c = 1 substance; vmag_R_rxn01145 = 1 mole_per_second;
  // Thermodynamically independent convenience kinetics
  // GENE_ASSOCIATION: PA3625
  // SUBSYSTEM: Pyrimidine metabolism
  // EC Number: 3.1.3.5
  // Confidence Level:
  // AUTHORS:
  R_rxn00708: $M_cpd00001_c + $M_cpd00091_c => $M_cpd00067_c + $M_cpd00009_c + $M_cpd00249_c; vmag_R_rxn00708*(M_cpd00001_c*c/kmc_R_rxn00708_M_cpd00001_c*(M_cpd00091_c*c/kmc_R_rxn00708_M_cpd00091_c)*sqrt((kG_M_cpd00001_c*kmc_R_rxn00708_M_cpd00001_c)^1*(kG_M_cpd00091_c*kmc_R_rxn00708_M_cpd00091_c)^1/((kG_M_cpd00067_c*kmc_R_rxn00708_M_cpd00067_c)^1*(kG_M_cpd00249_c*kmc_R_rxn00708_M_cpd00249_c)^1*(kG_M_cpd00009_c*kmc_R_rxn00708_M_cpd00009_c)^1))/((1 + M_cpd00001_c*c/kmc_R_rxn00708_M_cpd00001_c)*(1 + M_cpd00091_c*c/kmc_R_rxn00708_M_cpd00091_c))); R_rxn00708 is "5'-nucleotidase (UMP)";  // hasProperty ec-code:3.1.3.5
    kmc_R_rxn00708_M_cpd00001_c = 1 substance; kmc_R_rxn00708_M_cpd00091_c = 1 substance; kmc_R_rxn00708_M_cpd00067_c = 1 substance; kmc_R_rxn00708_M_cpd00009_c = 1 substance; kmc_R_rxn00708_M_cpd00249_c = 1 substance; vmag_R_rxn00708 = 1 mole_per_second;
  // Thermodynamically independent convenience kinetics
  // GENE_ASSOCIATION: PA3636
  // SUBSYSTEM: Lipopolysaccharide biosynthesis
  // EC Number: 2.5.1.55,4.1.2.16
  // Confidence Level:
  // AUTHORS:
  R_rxn02331: $M_cpd00001_c + $M_cpd00061_c + $M_cpd00817_c => $M_cpd00067_c + $M_cpd00009_c + $M_cpd02730_c; vmag_R_rxn02331*(M_cpd00001_c*c/kmc_R_rxn02331_M_cpd00001_c*(M_cpd00817_c*c/kmc_R_rxn02331_M_cpd00817_c)*(M_cpd00061_c*c/kmc_R_rxn02331_M_cpd00061_c)*sqrt((kG_M_cpd00001_c*kmc_R_rxn02331_M_cpd00001_c)^1*(kG_M_cpd00817_c*kmc_R_rxn02331_M_cpd00817_c)^1*(kG_M_cpd00061_c*kmc_R_rxn02331_M_cpd00061_c)^1/((kG_M_cpd00067_c*kmc_R_rxn02331_M_cpd00067_c)^1*(kG_M_cpd02730_c*kmc_R_rxn02331_M_cpd02730_c)^1*(kG_M_cpd00009_c*kmc_R_rxn02331_M_cpd00009_c)^1))/((1 + M_cpd00001_c*c/kmc_R_rxn02331_M_cpd00001_c)*(1 + M_cpd00817_c*c/kmc_R_rxn02331_M_cpd00817_c)*(1 + M_cpd00061_c*c/kmc_R_rxn02331_M_cpd00061_c))); R_rxn02331 is "2-dehydro-3-deoxy-phosphooctonate aldolase";  // hasProperty ec-code:2.5.1.55 ec-code:4.1.2.16
    kmc_R_rxn02331_M_cpd00001_c = 1 substance; kmc_R_rxn02331_M_cpd00061_c = 1 substance; kmc_R_rxn02331_M_cpd00817_c = 1 substance; kmc_R_rxn02331_M_cpd00067_c = 1 substance; kmc_R_rxn02331_M_cpd00009_c = 1 substance; kmc_R_rxn02331_M_cpd02730_c = 1 substance; vmag_R_rxn02331 = 1 mole_per_second;
  // Thermodynamically independent convenience kinetics
  // GENE_ASSOCIATION: PA3637
  // SUBSYSTEM: Pyrimidine metabolism
  // EC Number: 6.3.4.2
  // Confidence Level:
  // AUTHORS:
  R_rxn00412: $M_cpd00001_c + $M_cpd00002_c + $M_cpd00053_c + $M_cpd00062_c => 2 $M_cpd00067_c + $M_cpd00009_c + $M_cpd00008_c + $M_cpd00023_c + $M_cpd00052_c; vmag_R_rxn00412*(M_cpd00001_c*c/kmc_R_rxn00412_M_cpd00001_c*(M_cpd00062_c*c/kmc_R_rxn00412_M_cpd00062_c)*(M_cpd00002_c*c/kmc_R_rxn00412_M_cpd00002_c)*(M_cpd00053_c*c/kmc_R_rxn00412_M_cpd00053_c)*sqrt((kG_M_cpd00001_c*kmc_R_rxn00412_M_cpd00001_c)^1*(kG_M_cpd00062_c*kmc_R_rxn00412_M_cpd00062_c)^1*(kG_M_cpd00002_c*kmc_R_rxn00412_M_cpd00002_c)^1*(kG_M_cpd00053_c*kmc_R_rxn00412_M_cpd00053_c)^1/((kG_M_cpd00067_c*kmc_R_rxn00412_M_cpd00067_c)^2*(kG_M_cpd00052_c*kmc_R_rxn00412_M_cpd00052_c)^1*(kG_M_cpd00009_c*kmc_R_rxn00412_M_cpd00009_c)^1*(kG_M_cpd00023_c*kmc_R_rxn00412_M_cpd00023_c)^1*(kG_M_cpd00008_c*kmc_R_rxn00412_M_cpd00008_c)^1))/((1 + M_cpd00001_c*c/kmc_R_rxn00412_M_cpd00001_c)*(1 + M_cpd00062_c*c/kmc_R_rxn00412_M_cpd00062_c)*(1 + M_cpd00002_c*c/kmc_R_rxn00412_M_cpd00002_c)*(1 + M_cpd00053_c*c/kmc_R_rxn00412_M_cpd00053_c))); R_rxn00412 is "CTP synthase (glutamine)";  // hasProperty ec-code:6.3.4.2
    kmc_R_rxn00412_M_cpd00001_c = 1 substance; kmc_R_rxn00412_M_cpd00002_c = 1 substance; kmc_R_rxn00412_M_cpd00053_c = 1 substance; kmc_R_rxn00412_M_cpd00062_c = 1 substance; kmc_R_rxn00412_M_cpd00067_c = 1 substance; kmc_R_rxn00412_M_cpd00009_c = 1 substance; kmc_R_rxn00412_M_cpd00008_c = 1 substance; kmc_R_rxn00412_M_cpd00023_c = 1 substance; kmc_R_rxn00412_M_cpd00052_c = 1 substance; vmag_R_rxn00412 = 1 mole_per_second;
  // GENE_ASSOCIATION: PA3637
  // SUBSYSTEM: Pyrimidine metabolism
  // EC Number: 6.3.4.2
  // Confidence Level:
  // AUTHORS:
  R_rxn00410: $M_cpd00002_c + $M_cpd00013_c + $M_cpd00062_c -> 2 $M_cpd00067_c + $M_cpd00009_c + $M_cpd00008_c + $M_cpd00052_c; (vmaf_R_rxn00410*(M_cpd00002_c*c/kmc_R_rxn00410_M_cpd00002_c)^hco_R_rxn00410*(M_cpd00013_c*c/kmc_R_rxn00410_M_cpd00013_c)^hco_R_rxn00410*(M_cpd00062_c*c/kmc_R_rxn00410_M_cpd00062_c)^hco_R_rxn00410 - vmar_R_rxn00410*(M_cpd00067_c*c/kmc_R_rxn00410_M_cpd00067_c)^(2*hco_R_rxn00410)*(M_cpd00009_c*c/kmc_R_rxn00410_M_cpd00009_c)^hco_R_rxn00410*(M_cpd00008_c*c/kmc_R_rxn00410_M_cpd00008_c)^hco_R_rxn00410*(M_cpd00052_c*c/kmc_R_rxn00410_M_cpd00052_c)^hco_R_rxn00410)/((1 + M_cpd00002_c*c/kmc_R_rxn00410_M_cpd00002_c)^hco_R_rxn00410*(1 + M_cpd00013_c*c/kmc_R_rxn00410_M_cpd00013_c)^hco_R_rxn00410*(1 + M_cpd00062_c*c/kmc_R_rxn00410_M_cpd00062_c)^hco_R_rxn00410 + (1 + M_cpd00067_c*c/kmc_R_rxn00410_M_cpd00067_c)^(2*hco_R_rxn00410)*(1 + M_cpd00009_c*c/kmc_R_rxn00410_M_cpd00009_c)^hco_R_rxn00410*(1 + M_cpd00008_c*c/kmc_R_rxn00410_M_cpd00008_c)^hco_R_rxn00410*(1 + M_cpd00052_c*c/kmc_R_rxn00410_M_cpd00052_c)^hco_R_rxn00410 - 1); R_rxn00410 is "UTPammonia ligase(ADP-forming)";  // hasProperty ec-code:6.3.4.2
    vmaf_R_rxn00410 = 1 mole_per_second; hco_R_rxn00410 = 1 dimensionless; kmc_R_rxn00410_M_cpd00002_c = 1 substance; kmc_R_rxn00410_M_cpd00013_c = 1 substance; kmc_R_rxn00410_M_cpd00062_c = 1 substance; vmar_R_rxn00410 = 1 mole_per_second; kmc_R_rxn00410_M_cpd00067_c = 1 substance; kmc_R_rxn00410_M_cpd00009_c = 1 substance; kmc_R_rxn00410_M_cpd00008_c = 1 substance; kmc_R_rxn00410_M_cpd00052_c = 1 substance;
  // GENE_ASSOCIATION: PA3643
  // SUBSYSTEM: Lipopolysaccharide biosynthesis
  // EC Number: 2.4.1.182
  // Confidence Level:
  // AUTHORS:
  R_rxn13874: $M_cpd17070_c + $M_cpd17069_c -> $M_cpd00067_c + $M_cpd00014_c + $M_cpd17067_c; (vmaf_R_rxn13874*(M_cpd17070_c*c/kmc_R_rxn13874_M_cpd17070_c)^hco_R_rxn13874*(M_cpd17069_c*c/kmc_R_rxn13874_M_cpd17069_c)^hco_R_rxn13874 - vmar_R_rxn13874*(M_cpd00067_c*c/kmc_R_rxn13874_M_cpd00067_c)^hco_R_rxn13874*(M_cpd00014_c*c/kmc_R_rxn13874_M_cpd00014_c)^hco_R_rxn13874*(M_cpd17067_c*c/kmc_R_rxn13874_M_cpd17067_c)^hco_R_rxn13874)/((1 + M_cpd17070_c*c/kmc_R_rxn13874_M_cpd17070_c)^hco_R_rxn13874*(1 + M_cpd17069_c*c/kmc_R_rxn13874_M_cpd17069_c)^hco_R_rxn13874 + (1 + M_cpd00067_c*c/kmc_R_rxn13874_M_cpd00067_c)^hco_R_rxn13874*(1 + M_cpd00014_c*c/kmc_R_rxn13874_M_cpd00014_c)^hco_R_rxn13874*(1 + M_cpd17067_c*c/kmc_R_rxn13874_M_cpd17067_c)^hco_R_rxn13874 - 1); R_rxn13874 is "pseudomonas Lipid A disaccaride synthase";  // hasProperty ec-code:2.4.1.182
    vmaf_R_rxn13874 = 1 mole_per_second; hco_R_rxn13874 = 1 dimensionless; kmc_R_rxn13874_M_cpd17070_c = 1 substance; kmc_R_rxn13874_M_cpd17069_c = 1 substance; vmar_R_rxn13874 = 1 mole_per_second; kmc_R_rxn13874_M_cpd00067_c = 1 substance; kmc_R_rxn13874_M_cpd00014_c = 1 substance; kmc_R_rxn13874_M_cpd17067_c = 1 substance;
  // Reversibel rapid-equilibrium random order ternary-complex mechanism, two products
  // GENE_ASSOCIATION: PA3644
  // SUBSYSTEM: Lipopolysaccharide biosynthesis
  // Confidence Level:
  // AUTHORS:
  R_rxn13882: $M_cpd11482_c + $M_cpd00037_c -> $M_cpd11493_c + $M_cpd17071_c; (vmaf_R_rxn13882/(kic_R_rxn13882_M_cpd11482_c*kmc_R_rxn13882_M_cpd00037_c)*M_cpd11482_c*c*M_cpd00037_c*c - vmar_R_rxn13882/(kic_R_rxn13882_M_cpd17071_c*kmc_R_rxn13882_M_cpd11493_c)*M_cpd11493_c*c*M_cpd17071_c*c)/(1 + M_cpd11482_c*c*M_cpd00037_c*c/(kic_R_rxn13882_M_cpd11482_c*kmc_R_rxn13882_M_cpd00037_c) + M_cpd11482_c*c/kic_R_rxn13882_M_cpd11482_c + M_cpd11493_c*c*M_cpd17071_c*c/(kic_R_rxn13882_M_cpd17071_c*kmc_R_rxn13882_M_cpd11493_c) + M_cpd00037_c*c/kic_R_rxn13882_M_cpd00037_c + M_cpd17071_c*c/kic_R_rxn13882_M_cpd17071_c + M_cpd11493_c*c/kic_R_rxn13882_M_cpd11493_c); R_rxn13882 is "acyl-[acyl-carrier-protein]-UDP-N-acetylglucosamine O-acyltransferase";
    vmaf_R_rxn13882 = 1 mole_per_second; vmar_R_rxn13882 = 1 mole_per_second; kmc_R_rxn13882_M_cpd00037_c = 1 substance; kmc_R_rxn13882_M_cpd11493_c = 1 substance; kic_R_rxn13882_M_cpd11493_c = 1 substance; kic_R_rxn13882_M_cpd17071_c = 1 substance; kic_R_rxn13882_M_cpd11482_c = 1 substance; kic_R_rxn13882_M_cpd00037_c = 1 substance;
  // GENE_ASSOCIATION: PA3646
  // SUBSYSTEM: Lipopolysaccharide biosynthesis
  // Confidence Level:
  // AUTHORS:
  R_rxn13881: $M_cpd11480_c + $M_cpd17072_c -> $M_cpd00067_c + $M_cpd11493_c + $M_cpd17070_c; (vmaf_R_rxn13881*(M_cpd11480_c*c/kmc_R_rxn13881_M_cpd11480_c)^hco_R_rxn13881*(M_cpd17072_c*c/kmc_R_rxn13881_M_cpd17072_c)^hco_R_rxn13881 - vmar_R_rxn13881*(M_cpd00067_c*c/kmc_R_rxn13881_M_cpd00067_c)^hco_R_rxn13881*(M_cpd11493_c*c/kmc_R_rxn13881_M_cpd11493_c)^hco_R_rxn13881*(M_cpd17070_c*c/kmc_R_rxn13881_M_cpd17070_c)^hco_R_rxn13881)/((1 + M_cpd11480_c*c/kmc_R_rxn13881_M_cpd11480_c)^hco_R_rxn13881*(1 + M_cpd17072_c*c/kmc_R_rxn13881_M_cpd17072_c)^hco_R_rxn13881 + (1 + M_cpd00067_c*c/kmc_R_rxn13881_M_cpd00067_c)^hco_R_rxn13881*(1 + M_cpd11493_c*c/kmc_R_rxn13881_M_cpd11493_c)^hco_R_rxn13881*(1 + M_cpd17070_c*c/kmc_R_rxn13881_M_cpd17070_c)^hco_R_rxn13881 - 1); R_rxn13881 is "Pseudomonas UDP-3-O-(acyl)glucosamine acyltransferase";
    vmaf_R_rxn13881 = 1 mole_per_second; hco_R_rxn13881 = 1 dimensionless; kmc_R_rxn13881_M_cpd11480_c = 1 substance; kmc_R_rxn13881_M_cpd17072_c = 1 substance; vmar_R_rxn13881 = 1 mole_per_second; kmc_R_rxn13881_M_cpd00067_c = 1 substance; kmc_R_rxn13881_M_cpd11493_c = 1 substance; kmc_R_rxn13881_M_cpd17070_c = 1 substance;
  // Reversibel rapid-equilibrium random order ternary-complex mechanism, two products
  // GENE_ASSOCIATION: PA3654
  // SUBSYSTEM: Pyrimidine metabolism
  // EC Number: 2.7.4.4,2.7.4.14,2.7.4.22,2.7.4.-
  // Confidence Level:
  // AUTHORS:
  R_rxn00119: $M_cpd00002_c + $M_cpd00091_c -> $M_cpd00008_c + $M_cpd00014_c; (vmaf_R_rxn00119/(kic_R_rxn00119_M_cpd00002_c*kmc_R_rxn00119_M_cpd00091_c)*M_cpd00002_c*c*M_cpd00091_c*c - vmar_R_rxn00119/(kic_R_rxn00119_M_cpd00014_c*kmc_R_rxn00119_M_cpd00008_c)*M_cpd00008_c*c*M_cpd00014_c*c)/(1 + M_cpd00002_c*c*M_cpd00091_c*c/(kic_R_rxn00119_M_cpd00002_c*kmc_R_rxn00119_M_cpd00091_c) + M_cpd00002_c*c/kic_R_rxn00119_M_cpd00002_c + M_cpd00008_c*c*M_cpd00014_c*c/(kic_R_rxn00119_M_cpd00014_c*kmc_R_rxn00119_M_cpd00008_c) + M_cpd00091_c*c/kic_R_rxn00119_M_cpd00091_c + M_cpd00014_c*c/kic_R_rxn00119_M_cpd00014_c + M_cpd00008_c*c/kic_R_rxn00119_M_cpd00008_c); R_rxn00119 is "UMP kinase";  // hasProperty ec-code:2.7.4.4 ec-code:2.7.4.14 ec-code:2.7.4.22 ec-code:2.7.4.-
    vmaf_R_rxn00119 = 1 mole_per_second; vmar_R_rxn00119 = 1 mole_per_second; kmc_R_rxn00119_M_cpd00091_c = 1 substance; kmc_R_rxn00119_M_cpd00008_c = 1 substance; kic_R_rxn00119_M_cpd00008_c = 1 substance; kic_R_rxn00119_M_cpd00014_c = 1 substance; kic_R_rxn00119_M_cpd00002_c = 1 substance; kic_R_rxn00119_M_cpd00091_c = 1 substance;
  // Reversibel rapid-equilibrium random order ternary-complex mechanism, two products
  // GENE_ASSOCIATION: PA3654
  // SUBSYSTEM: Pyrimidine metabolism
  // EC Number: 2.7.4.4,2.7.4.9
  // Confidence Level:
  // AUTHORS:
  R_rxn01517: $M_cpd00002_c + $M_cpd00299_c -> $M_cpd00008_c + $M_cpd00978_c; (vmaf_R_rxn01517/(kic_R_rxn01517_M_cpd00002_c*kmc_R_rxn01517_M_cpd00299_c)*M_cpd00002_c*c*M_cpd00299_c*c - vmar_R_rxn01517/(kic_R_rxn01517_M_cpd00978_c*kmc_R_rxn01517_M_cpd00008_c)*M_cpd00008_c*c*M_cpd00978_c*c)/(1 + M_cpd00002_c*c*M_cpd00299_c*c/(kic_R_rxn01517_M_cpd00002_c*kmc_R_rxn01517_M_cpd00299_c) + M_cpd00002_c*c/kic_R_rxn01517_M_cpd00002_c + M_cpd00008_c*c*M_cpd00978_c*c/(kic_R_rxn01517_M_cpd00978_c*kmc_R_rxn01517_M_cpd00008_c) + M_cpd00299_c*c/kic_R_rxn01517_M_cpd00299_c + M_cpd00978_c*c/kic_R_rxn01517_M_cpd00978_c + M_cpd00008_c*c/kic_R_rxn01517_M_cpd00008_c); R_rxn01517 is "uridylate kinase (dUMP)";  // hasProperty ec-code:2.7.4.4 ec-code:2.7.4.9
    vmaf_R_rxn01517 = 1 mole_per_second; vmar_R_rxn01517 = 1 mole_per_second; kmc_R_rxn01517_M_cpd00299_c = 1 substance; kmc_R_rxn01517_M_cpd00008_c = 1 substance; kic_R_rxn01517_M_cpd00008_c = 1 substance; kic_R_rxn01517_M_cpd00978_c = 1 substance; kic_R_rxn01517_M_cpd00002_c = 1 substance; kic_R_rxn01517_M_cpd00299_c = 1 substance;
  // Reversibel rapid-equilibrium random order ternary-complex mechanism, two products
  // GENE_ASSOCIATION: PA3758
  // SUBSYSTEM: Amino sugar and nucleotide sugar metabolism
  // EC Number: 3.5.1.25
  // Confidence Level:
  // AUTHORS:
  R_rxn01484: $M_cpd00001_c + $M_cpd00293_c -> $M_cpd00029_c + $M_cpd00288_c; (vmaf_R_rxn01484/(kic_R_rxn01484_M_cpd00001_c*kmc_R_rxn01484_M_cpd00293_c)*M_cpd00001_c*c*M_cpd00293_c*c - vmar_R_rxn01484/(kic_R_rxn01484_M_cpd00288_c*kmc_R_rxn01484_M_cpd00029_c)*M_cpd00029_c*c*M_cpd00288_c*c)/(1 + M_cpd00001_c*c*M_cpd00293_c*c/(kic_R_rxn01484_M_cpd00001_c*kmc_R_rxn01484_M_cpd00293_c) + M_cpd00001_c*c/kic_R_rxn01484_M_cpd00001_c + M_cpd00029_c*c*M_cpd00288_c*c/(kic_R_rxn01484_M_cpd00288_c*kmc_R_rxn01484_M_cpd00029_c) + M_cpd00293_c*c/kic_R_rxn01484_M_cpd00293_c + M_cpd00288_c*c/kic_R_rxn01484_M_cpd00288_c + M_cpd00029_c*c/kic_R_rxn01484_M_cpd00029_c); R_rxn01484 is "N-acetylglucosamine-6-phosphate deacetylase";  // hasProperty ec-code:3.5.1.25
    vmaf_R_rxn01484 = 1 mole_per_second; vmar_R_rxn01484 = 1 mole_per_second; kmc_R_rxn01484_M_cpd00293_c = 1 substance; kmc_R_rxn01484_M_cpd00029_c = 1 substance; kic_R_rxn01484_M_cpd00029_c = 1 substance; kic_R_rxn01484_M_cpd00288_c = 1 substance; kic_R_rxn01484_M_cpd00001_c = 1 substance; kic_R_rxn01484_M_cpd00293_c = 1 substance;
  // Reversibel rapid-equilibrium random order ternary-complex mechanism, two products
  // GENE_ASSOCIATION: PA3807
  // SUBSYSTEM: Pyrimidine metabolism
  // EC Number: 2.7.4.6
  // Confidence Level:
  // AUTHORS:
  R_rxn00409: $M_cpd00002_c + $M_cpd00096_c -> $M_cpd00008_c + $M_cpd00052_c; (vmaf_R_rxn00409/(kic_R_rxn00409_M_cpd00002_c*kmc_R_rxn00409_M_cpd00096_c)*M_cpd00002_c*c*M_cpd00096_c*c - vmar_R_rxn00409/(kic_R_rxn00409_M_cpd00052_c*kmc_R_rxn00409_M_cpd00008_c)*M_cpd00008_c*c*M_cpd00052_c*c)/(1 + M_cpd00002_c*c*M_cpd00096_c*c/(kic_R_rxn00409_M_cpd00002_c*kmc_R_rxn00409_M_cpd00096_c) + M_cpd00002_c*c/kic_R_rxn00409_M_cpd00002_c + M_cpd00008_c*c*M_cpd00052_c*c/(kic_R_rxn00409_M_cpd00052_c*kmc_R_rxn00409_M_cpd00008_c) + M_cpd00096_c*c/kic_R_rxn00409_M_cpd00096_c + M_cpd00052_c*c/kic_R_rxn00409_M_cpd00052_c + M_cpd00008_c*c/kic_R_rxn00409_M_cpd00008_c); R_rxn00409 is "nucleoside-diphosphate kinase (ATP:CDP)";  // hasProperty ec-code:2.7.4.6
    vmaf_R_rxn00409 = 1 mole_per_second; vmar_R_rxn00409 = 1 mole_per_second; kmc_R_rxn00409_M_cpd00096_c = 1 substance; kmc_R_rxn00409_M_cpd00008_c = 1 substance; kic_R_rxn00409_M_cpd00008_c = 1 substance; kic_R_rxn00409_M_cpd00052_c = 1 substance; kic_R_rxn00409_M_cpd00002_c = 1 substance; kic_R_rxn00409_M_cpd00096_c = 1 substance;
  // Reversibel rapid-equilibrium random order ternary-complex mechanism, two products
  // GENE_ASSOCIATION: PA3807
  // SUBSYSTEM: Pyrimidine metabolism
  // EC Number: 2.7.4.6
  // Confidence Level:
  // AUTHORS:
  R_rxn01673: $M_cpd00002_c + $M_cpd00533_c -> $M_cpd00008_c + $M_cpd00356_c; (vmaf_R_rxn01673/(kic_R_rxn01673_M_cpd00002_c*kmc_R_rxn01673_M_cpd00533_c)*M_cpd00002_c*c*M_cpd00533_c*c - vmar_R_rxn01673/(kic_R_rxn01673_M_cpd00356_c*kmc_R_rxn01673_M_cpd00008_c)*M_cpd00008_c*c*M_cpd00356_c*c)/(1 + M_cpd00002_c*c*M_cpd00533_c*c/(kic_R_rxn01673_M_cpd00002_c*kmc_R_rxn01673_M_cpd00533_c) + M_cpd00002_c*c/kic_R_rxn01673_M_cpd00002_c + M_cpd00008_c*c*M_cpd00356_c*c/(kic_R_rxn01673_M_cpd00356_c*kmc_R_rxn01673_M_cpd00008_c) + M_cpd00533_c*c/kic_R_rxn01673_M_cpd00533_c + M_cpd00356_c*c/kic_R_rxn01673_M_cpd00356_c + M_cpd00008_c*c/kic_R_rxn01673_M_cpd00008_c); R_rxn01673 is "nucleoside-diphosphate kinase (ATP:dCDP)";  // hasProperty ec-code:2.7.4.6
    vmaf_R_rxn01673 = 1 mole_per_second; vmar_R_rxn01673 = 1 mole_per_second; kmc_R_rxn01673_M_cpd00533_c = 1 substance; kmc_R_rxn01673_M_cpd00008_c = 1 substance; kic_R_rxn01673_M_cpd00008_c = 1 substance; kic_R_rxn01673_M_cpd00356_c = 1 substance; kic_R_rxn01673_M_cpd00002_c = 1 substance; kic_R_rxn01673_M_cpd00533_c = 1 substance;
  // Reversibel rapid-equilibrium random order ternary-complex mechanism, two products
  // GENE_ASSOCIATION: PA3807
  // SUBSYSTEM: Pyrimidine metabolism
  // EC Number: 2.7.4.6
  // Confidence Level:
  // AUTHORS:
  R_rxn01512: $M_cpd00002_c + $M_cpd00297_c -> $M_cpd00008_c + $M_cpd00357_c; (vmaf_R_rxn01512/(kic_R_rxn01512_M_cpd00002_c*kmc_R_rxn01512_M_cpd00297_c)*M_cpd00002_c*c*M_cpd00297_c*c - vmar_R_rxn01512/(kic_R_rxn01512_M_cpd00357_c*kmc_R_rxn01512_M_cpd00008_c)*M_cpd00008_c*c*M_cpd00357_c*c)/(1 + M_cpd00002_c*c*M_cpd00297_c*c/(kic_R_rxn01512_M_cpd00002_c*kmc_R_rxn01512_M_cpd00297_c) + M_cpd00002_c*c/kic_R_rxn01512_M_cpd00002_c + M_cpd00008_c*c*M_cpd00357_c*c/(kic_R_rxn01512_M_cpd00357_c*kmc_R_rxn01512_M_cpd00008_c) + M_cpd00297_c*c/kic_R_rxn01512_M_cpd00297_c + M_cpd00357_c*c/kic_R_rxn01512_M_cpd00357_c + M_cpd00008_c*c/kic_R_rxn01512_M_cpd00008_c); R_rxn01512 is "nucleoside-diphosphate kinase (ATP:dTDP)";  // hasProperty ec-code:2.7.4.6
    vmaf_R_rxn01512 = 1 mole_per_second; vmar_R_rxn01512 = 1 mole_per_second; kmc_R_rxn01512_M_cpd00297_c = 1 substance; kmc_R_rxn01512_M_cpd00008_c = 1 substance; kic_R_rxn01512_M_cpd00008_c = 1 substance; kic_R_rxn01512_M_cpd00357_c = 1 substance; kic_R_rxn01512_M_cpd00002_c = 1 substance; kic_R_rxn01512_M_cpd00297_c = 1 substance;
  // Reversibel rapid-equilibrium random order ternary-complex mechanism, two products
  // GENE_ASSOCIATION: PA3807
  // SUBSYSTEM: Pyrimidine metabolism
  // EC Number: 2.7.4.6
  // Confidence Level:
  // AUTHORS:
  R_rxn01678: $M_cpd00002_c + $M_cpd00978_c -> $M_cpd00008_c + $M_cpd00358_c; (vmaf_R_rxn01678/(kic_R_rxn01678_M_cpd00002_c*kmc_R_rxn01678_M_cpd00978_c)*M_cpd00002_c*c*M_cpd00978_c*c - vmar_R_rxn01678/(kic_R_rxn01678_M_cpd00358_c*kmc_R_rxn01678_M_cpd00008_c)*M_cpd00008_c*c*M_cpd00358_c*c)/(1 + M_cpd00002_c*c*M_cpd00978_c*c/(kic_R_rxn01678_M_cpd00002_c*kmc_R_rxn01678_M_cpd00978_c) + M_cpd00002_c*c/kic_R_rxn01678_M_cpd00002_c + M_cpd00008_c*c*M_cpd00358_c*c/(kic_R_rxn01678_M_cpd00358_c*kmc_R_rxn01678_M_cpd00008_c) + M_cpd00978_c*c/kic_R_rxn01678_M_cpd00978_c + M_cpd00358_c*c/kic_R_rxn01678_M_cpd00358_c + M_cpd00008_c*c/kic_R_rxn01678_M_cpd00008_c); R_rxn01678 is "nucleoside-diphosphate kinase (ATP:dUDP)";  // hasProperty ec-code:2.7.4.6
    vmaf_R_rxn01678 = 1 mole_per_second; vmar_R_rxn01678 = 1 mole_per_second; kmc_R_rxn01678_M_cpd00978_c = 1 substance; kmc_R_rxn01678_M_cpd00008_c = 1 substance; kic_R_rxn01678_M_cpd00008_c = 1 substance; kic_R_rxn01678_M_cpd00358_c = 1 substance; kic_R_rxn01678_M_cpd00002_c = 1 substance; kic_R_rxn01678_M_cpd00978_c = 1 substance;
  // Reversibel rapid-equilibrium random order ternary-complex mechanism, two products
  // GENE_ASSOCIATION: PA3807
  // SUBSYSTEM: Pyrimidine metabolism
  // EC Number: 2.7.4.6
  // Confidence Level:
  // AUTHORS:
  R_rxn00117: $M_cpd00002_c + $M_cpd00014_c -> $M_cpd00008_c + $M_cpd00062_c; (vmaf_R_rxn00117/(kic_R_rxn00117_M_cpd00002_c*kmc_R_rxn00117_M_cpd00014_c)*M_cpd00002_c*c*M_cpd00014_c*c - vmar_R_rxn00117/(kic_R_rxn00117_M_cpd00062_c*kmc_R_rxn00117_M_cpd00008_c)*M_cpd00008_c*c*M_cpd00062_c*c)/(1 + M_cpd00002_c*c*M_cpd00014_c*c/(kic_R_rxn00117_M_cpd00002_c*kmc_R_rxn00117_M_cpd00014_c) + M_cpd00002_c*c/kic_R_rxn00117_M_cpd00002_c + M_cpd00008_c*c*M_cpd00062_c*c/(kic_R_rxn00117_M_cpd00062_c*kmc_R_rxn00117_M_cpd00008_c) + M_cpd00014_c*c/kic_R_rxn00117_M_cpd00014_c + M_cpd00062_c*c/kic_R_rxn00117_M_cpd00062_c + M_cpd00008_c*c/kic_R_rxn00117_M_cpd00008_c); R_rxn00117 is "nucleoside-diphosphate kinase (ATP:UDP)";  // hasProperty ec-code:2.7.4.6
    vmaf_R_rxn00117 = 1 mole_per_second; vmar_R_rxn00117 = 1 mole_per_second; kmc_R_rxn00117_M_cpd00014_c = 1 substance; kmc_R_rxn00117_M_cpd00008_c = 1 substance; kic_R_rxn00117_M_cpd00008_c = 1 substance; kic_R_rxn00117_M_cpd00062_c = 1 substance; kic_R_rxn00117_M_cpd00002_c = 1 substance; kic_R_rxn00117_M_cpd00014_c = 1 substance;
  // Reversibel rapid-equilibrium random order ternary-complex mechanism, two products
  // GENE_ASSOCIATION: PA4406
  // SUBSYSTEM: Lipopolysaccharide biosynthesis
  // Confidence Level:
  // AUTHORS:
  R_rxn13883: $M_cpd00001_c + $M_cpd17071_c -> $M_cpd00029_c + $M_cpd17072_c; (vmaf_R_rxn13883/(kic_R_rxn13883_M_cpd00001_c*kmc_R_rxn13883_M_cpd17071_c)*M_cpd00001_c*c*M_cpd17071_c*c - vmar_R_rxn13883/(kic_R_rxn13883_M_cpd17072_c*kmc_R_rxn13883_M_cpd00029_c)*M_cpd00029_c*c*M_cpd17072_c*c)/(1 + M_cpd00001_c*c*M_cpd17071_c*c/(kic_R_rxn13883_M_cpd00001_c*kmc_R_rxn13883_M_cpd17071_c) + M_cpd00001_c*c/kic_R_rxn13883_M_cpd00001_c + M_cpd00029_c*c*M_cpd17072_c*c/(kic_R_rxn13883_M_cpd17072_c*kmc_R_rxn13883_M_cpd00029_c) + M_cpd17071_c*c/kic_R_rxn13883_M_cpd17071_c + M_cpd17072_c*c/kic_R_rxn13883_M_cpd17072_c + M_cpd00029_c*c/kic_R_rxn13883_M_cpd00029_c); R_rxn13883 is "UDP-3-0-acyl N-acetylglucosamine deacetylase";
    vmaf_R_rxn13883 = 1 mole_per_second; vmar_R_rxn13883 = 1 mole_per_second; kmc_R_rxn13883_M_cpd17071_c = 1 substance; kmc_R_rxn13883_M_cpd00029_c = 1 substance; kic_R_rxn13883_M_cpd00029_c = 1 substance; kic_R_rxn13883_M_cpd17072_c = 1 substance; kic_R_rxn13883_M_cpd00001_c = 1 substance; kic_R_rxn13883_M_cpd17071_c = 1 substance;
  // GENE_ASSOCIATION: PA4425
  // SUBSYSTEM: Lipopolysaccharide biosynthesis
  // EC Number: 5.-.-.-
  // Confidence Level:
  // AUTHORS:
  R_rxn03917: $M_cpd00238_c -> $M_cpd04918_c; (vmaf_R_rxn03917/kmc_R_rxn03917_M_cpd00238_c*M_cpd00238_c*c - vmar_R_rxn03917/kmc_R_rxn03917_M_cpd04918_c*M_cpd04918_c*c)/(1 substance + M_cpd00238_c*c/kmc_R_rxn03917_M_cpd00238_c + M_cpd04918_c*c/kmc_R_rxn03917_M_cpd04918_c); R_rxn03917 is "sedoheptulose 7-phosphate isomerase";  // hasProperty ec-code:5.-.-.-
    vmaf_R_rxn03917 = 1 mole_per_second; kmc_R_rxn03917_M_cpd00238_c = 1 substance; vmar_R_rxn03917 = 1 mole_per_second; kmc_R_rxn03917_M_cpd04918_c = 1 substance;
  // GENE_ASSOCIATION: PA4450
  // SUBSYSTEM: Amino sugar and nucleotide sugar metabolism
  // EC Number: 2.5.1.7
  // Confidence Level:
  // AUTHORS:
  R_rxn00461: $M_cpd00061_c + $M_cpd00037_c -> $M_cpd00067_c + $M_cpd00009_c + $M_cpd02820_c; (vmaf_R_rxn00461*(M_cpd00061_c*c/kmc_R_rxn00461_M_cpd00061_c)^hco_R_rxn00461*(M_cpd00037_c*c/kmc_R_rxn00461_M_cpd00037_c)^hco_R_rxn00461 - vmar_R_rxn00461*(M_cpd00067_c*c/kmc_R_rxn00461_M_cpd00067_c)^hco_R_rxn00461*(M_cpd00009_c*c/kmc_R_rxn00461_M_cpd00009_c)^hco_R_rxn00461*(M_cpd02820_c*c/kmc_R_rxn00461_M_cpd02820_c)^hco_R_rxn00461)/((1 + M_cpd00061_c*c/kmc_R_rxn00461_M_cpd00061_c)^hco_R_rxn00461*(1 + M_cpd00037_c*c/kmc_R_rxn00461_M_cpd00037_c)^hco_R_rxn00461 + (1 + M_cpd00067_c*c/kmc_R_rxn00461_M_cpd00067_c)^hco_R_rxn00461*(1 + M_cpd00009_c*c/kmc_R_rxn00461_M_cpd00009_c)^hco_R_rxn00461*(1 + M_cpd02820_c*c/kmc_R_rxn00461_M_cpd02820_c)^hco_R_rxn00461 - 1); R_rxn00461 is "UDP-N-acetylglucosamine 1-carboxyvinyltransferase";  // hasProperty ec-code:2.5.1.7
    vmaf_R_rxn00461 = 1 mole_per_second; hco_R_rxn00461 = 1 dimensionless; kmc_R_rxn00461_M_cpd00061_c = 1 substance; kmc_R_rxn00461_M_cpd00037_c = 1 substance; vmar_R_rxn00461 = 1 mole_per_second; kmc_R_rxn00461_M_cpd00067_c = 1 substance; kmc_R_rxn00461_M_cpd00009_c = 1 substance; kmc_R_rxn00461_M_cpd02820_c = 1 substance;
  // GENE_ASSOCIATION: PA4457
  // SUBSYSTEM: Lipopolysaccharide biosynthesis
  // EC Number: 5.3.1.13
  // Confidence Level:
  // AUTHORS:
  R_rxn01117: $M_cpd00817_c -> $M_cpd00171_c; (vmaf_R_rxn01117/kmc_R_rxn01117_M_cpd00817_c*M_cpd00817_c*c - vmar_R_rxn01117/kmc_R_rxn01117_M_cpd00171_c*M_cpd00171_c*c)/(1 substance + M_cpd00817_c*c/kmc_R_rxn01117_M_cpd00817_c + M_cpd00171_c*c/kmc_R_rxn01117_M_cpd00171_c); R_rxn01117 is "arabinose-5-phosphate isomerase";  // hasProperty ec-code:5.3.1.13
    vmaf_R_rxn01117 = 1 mole_per_second; kmc_R_rxn01117_M_cpd00817_c = 1 substance; vmar_R_rxn01117 = 1 mole_per_second; kmc_R_rxn01117_M_cpd00171_c = 1 substance;
  // Thermodynamically independent convenience kinetics
  // GENE_ASSOCIATION: PA4458
  // SUBSYSTEM: Lipopolysaccharide biosynthesis
  // EC Number: 3.1.3.45
  // Confidence Level:
  // AUTHORS:
  R_rxn02404: $M_cpd00001_c + $M_cpd02730_c => $M_cpd00067_c + $M_cpd00009_c + $M_cpd00875_c; vmag_R_rxn02404*(M_cpd00001_c*c/kmc_R_rxn02404_M_cpd00001_c*(M_cpd02730_c*c/kmc_R_rxn02404_M_cpd02730_c)*sqrt((kG_M_cpd00001_c*kmc_R_rxn02404_M_cpd00001_c)^1*(kG_M_cpd02730_c*kmc_R_rxn02404_M_cpd02730_c)^1/((kG_M_cpd00067_c*kmc_R_rxn02404_M_cpd00067_c)^1*(kG_M_cpd00875_c*kmc_R_rxn02404_M_cpd00875_c)^1*(kG_M_cpd00009_c*kmc_R_rxn02404_M_cpd00009_c)^1))/((1 + M_cpd00001_c*c/kmc_R_rxn02404_M_cpd00001_c)*(1 + M_cpd02730_c*c/kmc_R_rxn02404_M_cpd02730_c))); R_rxn02404 is "3-deoxy-manno-octulosonate-8-phosphatase";  // hasProperty ec-code:3.1.3.45
    kmc_R_rxn02404_M_cpd00001_c = 1 substance; kmc_R_rxn02404_M_cpd02730_c = 1 substance; kmc_R_rxn02404_M_cpd00067_c = 1 substance; kmc_R_rxn02404_M_cpd00009_c = 1 substance; kmc_R_rxn02404_M_cpd00875_c = 1 substance; vmag_R_rxn02404 = 1 mole_per_second;
  // GENE_ASSOCIATION: PA4749
  // SUBSYSTEM: Amino sugar and nucleotide sugar metabolism
  // EC Number: 5.4.2.10,5.4.2.2
  // Confidence Level:
  // AUTHORS:
  R_rxn01485: $M_cpd03671_c -> $M_cpd00288_c; (vmaf_R_rxn01485/kmc_R_rxn01485_M_cpd03671_c*M_cpd03671_c*c - vmar_R_rxn01485/kmc_R_rxn01485_M_cpd00288_c*M_cpd00288_c*c)/(1 substance + M_cpd03671_c*c/kmc_R_rxn01485_M_cpd03671_c + M_cpd00288_c*c/kmc_R_rxn01485_M_cpd00288_c); R_rxn01485 is "phosphoglucosamine mutase";  // hasProperty ec-code:5.4.2.10 ec-code:5.4.2.2
    vmaf_R_rxn01485 = 1 mole_per_second; kmc_R_rxn01485_M_cpd03671_c = 1 substance; vmar_R_rxn01485 = 1 mole_per_second; kmc_R_rxn01485_M_cpd00288_c = 1 substance;
  // GENE_ASSOCIATION: PA4988
  // SUBSYSTEM: Lipopolysaccharide biosynthesis
  // Confidence Level:
  // AUTHORS:
  R_rxn13878: $M_cpd17066_c + $M_cpd02546_c -> $M_cpd00067_c + $M_cpd00046_c + $M_cpd17055_c; (vmaf_R_rxn13878*(M_cpd17066_c*c/kmc_R_rxn13878_M_cpd17066_c)^hco_R_rxn13878*(M_cpd02546_c*c/kmc_R_rxn13878_M_cpd02546_c)^hco_R_rxn13878 - vmar_R_rxn13878*(M_cpd00067_c*c/kmc_R_rxn13878_M_cpd00067_c)^hco_R_rxn13878*(M_cpd00046_c*c/kmc_R_rxn13878_M_cpd00046_c)^hco_R_rxn13878*(M_cpd17055_c*c/kmc_R_rxn13878_M_cpd17055_c)^hco_R_rxn13878)/((1 + M_cpd17066_c*c/kmc_R_rxn13878_M_cpd17066_c)^hco_R_rxn13878*(1 + M_cpd02546_c*c/kmc_R_rxn13878_M_cpd02546_c)^hco_R_rxn13878 + (1 + M_cpd00067_c*c/kmc_R_rxn13878_M_cpd00067_c)^hco_R_rxn13878*(1 + M_cpd00046_c*c/kmc_R_rxn13878_M_cpd00046_c)^hco_R_rxn13878*(1 + M_cpd17055_c*c/kmc_R_rxn13878_M_cpd17055_c)^hco_R_rxn13878 - 1); R_rxn13878 is "3-deoxy-D-manno-octulosonic acid transferase";
    vmaf_R_rxn13878 = 1 mole_per_second; hco_R_rxn13878 = 1 dimensionless; kmc_R_rxn13878_M_cpd17066_c = 1 substance; kmc_R_rxn13878_M_cpd02546_c = 1 substance; vmar_R_rxn13878 = 1 mole_per_second; kmc_R_rxn13878_M_cpd00067_c = 1 substance; kmc_R_rxn13878_M_cpd00046_c = 1 substance; kmc_R_rxn13878_M_cpd17055_c = 1 substance;
  // GENE_ASSOCIATION: PA4988
  // SUBSYSTEM: Lipopolysaccharide biosynthesis
  // Confidence Level:
  // AUTHORS:
  R_rxn13879: $M_cpd02546_c + $M_cpd17055_c -> $M_cpd00067_c + $M_cpd00046_c + $M_cpd17054_c; (vmaf_R_rxn13879*(M_cpd02546_c*c/kmc_R_rxn13879_M_cpd02546_c)^hco_R_rxn13879*(M_cpd17055_c*c/kmc_R_rxn13879_M_cpd17055_c)^hco_R_rxn13879 - vmar_R_rxn13879*(M_cpd00067_c*c/kmc_R_rxn13879_M_cpd00067_c)^hco_R_rxn13879*(M_cpd00046_c*c/kmc_R_rxn13879_M_cpd00046_c)^hco_R_rxn13879*(M_cpd17054_c*c/kmc_R_rxn13879_M_cpd17054_c)^hco_R_rxn13879)/((1 + M_cpd02546_c*c/kmc_R_rxn13879_M_cpd02546_c)^hco_R_rxn13879*(1 + M_cpd17055_c*c/kmc_R_rxn13879_M_cpd17055_c)^hco_R_rxn13879 + (1 + M_cpd00067_c*c/kmc_R_rxn13879_M_cpd00067_c)^hco_R_rxn13879*(1 + M_cpd00046_c*c/kmc_R_rxn13879_M_cpd00046_c)^hco_R_rxn13879*(1 + M_cpd17054_c*c/kmc_R_rxn13879_M_cpd17054_c)^hco_R_rxn13879 - 1); R_rxn13879 is "3-deoxy-D-manno-octulosonic acid transferase";
    vmaf_R_rxn13879 = 1 mole_per_second; hco_R_rxn13879 = 1 dimensionless; kmc_R_rxn13879_M_cpd02546_c = 1 substance; kmc_R_rxn13879_M_cpd17055_c = 1 substance; vmar_R_rxn13879 = 1 mole_per_second; kmc_R_rxn13879_M_cpd00067_c = 1 substance; kmc_R_rxn13879_M_cpd00046_c = 1 substance; kmc_R_rxn13879_M_cpd17054_c = 1 substance;
  // Reversibel rapid-equilibrium random order ternary-complex mechanism, two products
  // GENE_ASSOCIATION: PA4996
  // SUBSYSTEM: Lipopolysaccharide biosynthesis
  // EC Number: 2.7.-.-,2.7.7.-
  // Confidence Level:
  // AUTHORS:
  R_rxn03916: $M_cpd00002_c + $M_cpd04920_c -> $M_cpd00012_c + $M_cpd03830_c; (vmaf_R_rxn03916/(kic_R_rxn03916_M_cpd00002_c*kmc_R_rxn03916_M_cpd04920_c)*M_cpd00002_c*c*M_cpd04920_c*c - vmar_R_rxn03916/(kic_R_rxn03916_M_cpd03830_c*kmc_R_rxn03916_M_cpd00012_c)*M_cpd00012_c*c*M_cpd03830_c*c)/(1 + M_cpd00002_c*c*M_cpd04920_c*c/(kic_R_rxn03916_M_cpd00002_c*kmc_R_rxn03916_M_cpd04920_c) + M_cpd00002_c*c/kic_R_rxn03916_M_cpd00002_c + M_cpd00012_c*c*M_cpd03830_c*c/(kic_R_rxn03916_M_cpd03830_c*kmc_R_rxn03916_M_cpd00012_c) + M_cpd04920_c*c/kic_R_rxn03916_M_cpd04920_c + M_cpd03830_c*c/kic_R_rxn03916_M_cpd03830_c + M_cpd00012_c*c/kic_R_rxn03916_M_cpd00012_c); R_rxn03916 is "D-glycero-D-manno-hepose 1-phosphate adenyltransferase";  // hasProperty ec-code:2.7.-.- ec-code:2.7.7.-
    vmaf_R_rxn03916 = 1 mole_per_second; vmar_R_rxn03916 = 1 mole_per_second; kmc_R_rxn03916_M_cpd04920_c = 1 substance; kmc_R_rxn03916_M_cpd00012_c = 1 substance; kic_R_rxn03916_M_cpd00012_c = 1 substance; kic_R_rxn03916_M_cpd03830_c = 1 substance; kic_R_rxn03916_M_cpd00002_c = 1 substance; kic_R_rxn03916_M_cpd04920_c = 1 substance;
  // Reversibel rapid-equilibrium random order ternary-complex mechanism, two products
  // GENE_ASSOCIATION: PA4996
  // SUBSYSTEM: Lipopolysaccharide biosynthesis
  // EC Number: 2.7.-.-,2.7.1.-
  // Confidence Level:
  // AUTHORS:
  R_rxn03918: $M_cpd00002_c + $M_cpd04918_c -> $M_cpd00008_c + $M_cpd08316_c; (vmaf_R_rxn03918/(kic_R_rxn03918_M_cpd00002_c*kmc_R_rxn03918_M_cpd04918_c)*M_cpd00002_c*c*M_cpd04918_c*c - vmar_R_rxn03918/(kic_R_rxn03918_M_cpd08316_c*kmc_R_rxn03918_M_cpd00008_c)*M_cpd00008_c*c*M_cpd08316_c*c)/(1 + M_cpd00002_c*c*M_cpd04918_c*c/(kic_R_rxn03918_M_cpd00002_c*kmc_R_rxn03918_M_cpd04918_c) + M_cpd00002_c*c/kic_R_rxn03918_M_cpd00002_c + M_cpd00008_c*c*M_cpd08316_c*c/(kic_R_rxn03918_M_cpd08316_c*kmc_R_rxn03918_M_cpd00008_c) + M_cpd04918_c*c/kic_R_rxn03918_M_cpd04918_c + M_cpd08316_c*c/kic_R_rxn03918_M_cpd08316_c + M_cpd00008_c*c/kic_R_rxn03918_M_cpd00008_c); R_rxn03918 is "D-glycero-D-manno-heptose 7-phosphate kinase";  // hasProperty ec-code:2.7.-.- ec-code:2.7.1.-
    vmaf_R_rxn03918 = 1 mole_per_second; vmar_R_rxn03918 = 1 mole_per_second; kmc_R_rxn03918_M_cpd04918_c = 1 substance; kmc_R_rxn03918_M_cpd00008_c = 1 substance; kic_R_rxn03918_M_cpd00008_c = 1 substance; kic_R_rxn03918_M_cpd08316_c = 1 substance; kic_R_rxn03918_M_cpd00002_c = 1 substance; kic_R_rxn03918_M_cpd04918_c = 1 substance;
  // Thermodynamically independent convenience kinetics
  // GENE_ASSOCIATION: PA5010
  // SUBSYSTEM: Lipopolysaccharide biosynthesis
  // Confidence Level:
  // AUTHORS:
  R_rxn13867: 3 $M_cpd00026_c + $M_cpd17060_c => 3 $M_cpd00014_c + $M_cpd17061_c; vmag_R_rxn13867*((M_cpd00026_c*c/kmc_R_rxn13867_M_cpd00026_c)^3*(M_cpd17060_c*c/kmc_R_rxn13867_M_cpd17060_c)*sqrt((kG_M_cpd00026_c*kmc_R_rxn13867_M_cpd00026_c)^3*(kG_M_cpd17060_c*kmc_R_rxn13867_M_cpd17060_c)^1/((kG_M_cpd00014_c*kmc_R_rxn13867_M_cpd00014_c)^3*(kG_M_cpd17061_c*kmc_R_rxn13867_M_cpd17061_c)^1))/((1 + M_cpd00026_c*c/kmc_R_rxn13867_M_cpd00026_c + (M_cpd00026_c*c/kmc_R_rxn13867_M_cpd00026_c)^2 + (M_cpd00026_c*c/kmc_R_rxn13867_M_cpd00026_c)^3)*(1 + M_cpd17060_c*c/kmc_R_rxn13867_M_cpd17060_c))); R_rxn13867 is "alpha 1,3-glucosyltransferase";
    kmc_R_rxn13867_M_cpd00026_c = 1 substance; kmc_R_rxn13867_M_cpd17060_c = 1 substance; kmc_R_rxn13867_M_cpd00014_c = 1 substance; kmc_R_rxn13867_M_cpd17061_c = 1 substance; vmag_R_rxn13867 = 1 mole_per_second;
  // Irreversibel rapid-equilibrium random order ternary-complex mechanism, two products
  // GENE_ASSOCIATION: PA5010
  // SUBSYSTEM: Lipopolysaccharide biosynthesis
  // Confidence Level:
  // AUTHORS:
  R_rxn13866: $M_cpd00043_c + $M_cpd17059_c => $M_cpd00014_c + $M_cpd17060_c; vmax_R_rxn13866*M_cpd17059_c*c*M_cpd00043_c*c/(kic_R_rxn13866_M_cpd00043_c*kmc_R_rxn13866_M_cpd17059_c + M_cpd00043_c*c*M_cpd17059_c*c + kmc_R_rxn13866_M_cpd17059_c*M_cpd00043_c*c + kmc_R_rxn13866_M_cpd00043_c*M_cpd17059_c*c); R_rxn13866 is "alpha 1,3-glucosyltransferase";
    vmax_R_rxn13866 = 1 mole_per_second; kmc_R_rxn13866_M_cpd00043_c = 1 substance; kmc_R_rxn13866_M_cpd17059_c = 1 substance; kic_R_rxn13866_M_cpd00043_c = 1 substance;
  // Irreversibel rapid-equilibrium random order ternary-complex mechanism, two products
  // GENE_ASSOCIATION: PA5010
  // SUBSYSTEM: Lipopolysaccharide biosynthesis
  // Confidence Level:
  // AUTHORS:
  R_rxn13869: $M_cpd00026_c + $M_cpd17062_c => $M_cpd00014_c + $M_cpd17063_c; vmax_R_rxn13869*M_cpd17062_c*c*M_cpd00026_c*c/(kic_R_rxn13869_M_cpd00026_c*kmc_R_rxn13869_M_cpd17062_c + M_cpd00026_c*c*M_cpd17062_c*c + kmc_R_rxn13869_M_cpd17062_c*M_cpd00026_c*c + kmc_R_rxn13869_M_cpd00026_c*M_cpd17062_c*c); R_rxn13869 is "b-D-glucosyltransferase";
    vmax_R_rxn13869 = 1 mole_per_second; kmc_R_rxn13869_M_cpd00026_c = 1 substance; kmc_R_rxn13869_M_cpd17062_c = 1 substance; kic_R_rxn13869_M_cpd00026_c = 1 substance;
  // Irreversibel rapid-equilibrium random order ternary-complex mechanism, two products
  // GENE_ASSOCIATION: PA5011
  // SUBSYSTEM: Lipopolysaccharide biosynthesis
  // Confidence Level:
  // AUTHORS:
  R_rPY00222: $M_cpd03831_c + $M_cpd17054_c => $M_cpd00008_c + $M_cpd17058_c; vmax_R_rPY00222*M_cpd17054_c*c*M_cpd03831_c*c/(kic_R_rPY00222_M_cpd03831_c*kmc_R_rPY00222_M_cpd17054_c + M_cpd03831_c*c*M_cpd17054_c*c + kmc_R_rPY00222_M_cpd17054_c*M_cpd03831_c*c + kmc_R_rPY00222_M_cpd03831_c*M_cpd17054_c*c); R_rPY00222 is "heptosyltransferase I";
    vmax_R_rPY00222 = 1 mole_per_second; kmc_R_rPY00222_M_cpd03831_c = 1 substance; kmc_R_rPY00222_M_cpd17054_c = 1 substance; kic_R_rPY00222_M_cpd03831_c = 1 substance;
  // Irreversibel rapid-equilibrium random order ternary-complex mechanism, two products
  // GENE_ASSOCIATION: PA5012
  // SUBSYSTEM: Lipopolysaccharide biosynthesis
  // Confidence Level:
  // AUTHORS:
  R_rPY00221: $M_cpd03831_c + $M_cpd17058_c => $M_cpd00008_c + $M_cpd17059_c; vmax_R_rPY00221*M_cpd17058_c*c*M_cpd03831_c*c/(kic_R_rPY00221_M_cpd03831_c*kmc_R_rPY00221_M_cpd17058_c + M_cpd03831_c*c*M_cpd17058_c*c + kmc_R_rPY00221_M_cpd17058_c*M_cpd03831_c*c + kmc_R_rPY00221_M_cpd03831_c*M_cpd17058_c*c); R_rPY00221 is "heptosyltransferase II";
    vmax_R_rPY00221 = 1 mole_per_second; kmc_R_rPY00221_M_cpd03831_c = 1 substance; kmc_R_rPY00221_M_cpd17058_c = 1 substance; kic_R_rPY00221_M_cpd03831_c = 1 substance;
  // Thermodynamically independent convenience kinetics
  // GENE_ASSOCIATION: PA5067
  // SUBSYSTEM: Pyrimidine metabolism
  // EC Number: 3.6.1.5, 3.6.1.39
  // Confidence Level:
  // AUTHORS:
  R_rxn01514: $M_cpd00001_c + $M_cpd00357_c => $M_cpd00067_c + $M_cpd00009_c + $M_cpd00297_c; vmag_R_rxn01514*(M_cpd00001_c*c/kmc_R_rxn01514_M_cpd00001_c*(M_cpd00357_c*c/kmc_R_rxn01514_M_cpd00357_c)*sqrt((kG_M_cpd00001_c*kmc_R_rxn01514_M_cpd00001_c)^1*(kG_M_cpd00357_c*kmc_R_rxn01514_M_cpd00357_c)^1/((kG_M_cpd00067_c*kmc_R_rxn01514_M_cpd00067_c)^1*(kG_M_cpd00297_c*kmc_R_rxn01514_M_cpd00297_c)^1*(kG_M_cpd00009_c*kmc_R_rxn01514_M_cpd00009_c)^1))/((1 + M_cpd00001_c*c/kmc_R_rxn01514_M_cpd00001_c)*(1 + M_cpd00357_c*c/kmc_R_rxn01514_M_cpd00357_c))); R_rxn01514 is "thymidine-triphosphatase irreversible";  // hasProperty ec-code:3.6.1.5 ec-code: 3.6.1.39
    kmc_R_rxn01514_M_cpd00001_c = 1 substance; kmc_R_rxn01514_M_cpd00357_c = 1 substance; kmc_R_rxn01514_M_cpd00067_c = 1 substance; kmc_R_rxn01514_M_cpd00009_c = 1 substance; kmc_R_rxn01514_M_cpd00297_c = 1 substance; vmag_R_rxn01514 = 1 mole_per_second;
  // Irreversibel rapid-equilibrium random order ternary-complex mechanism, two products
  // GENE_ASSOCIATION: PA5321
  // SUBSYSTEM: Pyrimidine metabolism
  // EC Number: 3.6.1.19,3.6.1.23
  // Confidence Level:
  // AUTHORS:
  R_rxn01519: $M_cpd00001_c + $M_cpd00358_c => $M_cpd00012_c + $M_cpd00299_c; vmax_R_rxn01519*M_cpd00358_c*c*M_cpd00001_c*c/(kic_R_rxn01519_M_cpd00001_c*kmc_R_rxn01519_M_cpd00358_c + M_cpd00001_c*c*M_cpd00358_c*c + kmc_R_rxn01519_M_cpd00358_c*M_cpd00001_c*c + kmc_R_rxn01519_M_cpd00001_c*M_cpd00358_c*c); R_rxn01519 is "dUTP diphosphatase";  // hasProperty ec-code:3.6.1.19 ec-code:3.6.1.23
    vmax_R_rxn01519 = 1 mole_per_second; kmc_R_rxn01519_M_cpd00001_c = 1 substance; kmc_R_rxn01519_M_cpd00358_c = 1 substance; kic_R_rxn01519_M_cpd00001_c = 1 substance;
  // Reversibel rapid-equilibrium random order ternary-complex mechanism, two products
  // GENE_ASSOCIATION: PA5331
  // SUBSYSTEM: Pyrimidine metabolism
  // EC Number: 2.4.2.10
  // Confidence Level:
  // AUTHORS:
  R_rxn01362: $M_cpd00012_c + $M_cpd00810_c -> $M_cpd00247_c + $M_cpd00103_c; (vmaf_R_rxn01362/(kic_R_rxn01362_M_cpd00012_c*kmc_R_rxn01362_M_cpd00810_c)*M_cpd00012_c*c*M_cpd00810_c*c - vmar_R_rxn01362/(kic_R_rxn01362_M_cpd00103_c*kmc_R_rxn01362_M_cpd00247_c)*M_cpd00247_c*c*M_cpd00103_c*c)/(1 + M_cpd00012_c*c*M_cpd00810_c*c/(kic_R_rxn01362_M_cpd00012_c*kmc_R_rxn01362_M_cpd00810_c) + M_cpd00012_c*c/kic_R_rxn01362_M_cpd00012_c + M_cpd00247_c*c*M_cpd00103_c*c/(kic_R_rxn01362_M_cpd00103_c*kmc_R_rxn01362_M_cpd00247_c) + M_cpd00810_c*c/kic_R_rxn01362_M_cpd00810_c + M_cpd00103_c*c/kic_R_rxn01362_M_cpd00103_c + M_cpd00247_c*c/kic_R_rxn01362_M_cpd00247_c); R_rxn01362 is "orotate phosphoribosyltransferase";  // hasProperty ec-code:2.4.2.10
    vmaf_R_rxn01362 = 1 mole_per_second; vmar_R_rxn01362 = 1 mole_per_second; kmc_R_rxn01362_M_cpd00810_c = 1 substance; kmc_R_rxn01362_M_cpd00247_c = 1 substance; kic_R_rxn01362_M_cpd00247_c = 1 substance; kic_R_rxn01362_M_cpd00103_c = 1 substance; kic_R_rxn01362_M_cpd00012_c = 1 substance; kic_R_rxn01362_M_cpd00810_c = 1 substance;
  // Irreversibel rapid-equilibrium random order ternary-complex mechanism, two products
  // GENE_ASSOCIATION: PA5447
  // SUBSYSTEM: Lipopolysaccharide biosynthesis
  // Confidence Level:
  // AUTHORS:
  R_rxn13899: $M_cpd01999_c + $M_cpd00946_c => $M_cpd00091_c + $M_cpd17086_c; vmax_R_rxn13899*M_cpd00946_c*c*M_cpd01999_c*c/(kic_R_rxn13899_M_cpd01999_c*kmc_R_rxn13899_M_cpd00946_c + M_cpd01999_c*c*M_cpd00946_c*c + kmc_R_rxn13899_M_cpd00946_c*M_cpd01999_c*c + kmc_R_rxn13899_M_cpd01999_c*M_cpd00946_c*c); R_rxn13899 is "Rha-(a1,3)-GlcNac-pyrophosphorylundecaprenol synthesis";
    vmax_R_rxn13899 = 1 mole_per_second; kmc_R_rxn13899_M_cpd01999_c = 1 substance; kmc_R_rxn13899_M_cpd00946_c = 1 substance; kic_R_rxn13899_M_cpd01999_c = 1 substance;
  // Thermodynamically independent convenience kinetics
  // GENE_ASSOCIATION: PA5448
  // SUBSYSTEM: Lipopolysaccharide biosynthesis
  // Confidence Level:
  // AUTHORS:
  R_rxn13900: 2 $M_cpd01999_c + $M_cpd17086_c => 2 $M_cpd00126_c + $M_cpd17087_c; vmag_R_rxn13900*((M_cpd01999_c*c/kmc_R_rxn13900_M_cpd01999_c)^2*(M_cpd17086_c*c/kmc_R_rxn13900_M_cpd17086_c)*sqrt((kG_M_cpd01999_c*kmc_R_rxn13900_M_cpd01999_c)^2*(kG_M_cpd17086_c*kmc_R_rxn13900_M_cpd17086_c)^1/((kG_M_cpd00126_c*kmc_R_rxn13900_M_cpd00126_c)^2*(kG_M_cpd17087_c*kmc_R_rxn13900_M_cpd17087_c)^1))/((1 + M_cpd01999_c*c/kmc_R_rxn13900_M_cpd01999_c + (M_cpd01999_c*c/kmc_R_rxn13900_M_cpd01999_c)^2)*(1 + M_cpd17086_c*c/kmc_R_rxn13900_M_cpd17086_c))); R_rxn13900 is "Rha-(a1,3)-Rha-(a1,3)-Rha-(a1,3)-GlcNac-pyrophosphorylundecaprenol synthesis";
    kmc_R_rxn13900_M_cpd01999_c = 1 substance; kmc_R_rxn13900_M_cpd17086_c = 1 substance; kmc_R_rxn13900_M_cpd00126_c = 1 substance; kmc_R_rxn13900_M_cpd17087_c = 1 substance; vmag_R_rxn13900 = 1 mole_per_second;
  // Irreversibel rapid-equilibrium random order ternary-complex mechanism, two products
  // GENE_ASSOCIATION: PA5449
  // SUBSYSTEM: Lipopolysaccharide biosynthesis
  // Confidence Level:
  // AUTHORS:
  R_rxn13901: $M_cpd01999_c + $M_cpd17087_c => $M_cpd00126_c + $M_cpd17088_c; vmax_R_rxn13901*M_cpd17087_c*c*M_cpd01999_c*c/(kic_R_rxn13901_M_cpd01999_c*kmc_R_rxn13901_M_cpd17087_c + M_cpd01999_c*c*M_cpd17087_c*c + kmc_R_rxn13901_M_cpd17087_c*M_cpd01999_c*c + kmc_R_rxn13901_M_cpd01999_c*M_cpd17087_c*c); R_rxn13901 is "A-band O-antigen synthesis";
    vmax_R_rxn13901 = 1 mole_per_second; kmc_R_rxn13901_M_cpd01999_c = 1 substance; kmc_R_rxn13901_M_cpd17087_c = 1 substance; kic_R_rxn13901_M_cpd01999_c = 1 substance;
  // Thermodynamically independent convenience kinetics
  // GENE_ASSOCIATION: PA5552
  // SUBSYSTEM: Amino sugar and nucleotide sugar metabolism
  // EC Number: 2.3.1.157,2.3.1.4
  // Confidence Level:
  // AUTHORS:
  R_rxn03638: $M_cpd00022_c + $M_cpd03671_c => $M_cpd00067_c + $M_cpd00010_c + $M_cpd02611_c; vmag_R_rxn03638*(M_cpd00022_c*c/kmc_R_rxn03638_M_cpd00022_c*(M_cpd03671_c*c/kmc_R_rxn03638_M_cpd03671_c)*sqrt((kG_M_cpd00022_c*kmc_R_rxn03638_M_cpd00022_c)^1*(kG_M_cpd03671_c*kmc_R_rxn03638_M_cpd03671_c)^1/((kG_M_cpd00067_c*kmc_R_rxn03638_M_cpd00067_c)^1*(kG_M_cpd02611_c*kmc_R_rxn03638_M_cpd02611_c)^1*(kG_M_cpd00010_c*kmc_R_rxn03638_M_cpd00010_c)^1))/((1 + M_cpd00022_c*c/kmc_R_rxn03638_M_cpd00022_c)*(1 + M_cpd03671_c*c/kmc_R_rxn03638_M_cpd03671_c))); R_rxn03638 is "glucosamine-1-phosphate N-acetyltransferase";  // hasProperty ec-code:2.3.1.157 ec-code:2.3.1.4
    kmc_R_rxn03638_M_cpd00022_c = 1 substance; kmc_R_rxn03638_M_cpd03671_c = 1 substance; kmc_R_rxn03638_M_cpd00067_c = 1 substance; kmc_R_rxn03638_M_cpd00010_c = 1 substance; kmc_R_rxn03638_M_cpd02611_c = 1 substance; vmag_R_rxn03638 = 1 mole_per_second;
  // Reversibel rapid-equilibrium random order ternary-complex mechanism, two products
  // GENE_ASSOCIATION: PA5552
  // SUBSYSTEM: Amino sugar and nucleotide sugar metabolism
  // EC Number: 2.7.7.23
  // Confidence Level:
  // AUTHORS:
  R_rxn00293: $M_cpd00062_c + $M_cpd02611_c -> $M_cpd00012_c + $M_cpd00037_c; (vmaf_R_rxn00293/(kic_R_rxn00293_M_cpd00062_c*kmc_R_rxn00293_M_cpd02611_c)*M_cpd00062_c*c*M_cpd02611_c*c - vmar_R_rxn00293/(kic_R_rxn00293_M_cpd00037_c*kmc_R_rxn00293_M_cpd00012_c)*M_cpd00012_c*c*M_cpd00037_c*c)/(1 + M_cpd00062_c*c*M_cpd02611_c*c/(kic_R_rxn00293_M_cpd00062_c*kmc_R_rxn00293_M_cpd02611_c) + M_cpd00062_c*c/kic_R_rxn00293_M_cpd00062_c + M_cpd00012_c*c*M_cpd00037_c*c/(kic_R_rxn00293_M_cpd00037_c*kmc_R_rxn00293_M_cpd00012_c) + M_cpd02611_c*c/kic_R_rxn00293_M_cpd02611_c + M_cpd00037_c*c/kic_R_rxn00293_M_cpd00037_c + M_cpd00012_c*c/kic_R_rxn00293_M_cpd00012_c); R_rxn00293 is "UDP-N-acetylglucosamine diphosphorylase";  // hasProperty ec-code:2.7.7.23
    vmaf_R_rxn00293 = 1 mole_per_second; vmar_R_rxn00293 = 1 mole_per_second; kmc_R_rxn00293_M_cpd02611_c = 1 substance; kmc_R_rxn00293_M_cpd00012_c = 1 substance; kic_R_rxn00293_M_cpd00012_c = 1 substance; kic_R_rxn00293_M_cpd00037_c = 1 substance; kic_R_rxn00293_M_cpd00062_c = 1 substance; kic_R_rxn00293_M_cpd02611_c = 1 substance;
  // Thermodynamically independent convenience kinetics
  // SUBSYSTEM: Lipopolysaccharide biosynthesis
  // Confidence Level:
  // AUTHORS:
  R_rxn13868: 2 $M_cpd02113_c + $M_cpd17061_c => 2 $M_cpd00297_c + $M_cpd17062_c; vmag_R_rxn13868*((M_cpd02113_c*c/kmc_R_rxn13868_M_cpd02113_c)^2*(M_cpd17061_c*c/kmc_R_rxn13868_M_cpd17061_c)*sqrt((kG_M_cpd02113_c*kmc_R_rxn13868_M_cpd02113_c)^2*(kG_M_cpd17061_c*kmc_R_rxn13868_M_cpd17061_c)^1/((kG_M_cpd00297_c*kmc_R_rxn13868_M_cpd00297_c)^2*(kG_M_cpd17062_c*kmc_R_rxn13868_M_cpd17062_c)^1))/((1 + M_cpd02113_c*c/kmc_R_rxn13868_M_cpd02113_c + (M_cpd02113_c*c/kmc_R_rxn13868_M_cpd02113_c)^2)*(1 + M_cpd17061_c*c/kmc_R_rxn13868_M_cpd17061_c))); R_rxn13868 is "L-rhamnotransferase";
    kmc_R_rxn13868_M_cpd02113_c = 1 substance; kmc_R_rxn13868_M_cpd17061_c = 1 substance; kmc_R_rxn13868_M_cpd00297_c = 1 substance; kmc_R_rxn13868_M_cpd17062_c = 1 substance; vmag_R_rxn13868 = 1 mole_per_second;
  // Irreversibel rapid-equilibrium random order ternary-complex mechanism, two products
  // SUBSYSTEM: Lipopolysaccharide biosynthesis
  // Confidence Level:
  // AUTHORS:
  R_rxn13876: $M_cpd17065_c + $M_cpd17088_c => $M_cpd02229_c + $M_cpd17056_c; vmax_R_rxn13876*M_cpd17088_c*c*M_cpd17065_c*c/(kic_R_rxn13876_M_cpd17065_c*kmc_R_rxn13876_M_cpd17088_c + M_cpd17065_c*c*M_cpd17088_c*c + kmc_R_rxn13876_M_cpd17088_c*M_cpd17065_c*c + kmc_R_rxn13876_M_cpd17065_c*M_cpd17088_c*c); R_rxn13876 is "Pseudomonas aeruginosa LPS A-band synthesis";
    vmax_R_rxn13876 = 1 mole_per_second; kmc_R_rxn13876_M_cpd17065_c = 1 substance; kmc_R_rxn13876_M_cpd17088_c = 1 substance; kic_R_rxn13876_M_cpd17065_c = 1 substance;
  // Thermodynamically independent convenience kinetics
  // SUBSYSTEM: Lipopolysaccharide biosynthesis
  // Confidence Level:
  // AUTHORS:
  R_rxn13871: $M_cpd00035_c + $M_cpd00146_c + $M_cpd17064_c => $M_cpd00001_c + $M_cpd00009_c + $M_cpd17065_c; vmag_R_rxn13871*(M_cpd00035_c*c/kmc_R_rxn13871_M_cpd00035_c*(M_cpd17064_c*c/kmc_R_rxn13871_M_cpd17064_c)*(M_cpd00146_c*c/kmc_R_rxn13871_M_cpd00146_c)*sqrt((kG_M_cpd00035_c*kmc_R_rxn13871_M_cpd00035_c)^1*(kG_M_cpd17064_c*kmc_R_rxn13871_M_cpd17064_c)^1*(kG_M_cpd00146_c*kmc_R_rxn13871_M_cpd00146_c)^1/((kG_M_cpd00001_c*kmc_R_rxn13871_M_cpd00001_c)^1*(kG_M_cpd17065_c*kmc_R_rxn13871_M_cpd17065_c)^1*(kG_M_cpd00009_c*kmc_R_rxn13871_M_cpd00009_c)^1))/((1 + M_cpd00035_c*c/kmc_R_rxn13871_M_cpd00035_c)*(1 + M_cpd17064_c*c/kmc_R_rxn13871_M_cpd17064_c)*(1 + M_cpd00146_c*c/kmc_R_rxn13871_M_cpd00146_c))); R_rxn13871 is "Pseudomonas aeruginosa LPS lumped L-ala and CONH2 addition reaction";
    kmc_R_rxn13871_M_cpd00035_c = 1 substance; kmc_R_rxn13871_M_cpd00146_c = 1 substance; kmc_R_rxn13871_M_cpd17064_c = 1 substance; kmc_R_rxn13871_M_cpd00001_c = 1 substance; kmc_R_rxn13871_M_cpd00009_c = 1 substance; kmc_R_rxn13871_M_cpd17065_c = 1 substance; vmag_R_rxn13871 = 1 mole_per_second;
  // SUBSYSTEM: Lipopolysaccharide biosynthesis
  // Confidence Level:
  // AUTHORS:
  R_rxn13926: $M_cpd17094_c => $M_cpd17093_c; vmax_R_rxn13926*M_cpd17094_c*c/(kmc_R_rxn13926_M_cpd17094_c + M_cpd17094_c*c); R_rxn13926 is "UDP-N-acetyl-mannosamine (2NAc3N) acid (CH3C=NH) addase";
    vmax_R_rxn13926 = 1 mole_per_second; kmc_R_rxn13926_M_cpd17094_c = 1 substance;

  // Unit definitions:
  unit mmol_per_gDW_per_hr = 1e-3 mole / (gram * 2.777778e-4 second);
  unit volume = litre;
  unit substance = mole;
  unit area = metre^2;
  unit mole_per_second = mole / second;
end
