// SBML level 3 version 1

model main()
  // model units - substance: substance, time: second, volume: volume, area: area, length: metre, extent: substance

  // Compartments:
  compartment c = 1 volume; c is "Cytoplasm";
  compartment e; e has volume; e is "Extracellular";

  // Species:
  // FORMULA: H
  // CHARGE: 1
  species M_cpd00067_c in c = 0; M_cpd00067_c is "H+";
  // FORMULA: H2O
  // CHARGE: 0
  species M_cpd00001_c in c = 0; M_cpd00001_c is "H2O";
  // FORMULA: C21H26N7O17P3
  // CHARGE: -2
  species M_cpd00006_c in c = 0; M_cpd00006_c is "NADP";
  // FORMULA: C21H27N7O17P3
  // CHARGE: -3
  species M_cpd00005_c in c = 0; M_cpd00005_c is "NADPH";
  // FORMULA: CO2
  // CHARGE: 0
  species M_cpd00011_c in c = 0; M_cpd00011_c is "CO2";
  // FORMULA: C4H6NO4
  // CHARGE: -1
  species M_cpd00041_c in c = 0; M_cpd00041_c is "L-Aspartate";
  // FORMULA: HO4P
  // CHARGE: -2
  species M_cpd00009_c in c = 0; M_cpd00009_c is "Phosphate";
  // FORMULA: C49H74O4
  // CHARGE: 0
  species M_cpd15560_c in c = 0; M_cpd15560_c is "Ubiquinone-8";
  // FORMULA: C49H76O4
  // CHARGE: 0
  species M_cpd15561_c in c = 0; M_cpd15561_c is "Ubiquinol-8";
  // FORMULA: C54H82O4
  // CHARGE: 0
  species M_cpd01351_c in c = 0; M_cpd01351_c is "Ubiquinone-9";
  // FORMULA: C54H84O4
  // CHARGE: 0
  species M_cJB00125_c in c = 0; M_cJB00125_c is "Ubiquinol-9";
  // FORMULA: O2
  // CHARGE: 0
  species M_cpd00007_c in c = 0; M_cpd00007_c is "O2";
  // FORMULA: H2O2
  // CHARGE: 0
  species M_cpd00025_c in c = 0; M_cpd00025_c is "H2O2";
  // FORMULA: C10H13N5O13P3
  // CHARGE: -3
  species M_cpd00002_c in c = 0; M_cpd00002_c is "ATP";
  // FORMULA: C10H13N5O10P2
  // CHARGE: -2
  species M_cpd00008_c in c = 0; M_cpd00008_c is "ADP";
  // FORMULA: C6H7NO2R2S2
  // CHARGE: 0
  species M_cpd11420_c in c = 0; M_cpd11420_c is "trdox";
  // FORMULA: C6H9NO2R2S2
  // CHARGE: 0
  species M_cpd11421_c in c = 0; M_cpd11421_c is "trdrd";
  // FORMULA: C5H8NO4
  // CHARGE: -1
  species M_cpd00023_c in c = 0; M_cpd00023_c is "L-Glutamate";
  // FORMULA: C5H10N2O3
  // CHARGE: 0
  species M_cpd00053_c in c = 0; M_cpd00053_c is "L-Glutamine";
  // FORMULA: C19H19N7O6
  // CHARGE: -2
  species M_cpd00330_c in c = 0; M_cpd00330_c is "Dihydrofolate";
  // FORMULA: C20H21N7O6
  // CHARGE: -2
  species M_cpd00125_c in c = 0; M_cpd00125_c is "5-10-Methylenetetrahydrofolate";
  // FORMULA: H4N
  // CHARGE: 1
  species M_cpd00013_c in c = 0; M_cpd00013_c is "NH3";
  // FORMULA: H2O7P2
  // CHARGE: -2
  species M_cpd00012_c in c = 0; M_cpd00012_c is "PPi";
  // FORMULA: C9H13N3O14P3
  // CHARGE: -3
  species M_cpd00052_c in c = 0; M_cpd00052_c is "CTP";
  // FORMULA: C5H3N2O4
  // CHARGE: -1
  species M_cpd00247_c in c = 0; M_cpd00247_c is "Orotate";
  // FORMULA: C4H5N3O
  // CHARGE: 0
  species M_cpd00307_c in c = 0; M_cpd00307_c is "Cytosine";
  // FORMULA: C9H13N3O5
  // CHARGE: 0
  species M_cpd00367_c in c = 0; M_cpd00367_c is "Cytidine";
  // FORMULA: C9H13N3O4
  // CHARGE: 0
  species M_cpd00654_c in c = 0; M_cpd00654_c is "Deoxycytidine";
  // FORMULA: C10H14N2O5
  // CHARGE: 0
  species M_cpd00184_c in c = 0; M_cpd00184_c is "Thymidine";
  // FORMULA: C9H12N2O6
  // CHARGE: 0
  species M_cpd00249_c in c = 0; M_cpd00249_c is "Uridine";
  // FORMULA: C9H13N3O11P2
  // CHARGE: -2
  species M_cpd00096_c in c = 0; M_cpd00096_c is "CDP";
  // FORMULA: C9H13N3O10P2
  // CHARGE: -2
  species M_cpd00533_c in c = 0; M_cpd00533_c is "dCDP";
  // FORMULA: C9H12N2O12P2
  // CHARGE: -2
  species M_cpd00014_c in c = 0; M_cpd00014_c is "UDP";
  // FORMULA: C9H12N2O11P2
  // CHARGE: -2
  species M_cpd00978_c in c = 0; M_cpd00978_c is "dUDP";
  // FORMULA: C4H4N2O2
  // CHARGE: 0
  species M_cpd00092_c in c = 0; M_cpd00092_c is "Uracil";
  // FORMULA: C51H74O2
  // CHARGE: 0
  species M_cpd15499_c in c = 0; M_cpd15499_c is "Menaquinol_8";
  // FORMULA: C51H72O2
  // CHARGE: 0
  species M_cpd15500_c in c = 0; M_cpd15500_c is "Menaquinone_8";
  // FORMULA: C9H13N3O8P
  // CHARGE: -1
  species M_cpd00046_c in c = 0; M_cpd00046_c is "CMP";
  // FORMULA: CH3NO5P
  // CHARGE: -1
  species M_cpd00146_c in c = 0; M_cpd00146_c is "Carbamoylphosphate";
  // FORMULA: C5H10O14P3
  // CHARGE: -3
  species M_cpd00103_c in c = 0; M_cpd00103_c is "PRPP";
  // FORMULA: C9H12N2O9P
  // CHARGE: -1
  species M_cpd00091_c in c = 0; M_cpd00091_c is "UMP";
  // FORMULA: C5H10O8P
  // CHARGE: -1
  species M_cpd00101_c in c = 0; M_cpd00101_c is "ribose-5-phosphate";
  // FORMULA: C9H12N2O9P
  // CHARGE: -1
  species M_cpd00859_c in c = 0; M_cpd00859_c is "Pseudouridine 5'-phosphate";
  // FORMULA: C9H12N2O8P
  // CHARGE: -1
  species M_cpd00299_c in c = 0; M_cpd00299_c is "dUMP";
  // FORMULA: C10H14N2O8P
  // CHARGE: -1
  species M_cpd00298_c in c = 0; M_cpd00298_c is "dTMP";
  // FORMULA: C5H6N2O5
  // CHARGE: -2
  species M_cpd00343_c in c = 0; M_cpd00343_c is "N-Carbamoyl-L-aspartate";
  // FORMULA: C10H14N2O11P2
  // CHARGE: -2
  species M_cpd00297_c in c = 0; M_cpd00297_c is "dTDP";
  // FORMULA: C9H13N3O13P3
  // CHARGE: -3
  species M_cpd00356_c in c = 0; M_cpd00356_c is "dCTP";
  // FORMULA: C9H12N2O15P3
  // CHARGE: -3
  species M_cpd00062_c in c = 0; M_cpd00062_c is "UTP";
  // FORMULA: C9H12N2O14P3
  // CHARGE: -3
  species M_cpd00358_c in c = 0; M_cpd00358_c is "dUTP";
  // FORMULA: C10H11N2O11P
  // CHARGE: -2
  species M_cpd00810_c in c = 0; M_cpd00810_c is "Orotidylic acid";
  // FORMULA: C5H5N2O4
  // CHARGE: -1
  species M_cpd00282_c in c = 0; M_cpd00282_c is "S-Dihydroorotate";
  // FORMULA: C9H13N3O7P
  // CHARGE: -1
  species M_cpd00206_c in c = 0; M_cpd00206_c is "dCMP";
  // FORMULA: C10H14N2O14P3
  // CHARGE: -3
  species M_cpd00357_c in c = 0; M_cpd00357_c is "TTP";

  // Parameters:
  LOWER_BOUND_rxn05289 = -1000;
  UPPER_BOUND_rxn05289 = 1000;
  LOWER_BOUND_rxn06076 = 0;
  UPPER_BOUND_rxn06076 = 1000;
  LOWER_BOUND_rxn06075 = 0;
  UPPER_BOUND_rxn06075 = 1000;
  LOWER_BOUND_rxn00711 = 0;
  UPPER_BOUND_rxn00711 = 1000;
  LOWER_BOUND_rxn00776 = 0;
  UPPER_BOUND_rxn00776 = 1000;
  LOWER_BOUND_rxn01520 = 0;
  UPPER_BOUND_rxn01520 = 1000;
  LOWER_BOUND_rxn01018 = 0;
  UPPER_BOUND_rxn01018 = 1000;
  LOWER_BOUND_rxn00717 = 0;
  UPPER_BOUND_rxn00717 = 1000;
  LOWER_BOUND_rxn00710 = 0;
  UPPER_BOUND_rxn00710 = 1000;
  LOWER_BOUND_rxn01513 = -1000;
  UPPER_BOUND_rxn01513 = 1000;
  LOWER_BOUND_rxn01360 = 0;
  UPPER_BOUND_rxn01360 = 1000;
  LOWER_BOUND_rxn08335 = -1000;
  UPPER_BOUND_rxn08335 = 1000;
  LOWER_BOUND_rJB00259 = -1000;
  UPPER_BOUND_rJB00259 = 1000;
  LOWER_BOUND_rxn08336 = 0;
  UPPER_BOUND_rxn08336 = 0;
  LOWER_BOUND_rxn00364 = -1000;
  UPPER_BOUND_rxn00364 = 1000;
  LOWER_BOUND_rxn01219 = -1000;
  UPPER_BOUND_rxn01219 = 1000;
  LOWER_BOUND_rxn01672 = 0;
  UPPER_BOUND_rxn01672 = 1000;
  LOWER_BOUND_rxn01465 = -1000;
  UPPER_BOUND_rxn01465 = 1000;
  LOWER_BOUND_rxn00363 = 0;
  UPPER_BOUND_rxn00363 = 1000;
  LOWER_BOUND_rxn01218 = 0;
  UPPER_BOUND_rxn01218 = 1000;
  LOWER_BOUND_rxn01145 = 0;
  UPPER_BOUND_rxn01145 = 1000;
  LOWER_BOUND_rxn00708 = 0;
  UPPER_BOUND_rxn00708 = 1000;
  LOWER_BOUND_rxn00412 = 0;
  UPPER_BOUND_rxn00412 = 1000;
  LOWER_BOUND_rxn00410 = -1000;
  UPPER_BOUND_rxn00410 = 1000;
  LOWER_BOUND_rxn00119 = -1000;
  UPPER_BOUND_rxn00119 = 1000;
  LOWER_BOUND_rxn01517 = -1000;
  UPPER_BOUND_rxn01517 = 1000;
  LOWER_BOUND_rxn00409 = -1000;
  UPPER_BOUND_rxn00409 = 1000;
  LOWER_BOUND_rxn01673 = -1000;
  UPPER_BOUND_rxn01673 = 1000;
  LOWER_BOUND_rxn01512 = -1000;
  UPPER_BOUND_rxn01512 = 1000;
  LOWER_BOUND_rxn01678 = -1000;
  UPPER_BOUND_rxn01678 = 1000;
  LOWER_BOUND_rxn00117 = -1000;
  UPPER_BOUND_rxn00117 = 1000;
  LOWER_BOUND_rxn01514 = 0;
  UPPER_BOUND_rxn01514 = 1000;
  LOWER_BOUND_rxn01519 = 0;
  UPPER_BOUND_rxn01519 = 1000;
  LOWER_BOUND_rxn01362 = -1000;
  UPPER_BOUND_rxn01362 = 1000;
  kG_M_cpd11421_c = 1 dimensionless; kG_M_cpd11421_c is "Energy constant of species trdrd";
  kG_M_cpd00096_c = 1 dimensionless; kG_M_cpd00096_c is "Energy constant of species CDP";
  kG_M_cpd00001_c = 1 dimensionless; kG_M_cpd00001_c is "Energy constant of species H2O";
  kG_M_cpd11420_c = 1 dimensionless; kG_M_cpd11420_c is "Energy constant of species trdox";
  kG_M_cpd00533_c = 1 dimensionless; kG_M_cpd00533_c is "Energy constant of species dCDP";
  kG_M_cpd00014_c = 1 dimensionless; kG_M_cpd00014_c is "Energy constant of species UDP";
  kG_M_cpd00978_c = 1 dimensionless; kG_M_cpd00978_c is "Energy constant of species dUDP";
  kG_M_cpd00041_c = 1 dimensionless; kG_M_cpd00041_c is "Energy constant of species L-Aspartate";
  kG_M_cpd00146_c = 1 dimensionless; kG_M_cpd00146_c is "Energy constant of species Carbamoylphosphate";
  kG_M_cpd00067_c = 1 dimensionless; kG_M_cpd00067_c is "Energy constant of species H+";
  kG_M_cpd00009_c = 1 dimensionless; kG_M_cpd00009_c is "Energy constant of species Phosphate";
  kG_M_cpd00343_c = 1 dimensionless; kG_M_cpd00343_c is "Energy constant of species N-Carbamoyl-L-aspartate";
  kG_M_cpd00307_c = 1 dimensionless; kG_M_cpd00307_c is "Energy constant of species Cytosine";
  kG_M_cpd00013_c = 1 dimensionless; kG_M_cpd00013_c is "Energy constant of species NH3";
  kG_M_cpd00092_c = 1 dimensionless; kG_M_cpd00092_c is "Energy constant of species Uracil";
  kG_M_cpd00356_c = 1 dimensionless; kG_M_cpd00356_c is "Energy constant of species dCTP";
  kG_M_cpd00358_c = 1 dimensionless; kG_M_cpd00358_c is "Energy constant of species dUTP";
  kG_M_cpd00046_c = 1 dimensionless; kG_M_cpd00046_c is "Energy constant of species CMP";
  kG_M_cpd00367_c = 1 dimensionless; kG_M_cpd00367_c is "Energy constant of species Cytidine";
  kG_M_cpd00206_c = 1 dimensionless; kG_M_cpd00206_c is "Energy constant of species dCMP";
  kG_M_cpd00654_c = 1 dimensionless; kG_M_cpd00654_c is "Energy constant of species Deoxycytidine";
  kG_M_cpd00298_c = 1 dimensionless; kG_M_cpd00298_c is "Energy constant of species dTMP";
  kG_M_cpd00184_c = 1 dimensionless; kG_M_cpd00184_c is "Energy constant of species Thymidine";
  kG_M_cpd00091_c = 1 dimensionless; kG_M_cpd00091_c is "Energy constant of species UMP";
  kG_M_cpd00249_c = 1 dimensionless; kG_M_cpd00249_c is "Energy constant of species Uridine";
  kG_M_cpd00002_c = 1 dimensionless; kG_M_cpd00002_c is "Energy constant of species ATP";
  kG_M_cpd00053_c = 1 dimensionless; kG_M_cpd00053_c is "Energy constant of species L-Glutamine";
  kG_M_cpd00062_c = 1 dimensionless; kG_M_cpd00062_c is "Energy constant of species UTP";
  kG_M_cpd00008_c = 1 dimensionless; kG_M_cpd00008_c is "Energy constant of species ADP";
  kG_M_cpd00023_c = 1 dimensionless; kG_M_cpd00023_c is "Energy constant of species L-Glutamate";
  kG_M_cpd00052_c = 1 dimensionless; kG_M_cpd00052_c is "Energy constant of species CTP";
  kG_M_cpd00357_c = 1 dimensionless; kG_M_cpd00357_c is "Energy constant of species TTP";
  kG_M_cpd00297_c = 1 dimensionless; kG_M_cpd00297_c is "Energy constant of species dTDP";
  vmaf_R_rxn05289 = 1 mole_per_second; vmaf_R_rxn05289 is "Forward maximal velocity of reaction R_rxn05289";
  hco_R_rxn05289 = 1 dimensionless; hco_R_rxn05289 is "Reaction cooperativity";
  kmc_R_rxn05289_M_cpd00067_c = 1 substance; kmc_R_rxn05289_M_cpd00067_c is "Michaelis constant of species H+ in reaction R_rxn05289";
  kmc_R_rxn05289_M_cpd00005_c = 1 substance; kmc_R_rxn05289_M_cpd00005_c is "Michaelis constant of species NADPH in reaction R_rxn05289";
  kmc_R_rxn05289_M_cpd11420_c = 1 substance; kmc_R_rxn05289_M_cpd11420_c is "Michaelis constant of species trdox in reaction R_rxn05289";
  vmar_R_rxn05289 = 1 mole_per_second; vmar_R_rxn05289 is "Revere maximal velocity of reaction R_rxn05289";
  kmc_R_rxn05289_M_cpd00006_c = 1 substance; kmc_R_rxn05289_M_cpd00006_c is "Michaelis constant of species NADP in reaction R_rxn05289";
  kmc_R_rxn05289_M_cpd11421_c = 1 substance; kmc_R_rxn05289_M_cpd11421_c is "Michaelis constant of species trdrd in reaction R_rxn05289";
  kmc_R_rxn06076_M_cpd11421_c = 1 substance; kmc_R_rxn06076_M_cpd11421_c is "Michaelis constant of species trdrd in reaction R_rxn06076";
  kmc_R_rxn06076_M_cpd00096_c = 1 substance; kmc_R_rxn06076_M_cpd00096_c is "Michaelis constant of species CDP in reaction R_rxn06076";
  kmc_R_rxn06076_M_cpd00001_c = 1 substance; kmc_R_rxn06076_M_cpd00001_c is "Michaelis constant of species H2O in reaction R_rxn06076";
  kmc_R_rxn06076_M_cpd11420_c = 1 substance; kmc_R_rxn06076_M_cpd11420_c is "Michaelis constant of species trdox in reaction R_rxn06076";
  kmc_R_rxn06076_M_cpd00533_c = 1 substance; kmc_R_rxn06076_M_cpd00533_c is "Michaelis constant of species dCDP in reaction R_rxn06076";
  vmag_R_rxn06076 = 1 mole_per_second; vmag_R_rxn06076 is "Maximal velocity geometric mean of reaction R_rxn06076";
  kmc_R_rxn06075_M_cpd11421_c = 1 substance; kmc_R_rxn06075_M_cpd11421_c is "Michaelis constant of species trdrd in reaction R_rxn06075";
  kmc_R_rxn06075_M_cpd00014_c = 1 substance; kmc_R_rxn06075_M_cpd00014_c is "Michaelis constant of species UDP in reaction R_rxn06075";
  kmc_R_rxn06075_M_cpd00001_c = 1 substance; kmc_R_rxn06075_M_cpd00001_c is "Michaelis constant of species H2O in reaction R_rxn06075";
  kmc_R_rxn06075_M_cpd11420_c = 1 substance; kmc_R_rxn06075_M_cpd11420_c is "Michaelis constant of species trdox in reaction R_rxn06075";
  kmc_R_rxn06075_M_cpd00978_c = 1 substance; kmc_R_rxn06075_M_cpd00978_c is "Michaelis constant of species dUDP in reaction R_rxn06075";
  vmag_R_rxn06075 = 1 mole_per_second; vmag_R_rxn06075 is "Maximal velocity geometric mean of reaction R_rxn06075";
  vmax_R_rxn00711 = 1 mole_per_second; vmax_R_rxn00711 is "Forward maximal velocity of reaction R_rxn00711";
  kmc_R_rxn00711_M_cpd00092_c = 1 substance; kmc_R_rxn00711_M_cpd00092_c is "Michaelis constant of species Uracil in reaction R_rxn00711";
  kmc_R_rxn00711_M_cpd00103_c = 1 substance; kmc_R_rxn00711_M_cpd00103_c is "Michaelis constant of species PRPP in reaction R_rxn00711";
  kic_R_rxn00711_M_cpd00092_c = 1 substance; kic_R_rxn00711_M_cpd00092_c is "Inhibitory constant for species Uracil of reaction R_rxn00711";
  vmax_R_rxn00776 = 1 mole_per_second; vmax_R_rxn00776 is "Forward maximal velocity of reaction R_rxn00776";
  kmc_R_rxn00776_M_cpd00092_c = 1 substance; kmc_R_rxn00776_M_cpd00092_c is "Michaelis constant of species Uracil in reaction R_rxn00776";
  kmc_R_rxn00776_M_cpd00101_c = 1 substance; kmc_R_rxn00776_M_cpd00101_c is "Michaelis constant of species ribose-5-phosphate in reaction R_rxn00776";
  kic_R_rxn00776_M_cpd00092_c = 1 substance; kic_R_rxn00776_M_cpd00092_c is "Inhibitory constant for species Uracil of reaction R_rxn00776";
  vmax_R_rxn01520 = 1 mole_per_second; vmax_R_rxn01520 is "Forward maximal velocity of reaction R_rxn01520";
  kmc_R_rxn01520_M_cpd00125_c = 1 substance; kmc_R_rxn01520_M_cpd00125_c is "Michaelis constant of species 5-10-Methylenetetrahydrofolate in reaction R_rxn01520";
  kmc_R_rxn01520_M_cpd00299_c = 1 substance; kmc_R_rxn01520_M_cpd00299_c is "Michaelis constant of species dUMP in reaction R_rxn01520";
  kic_R_rxn01520_M_cpd00125_c = 1 substance; kic_R_rxn01520_M_cpd00125_c is "Inhibitory constant for species 5-10-Methylenetetrahydrofolate of reaction R_rxn01520";
  kmc_R_rxn01018_M_cpd00041_c = 1 substance; kmc_R_rxn01018_M_cpd00041_c is "Michaelis constant of species L-Aspartate in reaction R_rxn01018";
  kmc_R_rxn01018_M_cpd00146_c = 1 substance; kmc_R_rxn01018_M_cpd00146_c is "Michaelis constant of species Carbamoylphosphate in reaction R_rxn01018";
  kmc_R_rxn01018_M_cpd00067_c = 1 substance; kmc_R_rxn01018_M_cpd00067_c is "Michaelis constant of species H+ in reaction R_rxn01018";
  kmc_R_rxn01018_M_cpd00009_c = 1 substance; kmc_R_rxn01018_M_cpd00009_c is "Michaelis constant of species Phosphate in reaction R_rxn01018";
  kmc_R_rxn01018_M_cpd00343_c = 1 substance; kmc_R_rxn01018_M_cpd00343_c is "Michaelis constant of species N-Carbamoyl-L-aspartate in reaction R_rxn01018";
  vmag_R_rxn01018 = 1 mole_per_second; vmag_R_rxn01018 is "Maximal velocity geometric mean of reaction R_rxn01018";
  kmc_R_rxn00717_M_cpd00067_c = 1 substance; kmc_R_rxn00717_M_cpd00067_c is "Michaelis constant of species H+ in reaction R_rxn00717";
  kmc_R_rxn00717_M_cpd00001_c = 1 substance; kmc_R_rxn00717_M_cpd00001_c is "Michaelis constant of species H2O in reaction R_rxn00717";
  kmc_R_rxn00717_M_cpd00307_c = 1 substance; kmc_R_rxn00717_M_cpd00307_c is "Michaelis constant of species Cytosine in reaction R_rxn00717";
  kmc_R_rxn00717_M_cpd00013_c = 1 substance; kmc_R_rxn00717_M_cpd00013_c is "Michaelis constant of species NH3 in reaction R_rxn00717";
  kmc_R_rxn00717_M_cpd00092_c = 1 substance; kmc_R_rxn00717_M_cpd00092_c is "Michaelis constant of species Uracil in reaction R_rxn00717";
  vmag_R_rxn00717 = 1 mole_per_second; vmag_R_rxn00717 is "Maximal velocity geometric mean of reaction R_rxn00717";
  vmax_R_rxn00710 = 1 mole_per_second; vmax_R_rxn00710 is "Forward maximal velocity of reaction R_rxn00710";
  kmc_R_rxn00710_M_cpd00067_c = 1 substance; kmc_R_rxn00710_M_cpd00067_c is "Michaelis constant of species H+ in reaction R_rxn00710";
  kmc_R_rxn00710_M_cpd00810_c = 1 substance; kmc_R_rxn00710_M_cpd00810_c is "Michaelis constant of species Orotidylic acid in reaction R_rxn00710";
  kic_R_rxn00710_M_cpd00067_c = 1 substance; kic_R_rxn00710_M_cpd00067_c is "Inhibitory constant for species H+ of reaction R_rxn00710";
  vmaf_R_rxn01513 = 1 mole_per_second; vmaf_R_rxn01513 is "Forward maximal velocity of reaction R_rxn01513";
  vmar_R_rxn01513 = 1 mole_per_second; vmar_R_rxn01513 is "Revere maximal velocity of reaction R_rxn01513";
  kmc_R_rxn01513_M_cpd00298_c = 1 substance; kmc_R_rxn01513_M_cpd00298_c is "Michaelis constant of species dTMP in reaction R_rxn01513";
  kmc_R_rxn01513_M_cpd00008_c = 1 substance; kmc_R_rxn01513_M_cpd00008_c is "Michaelis constant of species ADP in reaction R_rxn01513";
  kic_R_rxn01513_M_cpd00008_c = 1 substance; kic_R_rxn01513_M_cpd00008_c is "Inhibitory constant for species ADP of reaction R_rxn01513";
  kic_R_rxn01513_M_cpd00297_c = 1 substance; kic_R_rxn01513_M_cpd00297_c is "Inhibitory constant for species dTDP of reaction R_rxn01513";
  kic_R_rxn01513_M_cpd00002_c = 1 substance; kic_R_rxn01513_M_cpd00002_c is "Inhibitory constant for species ATP of reaction R_rxn01513";
  kic_R_rxn01513_M_cpd00298_c = 1 substance; kic_R_rxn01513_M_cpd00298_c is "Inhibitory constant for species dTMP of reaction R_rxn01513";
  vmax_R_rxn01360 = 1 mole_per_second; vmax_R_rxn01360 is "Forward maximal velocity of reaction R_rxn01360";
  kmc_R_rxn01360_M_cpd00007_c = 1 substance; kmc_R_rxn01360_M_cpd00007_c is "Michaelis constant of species O2 in reaction R_rxn01360";
  kmc_R_rxn01360_M_cpd00282_c = 1 substance; kmc_R_rxn01360_M_cpd00282_c is "Michaelis constant of species S-Dihydroorotate in reaction R_rxn01360";
  kic_R_rxn01360_M_cpd00007_c = 1 substance; kic_R_rxn01360_M_cpd00007_c is "Inhibitory constant for species O2 of reaction R_rxn01360";
  vmaf_R_rxn08335 = 1 mole_per_second; vmaf_R_rxn08335 is "Forward maximal velocity of reaction R_rxn08335";
  vmar_R_rxn08335 = 1 mole_per_second; vmar_R_rxn08335 is "Revere maximal velocity of reaction R_rxn08335";
  kmc_R_rxn08335_M_cpd00282_c = 1 substance; kmc_R_rxn08335_M_cpd00282_c is "Michaelis constant of species S-Dihydroorotate in reaction R_rxn08335";
  kmc_R_rxn08335_M_cpd15561_c = 1 substance; kmc_R_rxn08335_M_cpd15561_c is "Michaelis constant of species Ubiquinol-8 in reaction R_rxn08335";
  kic_R_rxn08335_M_cpd15561_c = 1 substance; kic_R_rxn08335_M_cpd15561_c is "Inhibitory constant for species Ubiquinol-8 of reaction R_rxn08335";
  kic_R_rxn08335_M_cpd00247_c = 1 substance; kic_R_rxn08335_M_cpd00247_c is "Inhibitory constant for species Orotate of reaction R_rxn08335";
  kic_R_rxn08335_M_cpd15560_c = 1 substance; kic_R_rxn08335_M_cpd15560_c is "Inhibitory constant for species Ubiquinone-8 of reaction R_rxn08335";
  kic_R_rxn08335_M_cpd00282_c = 1 substance; kic_R_rxn08335_M_cpd00282_c is "Inhibitory constant for species S-Dihydroorotate of reaction R_rxn08335";
  vmaf_R_rJB00259 = 1 mole_per_second; vmaf_R_rJB00259 is "Forward maximal velocity of reaction R_rJB00259";
  vmar_R_rJB00259 = 1 mole_per_second; vmar_R_rJB00259 is "Revere maximal velocity of reaction R_rJB00259";
  kmc_R_rJB00259_M_cpd00282_c = 1 substance; kmc_R_rJB00259_M_cpd00282_c is "Michaelis constant of species S-Dihydroorotate in reaction R_rJB00259";
  kmc_R_rJB00259_M_cJB00125_c = 1 substance; kmc_R_rJB00259_M_cJB00125_c is "Michaelis constant of species Ubiquinol-9 in reaction R_rJB00259";
  kic_R_rJB00259_M_cJB00125_c = 1 substance; kic_R_rJB00259_M_cJB00125_c is "Inhibitory constant for species Ubiquinol-9 of reaction R_rJB00259";
  kic_R_rJB00259_M_cpd00247_c = 1 substance; kic_R_rJB00259_M_cpd00247_c is "Inhibitory constant for species Orotate of reaction R_rJB00259";
  kic_R_rJB00259_M_cpd01351_c = 1 substance; kic_R_rJB00259_M_cpd01351_c is "Inhibitory constant for species Ubiquinone-9 of reaction R_rJB00259";
  kic_R_rJB00259_M_cpd00282_c = 1 substance; kic_R_rJB00259_M_cpd00282_c is "Inhibitory constant for species S-Dihydroorotate of reaction R_rJB00259";
  vmax_R_rxn08336 = 1 mole_per_second; vmax_R_rxn08336 is "Forward maximal velocity of reaction R_rxn08336";
  kmc_R_rxn08336_M_cpd15500_c = 1 substance; kmc_R_rxn08336_M_cpd15500_c is "Michaelis constant of species Menaquinone_8 in reaction R_rxn08336";
  kmc_R_rxn08336_M_cpd00282_c = 1 substance; kmc_R_rxn08336_M_cpd00282_c is "Michaelis constant of species S-Dihydroorotate in reaction R_rxn08336";
  kic_R_rxn08336_M_cpd15500_c = 1 substance; kic_R_rxn08336_M_cpd15500_c is "Inhibitory constant for species Menaquinone_8 of reaction R_rxn08336";
  vmaf_R_rxn00364 = 1 mole_per_second; vmaf_R_rxn00364 is "Forward maximal velocity of reaction R_rxn00364";
  vmar_R_rxn00364 = 1 mole_per_second; vmar_R_rxn00364 is "Revere maximal velocity of reaction R_rxn00364";
  kmc_R_rxn00364_M_cpd00046_c = 1 substance; kmc_R_rxn00364_M_cpd00046_c is "Michaelis constant of species CMP in reaction R_rxn00364";
  kmc_R_rxn00364_M_cpd00008_c = 1 substance; kmc_R_rxn00364_M_cpd00008_c is "Michaelis constant of species ADP in reaction R_rxn00364";
  kic_R_rxn00364_M_cpd00008_c = 1 substance; kic_R_rxn00364_M_cpd00008_c is "Inhibitory constant for species ADP of reaction R_rxn00364";
  kic_R_rxn00364_M_cpd00096_c = 1 substance; kic_R_rxn00364_M_cpd00096_c is "Inhibitory constant for species CDP of reaction R_rxn00364";
  kic_R_rxn00364_M_cpd00002_c = 1 substance; kic_R_rxn00364_M_cpd00002_c is "Inhibitory constant for species ATP of reaction R_rxn00364";
  kic_R_rxn00364_M_cpd00046_c = 1 substance; kic_R_rxn00364_M_cpd00046_c is "Inhibitory constant for species CMP of reaction R_rxn00364";
  vmaf_R_rxn01219 = 1 mole_per_second; vmaf_R_rxn01219 is "Forward maximal velocity of reaction R_rxn01219";
  vmar_R_rxn01219 = 1 mole_per_second; vmar_R_rxn01219 is "Revere maximal velocity of reaction R_rxn01219";
  kmc_R_rxn01219_M_cpd00206_c = 1 substance; kmc_R_rxn01219_M_cpd00206_c is "Michaelis constant of species dCMP in reaction R_rxn01219";
  kmc_R_rxn01219_M_cpd00008_c = 1 substance; kmc_R_rxn01219_M_cpd00008_c is "Michaelis constant of species ADP in reaction R_rxn01219";
  kic_R_rxn01219_M_cpd00008_c = 1 substance; kic_R_rxn01219_M_cpd00008_c is "Inhibitory constant for species ADP of reaction R_rxn01219";
  kic_R_rxn01219_M_cpd00533_c = 1 substance; kic_R_rxn01219_M_cpd00533_c is "Inhibitory constant for species dCDP of reaction R_rxn01219";
  kic_R_rxn01219_M_cpd00002_c = 1 substance; kic_R_rxn01219_M_cpd00002_c is "Inhibitory constant for species ATP of reaction R_rxn01219";
  kic_R_rxn01219_M_cpd00206_c = 1 substance; kic_R_rxn01219_M_cpd00206_c is "Inhibitory constant for species dCMP of reaction R_rxn01219";
  kmc_R_rxn01672_M_cpd00067_c = 1 substance; kmc_R_rxn01672_M_cpd00067_c is "Michaelis constant of species H+ in reaction R_rxn01672";
  kmc_R_rxn01672_M_cpd00001_c = 1 substance; kmc_R_rxn01672_M_cpd00001_c is "Michaelis constant of species H2O in reaction R_rxn01672";
  kmc_R_rxn01672_M_cpd00356_c = 1 substance; kmc_R_rxn01672_M_cpd00356_c is "Michaelis constant of species dCTP in reaction R_rxn01672";
  kmc_R_rxn01672_M_cpd00013_c = 1 substance; kmc_R_rxn01672_M_cpd00013_c is "Michaelis constant of species NH3 in reaction R_rxn01672";
  kmc_R_rxn01672_M_cpd00358_c = 1 substance; kmc_R_rxn01672_M_cpd00358_c is "Michaelis constant of species dUTP in reaction R_rxn01672";
  vmag_R_rxn01672 = 1 mole_per_second; vmag_R_rxn01672 is "Maximal velocity geometric mean of reaction R_rxn01672";
  vmaf_R_rxn01465 = 1 mole_per_second; vmaf_R_rxn01465 is "Forward maximal velocity of reaction R_rxn01465";
  vmar_R_rxn01465 = 1 mole_per_second; vmar_R_rxn01465 is "Revere maximal velocity of reaction R_rxn01465";
  kmc_R_rxn01465_M_cpd00282_c = 1 substance; kmc_R_rxn01465_M_cpd00282_c is "Michaelis constant of species S-Dihydroorotate in reaction R_rxn01465";
  kmc_R_rxn01465_M_cpd00067_c = 1 substance; kmc_R_rxn01465_M_cpd00067_c is "Michaelis constant of species H+ in reaction R_rxn01465";
  kic_R_rxn01465_M_cpd00067_c = 1 substance; kic_R_rxn01465_M_cpd00067_c is "Inhibitory constant for species H+ of reaction R_rxn01465";
  kic_R_rxn01465_M_cpd00343_c = 1 substance; kic_R_rxn01465_M_cpd00343_c is "Inhibitory constant for species N-Carbamoyl-L-aspartate of reaction R_rxn01465";
  kic_R_rxn01465_M_cpd00001_c = 1 substance; kic_R_rxn01465_M_cpd00001_c is "Inhibitory constant for species H2O of reaction R_rxn01465";
  kic_R_rxn01465_M_cpd00282_c = 1 substance; kic_R_rxn01465_M_cpd00282_c is "Inhibitory constant for species S-Dihydroorotate of reaction R_rxn01465";
  kmc_R_rxn00363_M_cpd00001_c = 1 substance; kmc_R_rxn00363_M_cpd00001_c is "Michaelis constant of species H2O in reaction R_rxn00363";
  kmc_R_rxn00363_M_cpd00046_c = 1 substance; kmc_R_rxn00363_M_cpd00046_c is "Michaelis constant of species CMP in reaction R_rxn00363";
  kmc_R_rxn00363_M_cpd00067_c = 1 substance; kmc_R_rxn00363_M_cpd00067_c is "Michaelis constant of species H+ in reaction R_rxn00363";
  kmc_R_rxn00363_M_cpd00009_c = 1 substance; kmc_R_rxn00363_M_cpd00009_c is "Michaelis constant of species Phosphate in reaction R_rxn00363";
  kmc_R_rxn00363_M_cpd00367_c = 1 substance; kmc_R_rxn00363_M_cpd00367_c is "Michaelis constant of species Cytidine in reaction R_rxn00363";
  vmag_R_rxn00363 = 1 mole_per_second; vmag_R_rxn00363 is "Maximal velocity geometric mean of reaction R_rxn00363";
  kmc_R_rxn01218_M_cpd00001_c = 1 substance; kmc_R_rxn01218_M_cpd00001_c is "Michaelis constant of species H2O in reaction R_rxn01218";
  kmc_R_rxn01218_M_cpd00206_c = 1 substance; kmc_R_rxn01218_M_cpd00206_c is "Michaelis constant of species dCMP in reaction R_rxn01218";
  kmc_R_rxn01218_M_cpd00067_c = 1 substance; kmc_R_rxn01218_M_cpd00067_c is "Michaelis constant of species H+ in reaction R_rxn01218";
  kmc_R_rxn01218_M_cpd00009_c = 1 substance; kmc_R_rxn01218_M_cpd00009_c is "Michaelis constant of species Phosphate in reaction R_rxn01218";
  kmc_R_rxn01218_M_cpd00654_c = 1 substance; kmc_R_rxn01218_M_cpd00654_c is "Michaelis constant of species Deoxycytidine in reaction R_rxn01218";
  vmag_R_rxn01218 = 1 mole_per_second; vmag_R_rxn01218 is "Maximal velocity geometric mean of reaction R_rxn01218";
  kmc_R_rxn01145_M_cpd00001_c = 1 substance; kmc_R_rxn01145_M_cpd00001_c is "Michaelis constant of species H2O in reaction R_rxn01145";
  kmc_R_rxn01145_M_cpd00298_c = 1 substance; kmc_R_rxn01145_M_cpd00298_c is "Michaelis constant of species dTMP in reaction R_rxn01145";
  kmc_R_rxn01145_M_cpd00067_c = 1 substance; kmc_R_rxn01145_M_cpd00067_c is "Michaelis constant of species H+ in reaction R_rxn01145";
  kmc_R_rxn01145_M_cpd00009_c = 1 substance; kmc_R_rxn01145_M_cpd00009_c is "Michaelis constant of species Phosphate in reaction R_rxn01145";
  kmc_R_rxn01145_M_cpd00184_c = 1 substance; kmc_R_rxn01145_M_cpd00184_c is "Michaelis constant of species Thymidine in reaction R_rxn01145";
  vmag_R_rxn01145 = 1 mole_per_second; vmag_R_rxn01145 is "Maximal velocity geometric mean of reaction R_rxn01145";
  kmc_R_rxn00708_M_cpd00001_c = 1 substance; kmc_R_rxn00708_M_cpd00001_c is "Michaelis constant of species H2O in reaction R_rxn00708";
  kmc_R_rxn00708_M_cpd00091_c = 1 substance; kmc_R_rxn00708_M_cpd00091_c is "Michaelis constant of species UMP in reaction R_rxn00708";
  kmc_R_rxn00708_M_cpd00067_c = 1 substance; kmc_R_rxn00708_M_cpd00067_c is "Michaelis constant of species H+ in reaction R_rxn00708";
  kmc_R_rxn00708_M_cpd00009_c = 1 substance; kmc_R_rxn00708_M_cpd00009_c is "Michaelis constant of species Phosphate in reaction R_rxn00708";
  kmc_R_rxn00708_M_cpd00249_c = 1 substance; kmc_R_rxn00708_M_cpd00249_c is "Michaelis constant of species Uridine in reaction R_rxn00708";
  vmag_R_rxn00708 = 1 mole_per_second; vmag_R_rxn00708 is "Maximal velocity geometric mean of reaction R_rxn00708";
  kmc_R_rxn00412_M_cpd00001_c = 1 substance; kmc_R_rxn00412_M_cpd00001_c is "Michaelis constant of species H2O in reaction R_rxn00412";
  kmc_R_rxn00412_M_cpd00002_c = 1 substance; kmc_R_rxn00412_M_cpd00002_c is "Michaelis constant of species ATP in reaction R_rxn00412";
  kmc_R_rxn00412_M_cpd00053_c = 1 substance; kmc_R_rxn00412_M_cpd00053_c is "Michaelis constant of species L-Glutamine in reaction R_rxn00412";
  kmc_R_rxn00412_M_cpd00062_c = 1 substance; kmc_R_rxn00412_M_cpd00062_c is "Michaelis constant of species UTP in reaction R_rxn00412";
  kmc_R_rxn00412_M_cpd00067_c = 1 substance; kmc_R_rxn00412_M_cpd00067_c is "Michaelis constant of species H+ in reaction R_rxn00412";
  kmc_R_rxn00412_M_cpd00009_c = 1 substance; kmc_R_rxn00412_M_cpd00009_c is "Michaelis constant of species Phosphate in reaction R_rxn00412";
  kmc_R_rxn00412_M_cpd00008_c = 1 substance; kmc_R_rxn00412_M_cpd00008_c is "Michaelis constant of species ADP in reaction R_rxn00412";
  kmc_R_rxn00412_M_cpd00023_c = 1 substance; kmc_R_rxn00412_M_cpd00023_c is "Michaelis constant of species L-Glutamate in reaction R_rxn00412";
  kmc_R_rxn00412_M_cpd00052_c = 1 substance; kmc_R_rxn00412_M_cpd00052_c is "Michaelis constant of species CTP in reaction R_rxn00412";
  vmag_R_rxn00412 = 1 mole_per_second; vmag_R_rxn00412 is "Maximal velocity geometric mean of reaction R_rxn00412";
  vmaf_R_rxn00410 = 1 mole_per_second; vmaf_R_rxn00410 is "Forward maximal velocity of reaction R_rxn00410";
  hco_R_rxn00410 = 1 dimensionless; hco_R_rxn00410 is "Reaction cooperativity";
  kmc_R_rxn00410_M_cpd00002_c = 1 substance; kmc_R_rxn00410_M_cpd00002_c is "Michaelis constant of species ATP in reaction R_rxn00410";
  kmc_R_rxn00410_M_cpd00013_c = 1 substance; kmc_R_rxn00410_M_cpd00013_c is "Michaelis constant of species NH3 in reaction R_rxn00410";
  kmc_R_rxn00410_M_cpd00062_c = 1 substance; kmc_R_rxn00410_M_cpd00062_c is "Michaelis constant of species UTP in reaction R_rxn00410";
  vmar_R_rxn00410 = 1 mole_per_second; vmar_R_rxn00410 is "Revere maximal velocity of reaction R_rxn00410";
  kmc_R_rxn00410_M_cpd00067_c = 1 substance; kmc_R_rxn00410_M_cpd00067_c is "Michaelis constant of species H+ in reaction R_rxn00410";
  kmc_R_rxn00410_M_cpd00009_c = 1 substance; kmc_R_rxn00410_M_cpd00009_c is "Michaelis constant of species Phosphate in reaction R_rxn00410";
  kmc_R_rxn00410_M_cpd00008_c = 1 substance; kmc_R_rxn00410_M_cpd00008_c is "Michaelis constant of species ADP in reaction R_rxn00410";
  kmc_R_rxn00410_M_cpd00052_c = 1 substance; kmc_R_rxn00410_M_cpd00052_c is "Michaelis constant of species CTP in reaction R_rxn00410";
  vmaf_R_rxn00119 = 1 mole_per_second; vmaf_R_rxn00119 is "Forward maximal velocity of reaction R_rxn00119";
  vmar_R_rxn00119 = 1 mole_per_second; vmar_R_rxn00119 is "Revere maximal velocity of reaction R_rxn00119";
  kmc_R_rxn00119_M_cpd00091_c = 1 substance; kmc_R_rxn00119_M_cpd00091_c is "Michaelis constant of species UMP in reaction R_rxn00119";
  kmc_R_rxn00119_M_cpd00008_c = 1 substance; kmc_R_rxn00119_M_cpd00008_c is "Michaelis constant of species ADP in reaction R_rxn00119";
  kic_R_rxn00119_M_cpd00008_c = 1 substance; kic_R_rxn00119_M_cpd00008_c is "Inhibitory constant for species ADP of reaction R_rxn00119";
  kic_R_rxn00119_M_cpd00014_c = 1 substance; kic_R_rxn00119_M_cpd00014_c is "Inhibitory constant for species UDP of reaction R_rxn00119";
  kic_R_rxn00119_M_cpd00002_c = 1 substance; kic_R_rxn00119_M_cpd00002_c is "Inhibitory constant for species ATP of reaction R_rxn00119";
  kic_R_rxn00119_M_cpd00091_c = 1 substance; kic_R_rxn00119_M_cpd00091_c is "Inhibitory constant for species UMP of reaction R_rxn00119";
  vmaf_R_rxn01517 = 1 mole_per_second; vmaf_R_rxn01517 is "Forward maximal velocity of reaction R_rxn01517";
  vmar_R_rxn01517 = 1 mole_per_second; vmar_R_rxn01517 is "Revere maximal velocity of reaction R_rxn01517";
  kmc_R_rxn01517_M_cpd00299_c = 1 substance; kmc_R_rxn01517_M_cpd00299_c is "Michaelis constant of species dUMP in reaction R_rxn01517";
  kmc_R_rxn01517_M_cpd00008_c = 1 substance; kmc_R_rxn01517_M_cpd00008_c is "Michaelis constant of species ADP in reaction R_rxn01517";
  kic_R_rxn01517_M_cpd00008_c = 1 substance; kic_R_rxn01517_M_cpd00008_c is "Inhibitory constant for species ADP of reaction R_rxn01517";
  kic_R_rxn01517_M_cpd00978_c = 1 substance; kic_R_rxn01517_M_cpd00978_c is "Inhibitory constant for species dUDP of reaction R_rxn01517";
  kic_R_rxn01517_M_cpd00002_c = 1 substance; kic_R_rxn01517_M_cpd00002_c is "Inhibitory constant for species ATP of reaction R_rxn01517";
  kic_R_rxn01517_M_cpd00299_c = 1 substance; kic_R_rxn01517_M_cpd00299_c is "Inhibitory constant for species dUMP of reaction R_rxn01517";
  vmaf_R_rxn00409 = 1 mole_per_second; vmaf_R_rxn00409 is "Forward maximal velocity of reaction R_rxn00409";
  vmar_R_rxn00409 = 1 mole_per_second; vmar_R_rxn00409 is "Revere maximal velocity of reaction R_rxn00409";
  kmc_R_rxn00409_M_cpd00096_c = 1 substance; kmc_R_rxn00409_M_cpd00096_c is "Michaelis constant of species CDP in reaction R_rxn00409";
  kmc_R_rxn00409_M_cpd00008_c = 1 substance; kmc_R_rxn00409_M_cpd00008_c is "Michaelis constant of species ADP in reaction R_rxn00409";
  kic_R_rxn00409_M_cpd00008_c = 1 substance; kic_R_rxn00409_M_cpd00008_c is "Inhibitory constant for species ADP of reaction R_rxn00409";
  kic_R_rxn00409_M_cpd00052_c = 1 substance; kic_R_rxn00409_M_cpd00052_c is "Inhibitory constant for species CTP of reaction R_rxn00409";
  kic_R_rxn00409_M_cpd00002_c = 1 substance; kic_R_rxn00409_M_cpd00002_c is "Inhibitory constant for species ATP of reaction R_rxn00409";
  kic_R_rxn00409_M_cpd00096_c = 1 substance; kic_R_rxn00409_M_cpd00096_c is "Inhibitory constant for species CDP of reaction R_rxn00409";
  vmaf_R_rxn01673 = 1 mole_per_second; vmaf_R_rxn01673 is "Forward maximal velocity of reaction R_rxn01673";
  vmar_R_rxn01673 = 1 mole_per_second; vmar_R_rxn01673 is "Revere maximal velocity of reaction R_rxn01673";
  kmc_R_rxn01673_M_cpd00533_c = 1 substance; kmc_R_rxn01673_M_cpd00533_c is "Michaelis constant of species dCDP in reaction R_rxn01673";
  kmc_R_rxn01673_M_cpd00008_c = 1 substance; kmc_R_rxn01673_M_cpd00008_c is "Michaelis constant of species ADP in reaction R_rxn01673";
  kic_R_rxn01673_M_cpd00008_c = 1 substance; kic_R_rxn01673_M_cpd00008_c is "Inhibitory constant for species ADP of reaction R_rxn01673";
  kic_R_rxn01673_M_cpd00356_c = 1 substance; kic_R_rxn01673_M_cpd00356_c is "Inhibitory constant for species dCTP of reaction R_rxn01673";
  kic_R_rxn01673_M_cpd00002_c = 1 substance; kic_R_rxn01673_M_cpd00002_c is "Inhibitory constant for species ATP of reaction R_rxn01673";
  kic_R_rxn01673_M_cpd00533_c = 1 substance; kic_R_rxn01673_M_cpd00533_c is "Inhibitory constant for species dCDP of reaction R_rxn01673";
  vmaf_R_rxn01512 = 1 mole_per_second; vmaf_R_rxn01512 is "Forward maximal velocity of reaction R_rxn01512";
  vmar_R_rxn01512 = 1 mole_per_second; vmar_R_rxn01512 is "Revere maximal velocity of reaction R_rxn01512";
  kmc_R_rxn01512_M_cpd00297_c = 1 substance; kmc_R_rxn01512_M_cpd00297_c is "Michaelis constant of species dTDP in reaction R_rxn01512";
  kmc_R_rxn01512_M_cpd00008_c = 1 substance; kmc_R_rxn01512_M_cpd00008_c is "Michaelis constant of species ADP in reaction R_rxn01512";
  kic_R_rxn01512_M_cpd00008_c = 1 substance; kic_R_rxn01512_M_cpd00008_c is "Inhibitory constant for species ADP of reaction R_rxn01512";
  kic_R_rxn01512_M_cpd00357_c = 1 substance; kic_R_rxn01512_M_cpd00357_c is "Inhibitory constant for species TTP of reaction R_rxn01512";
  kic_R_rxn01512_M_cpd00002_c = 1 substance; kic_R_rxn01512_M_cpd00002_c is "Inhibitory constant for species ATP of reaction R_rxn01512";
  kic_R_rxn01512_M_cpd00297_c = 1 substance; kic_R_rxn01512_M_cpd00297_c is "Inhibitory constant for species dTDP of reaction R_rxn01512";
  vmaf_R_rxn01678 = 1 mole_per_second; vmaf_R_rxn01678 is "Forward maximal velocity of reaction R_rxn01678";
  vmar_R_rxn01678 = 1 mole_per_second; vmar_R_rxn01678 is "Revere maximal velocity of reaction R_rxn01678";
  kmc_R_rxn01678_M_cpd00978_c = 1 substance; kmc_R_rxn01678_M_cpd00978_c is "Michaelis constant of species dUDP in reaction R_rxn01678";
  kmc_R_rxn01678_M_cpd00008_c = 1 substance; kmc_R_rxn01678_M_cpd00008_c is "Michaelis constant of species ADP in reaction R_rxn01678";
  kic_R_rxn01678_M_cpd00008_c = 1 substance; kic_R_rxn01678_M_cpd00008_c is "Inhibitory constant for species ADP of reaction R_rxn01678";
  kic_R_rxn01678_M_cpd00358_c = 1 substance; kic_R_rxn01678_M_cpd00358_c is "Inhibitory constant for species dUTP of reaction R_rxn01678";
  kic_R_rxn01678_M_cpd00002_c = 1 substance; kic_R_rxn01678_M_cpd00002_c is "Inhibitory constant for species ATP of reaction R_rxn01678";
  kic_R_rxn01678_M_cpd00978_c = 1 substance; kic_R_rxn01678_M_cpd00978_c is "Inhibitory constant for species dUDP of reaction R_rxn01678";
  vmaf_R_rxn00117 = 1 mole_per_second; vmaf_R_rxn00117 is "Forward maximal velocity of reaction R_rxn00117";
  vmar_R_rxn00117 = 1 mole_per_second; vmar_R_rxn00117 is "Revere maximal velocity of reaction R_rxn00117";
  kmc_R_rxn00117_M_cpd00014_c = 1 substance; kmc_R_rxn00117_M_cpd00014_c is "Michaelis constant of species UDP in reaction R_rxn00117";
  kmc_R_rxn00117_M_cpd00008_c = 1 substance; kmc_R_rxn00117_M_cpd00008_c is "Michaelis constant of species ADP in reaction R_rxn00117";
  kic_R_rxn00117_M_cpd00008_c = 1 substance; kic_R_rxn00117_M_cpd00008_c is "Inhibitory constant for species ADP of reaction R_rxn00117";
  kic_R_rxn00117_M_cpd00062_c = 1 substance; kic_R_rxn00117_M_cpd00062_c is "Inhibitory constant for species UTP of reaction R_rxn00117";
  kic_R_rxn00117_M_cpd00002_c = 1 substance; kic_R_rxn00117_M_cpd00002_c is "Inhibitory constant for species ATP of reaction R_rxn00117";
  kic_R_rxn00117_M_cpd00014_c = 1 substance; kic_R_rxn00117_M_cpd00014_c is "Inhibitory constant for species UDP of reaction R_rxn00117";
  kmc_R_rxn01514_M_cpd00001_c = 1 substance; kmc_R_rxn01514_M_cpd00001_c is "Michaelis constant of species H2O in reaction R_rxn01514";
  kmc_R_rxn01514_M_cpd00357_c = 1 substance; kmc_R_rxn01514_M_cpd00357_c is "Michaelis constant of species TTP in reaction R_rxn01514";
  kmc_R_rxn01514_M_cpd00067_c = 1 substance; kmc_R_rxn01514_M_cpd00067_c is "Michaelis constant of species H+ in reaction R_rxn01514";
  kmc_R_rxn01514_M_cpd00009_c = 1 substance; kmc_R_rxn01514_M_cpd00009_c is "Michaelis constant of species Phosphate in reaction R_rxn01514";
  kmc_R_rxn01514_M_cpd00297_c = 1 substance; kmc_R_rxn01514_M_cpd00297_c is "Michaelis constant of species dTDP in reaction R_rxn01514";
  vmag_R_rxn01514 = 1 mole_per_second; vmag_R_rxn01514 is "Maximal velocity geometric mean of reaction R_rxn01514";
  vmax_R_rxn01519 = 1 mole_per_second; vmax_R_rxn01519 is "Forward maximal velocity of reaction R_rxn01519";
  kmc_R_rxn01519_M_cpd00001_c = 1 substance; kmc_R_rxn01519_M_cpd00001_c is "Michaelis constant of species H2O in reaction R_rxn01519";
  kmc_R_rxn01519_M_cpd00358_c = 1 substance; kmc_R_rxn01519_M_cpd00358_c is "Michaelis constant of species dUTP in reaction R_rxn01519";
  kic_R_rxn01519_M_cpd00001_c = 1 substance; kic_R_rxn01519_M_cpd00001_c is "Inhibitory constant for species H2O of reaction R_rxn01519";
  vmaf_R_rxn01362 = 1 mole_per_second; vmaf_R_rxn01362 is "Forward maximal velocity of reaction R_rxn01362";
  vmar_R_rxn01362 = 1 mole_per_second; vmar_R_rxn01362 is "Revere maximal velocity of reaction R_rxn01362";
  kmc_R_rxn01362_M_cpd00810_c = 1 substance; kmc_R_rxn01362_M_cpd00810_c is "Michaelis constant of species Orotidylic acid in reaction R_rxn01362";
  kmc_R_rxn01362_M_cpd00247_c = 1 substance; kmc_R_rxn01362_M_cpd00247_c is "Michaelis constant of species Orotate in reaction R_rxn01362";
  kic_R_rxn01362_M_cpd00247_c = 1 substance; kic_R_rxn01362_M_cpd00247_c is "Inhibitory constant for species Orotate of reaction R_rxn01362";
  kic_R_rxn01362_M_cpd00103_c = 1 substance; kic_R_rxn01362_M_cpd00103_c is "Inhibitory constant for species PRPP of reaction R_rxn01362";
  kic_R_rxn01362_M_cpd00012_c = 1 substance; kic_R_rxn01362_M_cpd00012_c is "Inhibitory constant for species PPi of reaction R_rxn01362";
  kic_R_rxn01362_M_cpd00810_c = 1 substance; kic_R_rxn01362_M_cpd00810_c is "Inhibitory constant for species Orotidylic acid of reaction R_rxn01362";

  // Reactions:
  // GENE_ASSOCIATION: (PA2616 or PA0849)
  // SUBSYSTEM: Pyrimidine metabolism
  // EC Number: 1.6.4.5,1.8.1.9
  // Confidence Level:
  // AUTHORS:
  R_rxn05289: M_cpd00067_c + M_cpd00005_c + M_cpd11420_c -> M_cpd00006_c + M_cpd11421_c; (R_rxn05289_vmaf_R_rxn05289*(M_cpd00067_c*c/R_rxn05289_kmc_R_rxn05289_M_cpd00067_c)^R_rxn05289_hco_R_rxn05289*(M_cpd00005_c*c/R_rxn05289_kmc_R_rxn05289_M_cpd00005_c)^R_rxn05289_hco_R_rxn05289*(M_cpd11420_c*c/R_rxn05289_kmc_R_rxn05289_M_cpd11420_c)^R_rxn05289_hco_R_rxn05289 - R_rxn05289_vmar_R_rxn05289*(M_cpd00006_c*c/R_rxn05289_kmc_R_rxn05289_M_cpd00006_c)^R_rxn05289_hco_R_rxn05289*(M_cpd11421_c*c/R_rxn05289_kmc_R_rxn05289_M_cpd11421_c)^R_rxn05289_hco_R_rxn05289)/((1 + M_cpd00067_c*c/R_rxn05289_kmc_R_rxn05289_M_cpd00067_c)^R_rxn05289_hco_R_rxn05289*(1 + M_cpd00005_c*c/R_rxn05289_kmc_R_rxn05289_M_cpd00005_c)^R_rxn05289_hco_R_rxn05289*(1 + M_cpd11420_c*c/R_rxn05289_kmc_R_rxn05289_M_cpd11420_c)^R_rxn05289_hco_R_rxn05289 + (1 + M_cpd00006_c*c/R_rxn05289_kmc_R_rxn05289_M_cpd00006_c)^R_rxn05289_hco_R_rxn05289*(1 + M_cpd11421_c*c/R_rxn05289_kmc_R_rxn05289_M_cpd11421_c)^R_rxn05289_hco_R_rxn05289 - 1); R_rxn05289 is "thioredoxin reductase (NADPH)";  // hasProperty ec-code:1.6.4.5 ec-code:1.8.1.9
    R_rxn05289_vmaf_R_rxn05289 = 1 mole_per_second; R_rxn05289_hco_R_rxn05289 = 1 dimensionless; R_rxn05289_kmc_R_rxn05289_M_cpd00067_c = 1 substance; R_rxn05289_kmc_R_rxn05289_M_cpd00005_c = 1 substance; R_rxn05289_kmc_R_rxn05289_M_cpd11420_c = 1 substance; R_rxn05289_vmar_R_rxn05289 = 1 mole_per_second; R_rxn05289_kmc_R_rxn05289_M_cpd00006_c = 1 substance; R_rxn05289_kmc_R_rxn05289_M_cpd11421_c = 1 substance;
  // Thermodynamically independent convenience kinetics
  // GENE_ASSOCIATION: (PA1156 and PA1155)
  // SUBSYSTEM: Pyrimidine metabolism
  // EC Number: 1.17.4.1
  // Confidence Level:
  // AUTHORS:
  R_rxn06076: M_cpd11421_c + M_cpd00096_c => M_cpd00001_c + M_cpd11420_c + M_cpd00533_c; R_rxn06076_vmag_R_rxn06076*(M_cpd11421_c*c/R_rxn06076_kmc_R_rxn06076_M_cpd11421_c*(M_cpd00096_c*c/R_rxn06076_kmc_R_rxn06076_M_cpd00096_c)*sqrt((kG_M_cpd11421_c*R_rxn06076_kmc_R_rxn06076_M_cpd11421_c)^1*(kG_M_cpd00096_c*R_rxn06076_kmc_R_rxn06076_M_cpd00096_c)^1/((kG_M_cpd00001_c*R_rxn06076_kmc_R_rxn06076_M_cpd00001_c)^1*(kG_M_cpd00533_c*R_rxn06076_kmc_R_rxn06076_M_cpd00533_c)^1*(kG_M_cpd11420_c*R_rxn06076_kmc_R_rxn06076_M_cpd11420_c)^1))/((1 + M_cpd11421_c*c/R_rxn06076_kmc_R_rxn06076_M_cpd11421_c)*(1 + M_cpd00096_c*c/R_rxn06076_kmc_R_rxn06076_M_cpd00096_c))); R_rxn06076 is "ribonucleoside-diphosphate reductase (CDP)";  // hasProperty ec-code:1.17.4.1
    R_rxn06076_kmc_R_rxn06076_M_cpd11421_c = 1 substance; R_rxn06076_kmc_R_rxn06076_M_cpd00096_c = 1 substance; R_rxn06076_kmc_R_rxn06076_M_cpd00001_c = 1 substance; R_rxn06076_kmc_R_rxn06076_M_cpd11420_c = 1 substance; R_rxn06076_kmc_R_rxn06076_M_cpd00533_c = 1 substance; R_rxn06076_vmag_R_rxn06076 = 1 mole_per_second;
  // Thermodynamically independent convenience kinetics
  // GENE_ASSOCIATION: (PA1156 and PA1155)
  // SUBSYSTEM: Pyrimidine metabolism
  // EC Number: 1.17.4.1
  // Confidence Level:
  // AUTHORS:
  R_rxn06075: M_cpd11421_c + M_cpd00014_c => M_cpd00001_c + M_cpd11420_c + M_cpd00978_c; R_rxn06075_vmag_R_rxn06075*(M_cpd11421_c*c/R_rxn06075_kmc_R_rxn06075_M_cpd11421_c*(M_cpd00014_c*c/R_rxn06075_kmc_R_rxn06075_M_cpd00014_c)*sqrt((kG_M_cpd11421_c*R_rxn06075_kmc_R_rxn06075_M_cpd11421_c)^1*(kG_M_cpd00014_c*R_rxn06075_kmc_R_rxn06075_M_cpd00014_c)^1/((kG_M_cpd00001_c*R_rxn06075_kmc_R_rxn06075_M_cpd00001_c)^1*(kG_M_cpd00978_c*R_rxn06075_kmc_R_rxn06075_M_cpd00978_c)^1*(kG_M_cpd11420_c*R_rxn06075_kmc_R_rxn06075_M_cpd11420_c)^1))/((1 + M_cpd11421_c*c/R_rxn06075_kmc_R_rxn06075_M_cpd11421_c)*(1 + M_cpd00014_c*c/R_rxn06075_kmc_R_rxn06075_M_cpd00014_c))); R_rxn06075 is "ribonucleoside-diphosphate reductase (UDP)";  // hasProperty ec-code:1.17.4.1
    R_rxn06075_kmc_R_rxn06075_M_cpd11421_c = 1 substance; R_rxn06075_kmc_R_rxn06075_M_cpd00014_c = 1 substance; R_rxn06075_kmc_R_rxn06075_M_cpd00001_c = 1 substance; R_rxn06075_kmc_R_rxn06075_M_cpd11420_c = 1 substance; R_rxn06075_kmc_R_rxn06075_M_cpd00978_c = 1 substance; R_rxn06075_vmag_R_rxn06075 = 1 mole_per_second;
  // Irreversibel rapid-equilibrium random order ternary-complex mechanism, two products
  // GENE_ASSOCIATION: (PA4646 or PA0403)
  // SUBSYSTEM: Pyrimidine metabolism
  // EC Number: 2.4.2.9
  // Confidence Level:
  // AUTHORS:
  R_rxn00711: M_cpd00092_c + M_cpd00103_c => M_cpd00012_c + M_cpd00091_c; R_rxn00711_vmax_R_rxn00711*M_cpd00103_c*c*M_cpd00092_c*c/(R_rxn00711_kic_R_rxn00711_M_cpd00092_c*R_rxn00711_kmc_R_rxn00711_M_cpd00103_c + M_cpd00092_c*c*M_cpd00103_c*c + R_rxn00711_kmc_R_rxn00711_M_cpd00103_c*M_cpd00092_c*c + R_rxn00711_kmc_R_rxn00711_M_cpd00092_c*M_cpd00103_c*c); R_rxn00711 is "uracil phosphoribosyltransferase";  // hasProperty ec-code:2.4.2.9
    R_rxn00711_vmax_R_rxn00711 = 1 mole_per_second; R_rxn00711_kmc_R_rxn00711_M_cpd00092_c = 1 substance; R_rxn00711_kmc_R_rxn00711_M_cpd00103_c = 1 substance; R_rxn00711_kic_R_rxn00711_M_cpd00092_c = 1 substance;
  // Irreversibel rapid-equilibrium random order ternary-complex mechanism, two products
  // GENE_ASSOCIATION: (PA4742 or PA2975 or PA3246 or PA3114 or PA4544)
  // SUBSYSTEM: Pyrimidine metabolism
  // EC Number: 4.2.1.70
  // Confidence Level:
  // AUTHORS:
  R_rxn00776: M_cpd00092_c + M_cpd00101_c => M_cpd00001_c + M_cpd00859_c; R_rxn00776_vmax_R_rxn00776*M_cpd00101_c*c*M_cpd00092_c*c/(R_rxn00776_kic_R_rxn00776_M_cpd00092_c*R_rxn00776_kmc_R_rxn00776_M_cpd00101_c + M_cpd00092_c*c*M_cpd00101_c*c + R_rxn00776_kmc_R_rxn00776_M_cpd00101_c*M_cpd00092_c*c + R_rxn00776_kmc_R_rxn00776_M_cpd00092_c*M_cpd00101_c*c); R_rxn00776 is "yUMP synthetase";  // hasProperty ec-code:4.2.1.70
    R_rxn00776_vmax_R_rxn00776 = 1 mole_per_second; R_rxn00776_kmc_R_rxn00776_M_cpd00092_c = 1 substance; R_rxn00776_kmc_R_rxn00776_M_cpd00101_c = 1 substance; R_rxn00776_kic_R_rxn00776_M_cpd00092_c = 1 substance;
  // Irreversibel rapid-equilibrium random order ternary-complex mechanism, two products
  // GENE_ASSOCIATION: PA0342
  // SUBSYSTEM: Pyrimidine metabolism
  // EC Number: 2.1.1.45
  // Confidence Level:
  // AUTHORS:
  R_rxn01520: M_cpd00125_c + M_cpd00299_c => M_cpd00330_c + M_cpd00298_c; R_rxn01520_vmax_R_rxn01520*M_cpd00299_c*c*M_cpd00125_c*c/(R_rxn01520_kic_R_rxn01520_M_cpd00125_c*R_rxn01520_kmc_R_rxn01520_M_cpd00299_c + M_cpd00125_c*c*M_cpd00299_c*c + R_rxn01520_kmc_R_rxn01520_M_cpd00299_c*M_cpd00125_c*c + R_rxn01520_kmc_R_rxn01520_M_cpd00125_c*M_cpd00299_c*c); R_rxn01520 is "thymidylate synthase";  // hasProperty ec-code:2.1.1.45
    R_rxn01520_vmax_R_rxn01520 = 1 mole_per_second; R_rxn01520_kmc_R_rxn01520_M_cpd00125_c = 1 substance; R_rxn01520_kmc_R_rxn01520_M_cpd00299_c = 1 substance; R_rxn01520_kic_R_rxn01520_M_cpd00125_c = 1 substance;
  // Thermodynamically independent convenience kinetics
  // GENE_ASSOCIATION: PA0402
  // SUBSYSTEM: Pyrimidine metabolism
  // EC Number: 2.1.3.2
  // Confidence Level:
  // AUTHORS:
  R_rxn01018: M_cpd00041_c + M_cpd00146_c => 2 M_cpd00067_c + M_cpd00009_c + M_cpd00343_c; R_rxn01018_vmag_R_rxn01018*(M_cpd00041_c*c/R_rxn01018_kmc_R_rxn01018_M_cpd00041_c*(M_cpd00146_c*c/R_rxn01018_kmc_R_rxn01018_M_cpd00146_c)*sqrt((kG_M_cpd00041_c*R_rxn01018_kmc_R_rxn01018_M_cpd00041_c)^1*(kG_M_cpd00146_c*R_rxn01018_kmc_R_rxn01018_M_cpd00146_c)^1/((kG_M_cpd00067_c*R_rxn01018_kmc_R_rxn01018_M_cpd00067_c)^2*(kG_M_cpd00343_c*R_rxn01018_kmc_R_rxn01018_M_cpd00343_c)^1*(kG_M_cpd00009_c*R_rxn01018_kmc_R_rxn01018_M_cpd00009_c)^1))/((1 + M_cpd00041_c*c/R_rxn01018_kmc_R_rxn01018_M_cpd00041_c)*(1 + M_cpd00146_c*c/R_rxn01018_kmc_R_rxn01018_M_cpd00146_c))); R_rxn01018 is "aspartate carbamoyltransferase";  // hasProperty ec-code:2.1.3.2
    R_rxn01018_kmc_R_rxn01018_M_cpd00041_c = 1 substance; R_rxn01018_kmc_R_rxn01018_M_cpd00146_c = 1 substance; R_rxn01018_kmc_R_rxn01018_M_cpd00067_c = 1 substance; R_rxn01018_kmc_R_rxn01018_M_cpd00009_c = 1 substance; R_rxn01018_kmc_R_rxn01018_M_cpd00343_c = 1 substance; R_rxn01018_vmag_R_rxn01018 = 1 mole_per_second;
  // Thermodynamically independent convenience kinetics
  // GENE_ASSOCIATION: PA0437
  // SUBSYSTEM: Pyrimidine metabolism
  // EC Number: 3.5.4.1
  // Confidence Level:
  // AUTHORS:
  R_rxn00717: M_cpd00067_c + M_cpd00001_c + M_cpd00307_c => M_cpd00013_c + M_cpd00092_c; R_rxn00717_vmag_R_rxn00717*(M_cpd00067_c*c/R_rxn00717_kmc_R_rxn00717_M_cpd00067_c*(M_cpd00307_c*c/R_rxn00717_kmc_R_rxn00717_M_cpd00307_c)*(M_cpd00001_c*c/R_rxn00717_kmc_R_rxn00717_M_cpd00001_c)*sqrt((kG_M_cpd00067_c*R_rxn00717_kmc_R_rxn00717_M_cpd00067_c)^1*(kG_M_cpd00307_c*R_rxn00717_kmc_R_rxn00717_M_cpd00307_c)^1*(kG_M_cpd00001_c*R_rxn00717_kmc_R_rxn00717_M_cpd00001_c)^1/((kG_M_cpd00013_c*R_rxn00717_kmc_R_rxn00717_M_cpd00013_c)^1*(kG_M_cpd00092_c*R_rxn00717_kmc_R_rxn00717_M_cpd00092_c)^1))/((1 + M_cpd00067_c*c/R_rxn00717_kmc_R_rxn00717_M_cpd00067_c)*(1 + M_cpd00307_c*c/R_rxn00717_kmc_R_rxn00717_M_cpd00307_c)*(1 + M_cpd00001_c*c/R_rxn00717_kmc_R_rxn00717_M_cpd00001_c))); R_rxn00717 is "Cytosine deaminase";  // hasProperty ec-code:3.5.4.1
    R_rxn00717_kmc_R_rxn00717_M_cpd00067_c = 1 substance; R_rxn00717_kmc_R_rxn00717_M_cpd00001_c = 1 substance; R_rxn00717_kmc_R_rxn00717_M_cpd00307_c = 1 substance; R_rxn00717_kmc_R_rxn00717_M_cpd00013_c = 1 substance; R_rxn00717_kmc_R_rxn00717_M_cpd00092_c = 1 substance; R_rxn00717_vmag_R_rxn00717 = 1 mole_per_second;
  // Irreversibel rapid-equilibrium random order ternary-complex mechanism, two products
  // GENE_ASSOCIATION: PA2876
  // SUBSYSTEM: Pyrimidine metabolism
  // EC Number: 4.1.1.23
  // Confidence Level:
  // AUTHORS:
  R_rxn00710: M_cpd00067_c + M_cpd00810_c => M_cpd00011_c + M_cpd00091_c; R_rxn00710_vmax_R_rxn00710*M_cpd00810_c*c*M_cpd00067_c*c/(R_rxn00710_kic_R_rxn00710_M_cpd00067_c*R_rxn00710_kmc_R_rxn00710_M_cpd00810_c + M_cpd00067_c*c*M_cpd00810_c*c + R_rxn00710_kmc_R_rxn00710_M_cpd00810_c*M_cpd00067_c*c + R_rxn00710_kmc_R_rxn00710_M_cpd00067_c*M_cpd00810_c*c); R_rxn00710 is "orotidine-5'-phosphate decarboxylase";  // hasProperty ec-code:4.1.1.23
    R_rxn00710_vmax_R_rxn00710 = 1 mole_per_second; R_rxn00710_kmc_R_rxn00710_M_cpd00067_c = 1 substance; R_rxn00710_kmc_R_rxn00710_M_cpd00810_c = 1 substance; R_rxn00710_kic_R_rxn00710_M_cpd00067_c = 1 substance;
  // Reversibel rapid-equilibrium random order ternary-complex mechanism, two products
  // GENE_ASSOCIATION: PA2962
  // SUBSYSTEM: Pyrimidine metabolism
  // EC Number: 2.7.4.12,2.7.4.9
  // Confidence Level:
  // AUTHORS:
  R_rxn01513: M_cpd00002_c + M_cpd00298_c -> M_cpd00008_c + M_cpd00297_c; (R_rxn01513_vmaf_R_rxn01513/(R_rxn01513_kic_R_rxn01513_M_cpd00002_c*R_rxn01513_kmc_R_rxn01513_M_cpd00298_c)*M_cpd00002_c*c*M_cpd00298_c*c - R_rxn01513_vmar_R_rxn01513/(R_rxn01513_kic_R_rxn01513_M_cpd00297_c*R_rxn01513_kmc_R_rxn01513_M_cpd00008_c)*M_cpd00008_c*c*M_cpd00297_c*c)/(1 + M_cpd00002_c*c*M_cpd00298_c*c/(R_rxn01513_kic_R_rxn01513_M_cpd00002_c*R_rxn01513_kmc_R_rxn01513_M_cpd00298_c) + M_cpd00002_c*c/R_rxn01513_kic_R_rxn01513_M_cpd00002_c + M_cpd00008_c*c*M_cpd00297_c*c/(R_rxn01513_kic_R_rxn01513_M_cpd00297_c*R_rxn01513_kmc_R_rxn01513_M_cpd00008_c) + M_cpd00298_c*c/R_rxn01513_kic_R_rxn01513_M_cpd00298_c + M_cpd00297_c*c/R_rxn01513_kic_R_rxn01513_M_cpd00297_c + M_cpd00008_c*c/R_rxn01513_kic_R_rxn01513_M_cpd00008_c); R_rxn01513 is "dTMP kinase";  // hasProperty ec-code:2.7.4.12 ec-code:2.7.4.9
    R_rxn01513_vmaf_R_rxn01513 = 1 mole_per_second; R_rxn01513_vmar_R_rxn01513 = 1 mole_per_second; R_rxn01513_kmc_R_rxn01513_M_cpd00298_c = 1 substance; R_rxn01513_kmc_R_rxn01513_M_cpd00008_c = 1 substance; R_rxn01513_kic_R_rxn01513_M_cpd00008_c = 1 substance; R_rxn01513_kic_R_rxn01513_M_cpd00297_c = 1 substance; R_rxn01513_kic_R_rxn01513_M_cpd00002_c = 1 substance; R_rxn01513_kic_R_rxn01513_M_cpd00298_c = 1 substance;
  // Irreversibel rapid-equilibrium random order ternary-complex mechanism, two products
  // GENE_ASSOCIATION: PA3050
  // SUBSYSTEM: Pyrimidine metabolism
  // EC Number: 1.3.3.1,1.3.99.11
  // Confidence Level:
  // AUTHORS:
  R_rxn01360: M_cpd00007_c + M_cpd00282_c => M_cpd00025_c + M_cpd00247_c; R_rxn01360_vmax_R_rxn01360*M_cpd00282_c*c*M_cpd00007_c*c/(R_rxn01360_kic_R_rxn01360_M_cpd00007_c*R_rxn01360_kmc_R_rxn01360_M_cpd00282_c + M_cpd00007_c*c*M_cpd00282_c*c + R_rxn01360_kmc_R_rxn01360_M_cpd00282_c*M_cpd00007_c*c + R_rxn01360_kmc_R_rxn01360_M_cpd00007_c*M_cpd00282_c*c); R_rxn01360 is "(S)-Dihydroorotateoxygen oxidoreductase";  // hasProperty ec-code:1.3.3.1 ec-code:1.3.99.11
    R_rxn01360_vmax_R_rxn01360 = 1 mole_per_second; R_rxn01360_kmc_R_rxn01360_M_cpd00007_c = 1 substance; R_rxn01360_kmc_R_rxn01360_M_cpd00282_c = 1 substance; R_rxn01360_kic_R_rxn01360_M_cpd00007_c = 1 substance;
  // Reversibel rapid-equilibrium random order ternary-complex mechanism, two products
  // GENE_ASSOCIATION: PA3050
  // SUBSYSTEM: Pyrimidine metabolism
  // Confidence Level:
  // AUTHORS:
  R_rxn08335: M_cpd15560_c + M_cpd00282_c -> M_cpd15561_c + M_cpd00247_c; (R_rxn08335_vmaf_R_rxn08335/(R_rxn08335_kic_R_rxn08335_M_cpd15560_c*R_rxn08335_kmc_R_rxn08335_M_cpd00282_c)*M_cpd15560_c*c*M_cpd00282_c*c - R_rxn08335_vmar_R_rxn08335/(R_rxn08335_kic_R_rxn08335_M_cpd00247_c*R_rxn08335_kmc_R_rxn08335_M_cpd15561_c)*M_cpd15561_c*c*M_cpd00247_c*c)/(1 + M_cpd15560_c*c*M_cpd00282_c*c/(R_rxn08335_kic_R_rxn08335_M_cpd15560_c*R_rxn08335_kmc_R_rxn08335_M_cpd00282_c) + M_cpd15560_c*c/R_rxn08335_kic_R_rxn08335_M_cpd15560_c + M_cpd15561_c*c*M_cpd00247_c*c/(R_rxn08335_kic_R_rxn08335_M_cpd00247_c*R_rxn08335_kmc_R_rxn08335_M_cpd15561_c) + M_cpd00282_c*c/R_rxn08335_kic_R_rxn08335_M_cpd00282_c + M_cpd00247_c*c/R_rxn08335_kic_R_rxn08335_M_cpd00247_c + M_cpd15561_c*c/R_rxn08335_kic_R_rxn08335_M_cpd15561_c); R_rxn08335 is "dihydoorotic acid dehydrogenase (quinone8)";
    R_rxn08335_vmaf_R_rxn08335 = 1 mole_per_second; R_rxn08335_vmar_R_rxn08335 = 1 mole_per_second; R_rxn08335_kmc_R_rxn08335_M_cpd00282_c = 1 substance; R_rxn08335_kmc_R_rxn08335_M_cpd15561_c = 1 substance; R_rxn08335_kic_R_rxn08335_M_cpd15561_c = 1 substance; R_rxn08335_kic_R_rxn08335_M_cpd00247_c = 1 substance; R_rxn08335_kic_R_rxn08335_M_cpd15560_c = 1 substance; R_rxn08335_kic_R_rxn08335_M_cpd00282_c = 1 substance;
  // Reversibel rapid-equilibrium random order ternary-complex mechanism, two products
  // GENE_ASSOCIATION: PA3050
  // SUBSYSTEM: Pyrimidine metabolism
  // Confidence Level:
  // AUTHORS:
  R_rJB00259: M_cpd01351_c + M_cpd00282_c -> M_cJB00125_c + M_cpd00247_c; (R_rJB00259_vmaf_R_rJB00259/(R_rJB00259_kic_R_rJB00259_M_cpd01351_c*R_rJB00259_kmc_R_rJB00259_M_cpd00282_c)*M_cpd01351_c*c*M_cpd00282_c*c - R_rJB00259_vmar_R_rJB00259/(R_rJB00259_kic_R_rJB00259_M_cpd00247_c*R_rJB00259_kmc_R_rJB00259_M_cJB00125_c)*M_cJB00125_c*c*M_cpd00247_c*c)/(1 + M_cpd01351_c*c*M_cpd00282_c*c/(R_rJB00259_kic_R_rJB00259_M_cpd01351_c*R_rJB00259_kmc_R_rJB00259_M_cpd00282_c) + M_cpd01351_c*c/R_rJB00259_kic_R_rJB00259_M_cpd01351_c + M_cJB00125_c*c*M_cpd00247_c*c/(R_rJB00259_kic_R_rJB00259_M_cpd00247_c*R_rJB00259_kmc_R_rJB00259_M_cJB00125_c) + M_cpd00282_c*c/R_rJB00259_kic_R_rJB00259_M_cpd00282_c + M_cpd00247_c*c/R_rJB00259_kic_R_rJB00259_M_cpd00247_c + M_cJB00125_c*c/R_rJB00259_kic_R_rJB00259_M_cJB00125_c); R_rJB00259 is "dihydoorotic acid dehydrogenase (quinone9)";
    R_rJB00259_vmaf_R_rJB00259 = 1 mole_per_second; R_rJB00259_vmar_R_rJB00259 = 1 mole_per_second; R_rJB00259_kmc_R_rJB00259_M_cpd00282_c = 1 substance; R_rJB00259_kmc_R_rJB00259_M_cJB00125_c = 1 substance; R_rJB00259_kic_R_rJB00259_M_cJB00125_c = 1 substance; R_rJB00259_kic_R_rJB00259_M_cpd00247_c = 1 substance; R_rJB00259_kic_R_rJB00259_M_cpd01351_c = 1 substance; R_rJB00259_kic_R_rJB00259_M_cpd00282_c = 1 substance;
  // Irreversibel rapid-equilibrium random order ternary-complex mechanism, two products
  // GENE_ASSOCIATION: PA3050
  // SUBSYSTEM: Pyrimidine metabolism
  // EC Number: 1.3.3.1
  // Confidence Level:
  // AUTHORS:
  R_rxn08336: M_cpd15500_c + M_cpd00282_c => M_cpd00247_c + M_cpd15499_c; R_rxn08336_vmax_R_rxn08336*M_cpd00282_c*c*M_cpd15500_c*c/(R_rxn08336_kic_R_rxn08336_M_cpd15500_c*R_rxn08336_kmc_R_rxn08336_M_cpd00282_c + M_cpd15500_c*c*M_cpd00282_c*c + R_rxn08336_kmc_R_rxn08336_M_cpd00282_c*M_cpd15500_c*c + R_rxn08336_kmc_R_rxn08336_M_cpd15500_c*M_cpd00282_c*c); R_rxn08336 is "dihydroorotic acid (menaquinone-8)";  // hasProperty ec-code:1.3.3.1
    R_rxn08336_vmax_R_rxn08336 = 1 mole_per_second; R_rxn08336_kmc_R_rxn08336_M_cpd15500_c = 1 substance; R_rxn08336_kmc_R_rxn08336_M_cpd00282_c = 1 substance; R_rxn08336_kic_R_rxn08336_M_cpd15500_c = 1 substance;
  // Reversibel rapid-equilibrium random order ternary-complex mechanism, two products
  // GENE_ASSOCIATION: PA3163
  // SUBSYSTEM: Pyrimidine metabolism
  // EC Number: 2.7.4.14
  // Confidence Level:
  // AUTHORS:
  R_rxn00364: M_cpd00002_c + M_cpd00046_c -> M_cpd00008_c + M_cpd00096_c; (R_rxn00364_vmaf_R_rxn00364/(R_rxn00364_kic_R_rxn00364_M_cpd00002_c*R_rxn00364_kmc_R_rxn00364_M_cpd00046_c)*M_cpd00002_c*c*M_cpd00046_c*c - R_rxn00364_vmar_R_rxn00364/(R_rxn00364_kic_R_rxn00364_M_cpd00096_c*R_rxn00364_kmc_R_rxn00364_M_cpd00008_c)*M_cpd00008_c*c*M_cpd00096_c*c)/(1 + M_cpd00002_c*c*M_cpd00046_c*c/(R_rxn00364_kic_R_rxn00364_M_cpd00002_c*R_rxn00364_kmc_R_rxn00364_M_cpd00046_c) + M_cpd00002_c*c/R_rxn00364_kic_R_rxn00364_M_cpd00002_c + M_cpd00008_c*c*M_cpd00096_c*c/(R_rxn00364_kic_R_rxn00364_M_cpd00096_c*R_rxn00364_kmc_R_rxn00364_M_cpd00008_c) + M_cpd00046_c*c/R_rxn00364_kic_R_rxn00364_M_cpd00046_c + M_cpd00096_c*c/R_rxn00364_kic_R_rxn00364_M_cpd00096_c + M_cpd00008_c*c/R_rxn00364_kic_R_rxn00364_M_cpd00008_c); R_rxn00364 is "cytidylate kinase (CMP)";  // hasProperty ec-code:2.7.4.14
    R_rxn00364_vmaf_R_rxn00364 = 1 mole_per_second; R_rxn00364_vmar_R_rxn00364 = 1 mole_per_second; R_rxn00364_kmc_R_rxn00364_M_cpd00046_c = 1 substance; R_rxn00364_kmc_R_rxn00364_M_cpd00008_c = 1 substance; R_rxn00364_kic_R_rxn00364_M_cpd00008_c = 1 substance; R_rxn00364_kic_R_rxn00364_M_cpd00096_c = 1 substance; R_rxn00364_kic_R_rxn00364_M_cpd00002_c = 1 substance; R_rxn00364_kic_R_rxn00364_M_cpd00046_c = 1 substance;
  // Reversibel rapid-equilibrium random order ternary-complex mechanism, two products
  // GENE_ASSOCIATION: PA3163
  // SUBSYSTEM: Pyrimidine metabolism
  // EC Number: 2.7.4.14
  // Confidence Level:
  // AUTHORS:
  R_rxn01219: M_cpd00002_c + M_cpd00206_c -> M_cpd00008_c + M_cpd00533_c; (R_rxn01219_vmaf_R_rxn01219/(R_rxn01219_kic_R_rxn01219_M_cpd00002_c*R_rxn01219_kmc_R_rxn01219_M_cpd00206_c)*M_cpd00002_c*c*M_cpd00206_c*c - R_rxn01219_vmar_R_rxn01219/(R_rxn01219_kic_R_rxn01219_M_cpd00533_c*R_rxn01219_kmc_R_rxn01219_M_cpd00008_c)*M_cpd00008_c*c*M_cpd00533_c*c)/(1 + M_cpd00002_c*c*M_cpd00206_c*c/(R_rxn01219_kic_R_rxn01219_M_cpd00002_c*R_rxn01219_kmc_R_rxn01219_M_cpd00206_c) + M_cpd00002_c*c/R_rxn01219_kic_R_rxn01219_M_cpd00002_c + M_cpd00008_c*c*M_cpd00533_c*c/(R_rxn01219_kic_R_rxn01219_M_cpd00533_c*R_rxn01219_kmc_R_rxn01219_M_cpd00008_c) + M_cpd00206_c*c/R_rxn01219_kic_R_rxn01219_M_cpd00206_c + M_cpd00533_c*c/R_rxn01219_kic_R_rxn01219_M_cpd00533_c + M_cpd00008_c*c/R_rxn01219_kic_R_rxn01219_M_cpd00008_c); R_rxn01219 is "cytidylate kinase (dCMP)";  // hasProperty ec-code:2.7.4.14
    R_rxn01219_vmaf_R_rxn01219 = 1 mole_per_second; R_rxn01219_vmar_R_rxn01219 = 1 mole_per_second; R_rxn01219_kmc_R_rxn01219_M_cpd00206_c = 1 substance; R_rxn01219_kmc_R_rxn01219_M_cpd00008_c = 1 substance; R_rxn01219_kic_R_rxn01219_M_cpd00008_c = 1 substance; R_rxn01219_kic_R_rxn01219_M_cpd00533_c = 1 substance; R_rxn01219_kic_R_rxn01219_M_cpd00002_c = 1 substance; R_rxn01219_kic_R_rxn01219_M_cpd00206_c = 1 substance;
  // Thermodynamically independent convenience kinetics
  // GENE_ASSOCIATION: PA3480
  // SUBSYSTEM: Pyrimidine metabolism
  // EC Number: 3.5.4.13
  // Confidence Level:
  // AUTHORS:
  R_rxn01672: M_cpd00067_c + M_cpd00001_c + M_cpd00356_c => M_cpd00013_c + M_cpd00358_c; R_rxn01672_vmag_R_rxn01672*(M_cpd00067_c*c/R_rxn01672_kmc_R_rxn01672_M_cpd00067_c*(M_cpd00356_c*c/R_rxn01672_kmc_R_rxn01672_M_cpd00356_c)*(M_cpd00001_c*c/R_rxn01672_kmc_R_rxn01672_M_cpd00001_c)*sqrt((kG_M_cpd00067_c*R_rxn01672_kmc_R_rxn01672_M_cpd00067_c)^1*(kG_M_cpd00356_c*R_rxn01672_kmc_R_rxn01672_M_cpd00356_c)^1*(kG_M_cpd00001_c*R_rxn01672_kmc_R_rxn01672_M_cpd00001_c)^1/((kG_M_cpd00013_c*R_rxn01672_kmc_R_rxn01672_M_cpd00013_c)^1*(kG_M_cpd00358_c*R_rxn01672_kmc_R_rxn01672_M_cpd00358_c)^1))/((1 + M_cpd00067_c*c/R_rxn01672_kmc_R_rxn01672_M_cpd00067_c)*(1 + M_cpd00356_c*c/R_rxn01672_kmc_R_rxn01672_M_cpd00356_c)*(1 + M_cpd00001_c*c/R_rxn01672_kmc_R_rxn01672_M_cpd00001_c))); R_rxn01672 is "dCTP deaminase";  // hasProperty ec-code:3.5.4.13
    R_rxn01672_kmc_R_rxn01672_M_cpd00067_c = 1 substance; R_rxn01672_kmc_R_rxn01672_M_cpd00001_c = 1 substance; R_rxn01672_kmc_R_rxn01672_M_cpd00356_c = 1 substance; R_rxn01672_kmc_R_rxn01672_M_cpd00013_c = 1 substance; R_rxn01672_kmc_R_rxn01672_M_cpd00358_c = 1 substance; R_rxn01672_vmag_R_rxn01672 = 1 mole_per_second;
  // Reversibel rapid-equilibrium random order ternary-complex mechanism, two products
  // GENE_ASSOCIATION: PA3527
  // SUBSYSTEM: Pyrimidine metabolism
  // EC Number: 3.5.2.3
  // Confidence Level:
  // AUTHORS:
  R_rxn01465: M_cpd00001_c + M_cpd00282_c -> M_cpd00067_c + M_cpd00343_c; (R_rxn01465_vmaf_R_rxn01465/(R_rxn01465_kic_R_rxn01465_M_cpd00001_c*R_rxn01465_kmc_R_rxn01465_M_cpd00282_c)*M_cpd00001_c*c*M_cpd00282_c*c - R_rxn01465_vmar_R_rxn01465/(R_rxn01465_kic_R_rxn01465_M_cpd00343_c*R_rxn01465_kmc_R_rxn01465_M_cpd00067_c)*M_cpd00067_c*c*M_cpd00343_c*c)/(1 + M_cpd00001_c*c*M_cpd00282_c*c/(R_rxn01465_kic_R_rxn01465_M_cpd00001_c*R_rxn01465_kmc_R_rxn01465_M_cpd00282_c) + M_cpd00001_c*c/R_rxn01465_kic_R_rxn01465_M_cpd00001_c + M_cpd00067_c*c*M_cpd00343_c*c/(R_rxn01465_kic_R_rxn01465_M_cpd00343_c*R_rxn01465_kmc_R_rxn01465_M_cpd00067_c) + M_cpd00282_c*c/R_rxn01465_kic_R_rxn01465_M_cpd00282_c + M_cpd00343_c*c/R_rxn01465_kic_R_rxn01465_M_cpd00343_c + M_cpd00067_c*c/R_rxn01465_kic_R_rxn01465_M_cpd00067_c); R_rxn01465 is "dihydroorotase";  // hasProperty ec-code:3.5.2.3
    R_rxn01465_vmaf_R_rxn01465 = 1 mole_per_second; R_rxn01465_vmar_R_rxn01465 = 1 mole_per_second; R_rxn01465_kmc_R_rxn01465_M_cpd00282_c = 1 substance; R_rxn01465_kmc_R_rxn01465_M_cpd00067_c = 1 substance; R_rxn01465_kic_R_rxn01465_M_cpd00067_c = 1 substance; R_rxn01465_kic_R_rxn01465_M_cpd00343_c = 1 substance; R_rxn01465_kic_R_rxn01465_M_cpd00001_c = 1 substance; R_rxn01465_kic_R_rxn01465_M_cpd00282_c = 1 substance;
  // Thermodynamically independent convenience kinetics
  // GENE_ASSOCIATION: PA3625
  // SUBSYSTEM: Pyrimidine metabolism
  // EC Number: 3.1.3.5
  // Confidence Level:
  // AUTHORS:
  R_rxn00363: M_cpd00001_c + M_cpd00046_c => M_cpd00067_c + M_cpd00009_c + M_cpd00367_c; R_rxn00363_vmag_R_rxn00363*(M_cpd00001_c*c/R_rxn00363_kmc_R_rxn00363_M_cpd00001_c*(M_cpd00046_c*c/R_rxn00363_kmc_R_rxn00363_M_cpd00046_c)*sqrt((kG_M_cpd00001_c*R_rxn00363_kmc_R_rxn00363_M_cpd00001_c)^1*(kG_M_cpd00046_c*R_rxn00363_kmc_R_rxn00363_M_cpd00046_c)^1/((kG_M_cpd00067_c*R_rxn00363_kmc_R_rxn00363_M_cpd00067_c)^1*(kG_M_cpd00367_c*R_rxn00363_kmc_R_rxn00363_M_cpd00367_c)^1*(kG_M_cpd00009_c*R_rxn00363_kmc_R_rxn00363_M_cpd00009_c)^1))/((1 + M_cpd00001_c*c/R_rxn00363_kmc_R_rxn00363_M_cpd00001_c)*(1 + M_cpd00046_c*c/R_rxn00363_kmc_R_rxn00363_M_cpd00046_c))); R_rxn00363 is "5'-nucleotidase (CMP)";  // hasProperty ec-code:3.1.3.5
    R_rxn00363_kmc_R_rxn00363_M_cpd00001_c = 1 substance; R_rxn00363_kmc_R_rxn00363_M_cpd00046_c = 1 substance; R_rxn00363_kmc_R_rxn00363_M_cpd00067_c = 1 substance; R_rxn00363_kmc_R_rxn00363_M_cpd00009_c = 1 substance; R_rxn00363_kmc_R_rxn00363_M_cpd00367_c = 1 substance; R_rxn00363_vmag_R_rxn00363 = 1 mole_per_second;
  // Thermodynamically independent convenience kinetics
  // GENE_ASSOCIATION: PA3625
  // SUBSYSTEM: Pyrimidine metabolism
  // EC Number: 3.1.3.5
  // Confidence Level:
  // AUTHORS:
  R_rxn01218: M_cpd00001_c + M_cpd00206_c => M_cpd00067_c + M_cpd00009_c + M_cpd00654_c; R_rxn01218_vmag_R_rxn01218*(M_cpd00001_c*c/R_rxn01218_kmc_R_rxn01218_M_cpd00001_c*(M_cpd00206_c*c/R_rxn01218_kmc_R_rxn01218_M_cpd00206_c)*sqrt((kG_M_cpd00001_c*R_rxn01218_kmc_R_rxn01218_M_cpd00001_c)^1*(kG_M_cpd00206_c*R_rxn01218_kmc_R_rxn01218_M_cpd00206_c)^1/((kG_M_cpd00067_c*R_rxn01218_kmc_R_rxn01218_M_cpd00067_c)^1*(kG_M_cpd00654_c*R_rxn01218_kmc_R_rxn01218_M_cpd00654_c)^1*(kG_M_cpd00009_c*R_rxn01218_kmc_R_rxn01218_M_cpd00009_c)^1))/((1 + M_cpd00001_c*c/R_rxn01218_kmc_R_rxn01218_M_cpd00001_c)*(1 + M_cpd00206_c*c/R_rxn01218_kmc_R_rxn01218_M_cpd00206_c))); R_rxn01218 is "5'-nucleotidase (dCMP)";  // hasProperty ec-code:3.1.3.5
    R_rxn01218_kmc_R_rxn01218_M_cpd00001_c = 1 substance; R_rxn01218_kmc_R_rxn01218_M_cpd00206_c = 1 substance; R_rxn01218_kmc_R_rxn01218_M_cpd00067_c = 1 substance; R_rxn01218_kmc_R_rxn01218_M_cpd00009_c = 1 substance; R_rxn01218_kmc_R_rxn01218_M_cpd00654_c = 1 substance; R_rxn01218_vmag_R_rxn01218 = 1 mole_per_second;
  // Thermodynamically independent convenience kinetics
  // GENE_ASSOCIATION: PA3625
  // SUBSYSTEM: Pyrimidine metabolism
  // EC Number: 3.1.3.5
  // Confidence Level:
  // AUTHORS:
  R_rxn01145: M_cpd00001_c + M_cpd00298_c => M_cpd00067_c + M_cpd00009_c + M_cpd00184_c; R_rxn01145_vmag_R_rxn01145*(M_cpd00001_c*c/R_rxn01145_kmc_R_rxn01145_M_cpd00001_c*(M_cpd00298_c*c/R_rxn01145_kmc_R_rxn01145_M_cpd00298_c)*sqrt((kG_M_cpd00001_c*R_rxn01145_kmc_R_rxn01145_M_cpd00001_c)^1*(kG_M_cpd00298_c*R_rxn01145_kmc_R_rxn01145_M_cpd00298_c)^1/((kG_M_cpd00067_c*R_rxn01145_kmc_R_rxn01145_M_cpd00067_c)^1*(kG_M_cpd00184_c*R_rxn01145_kmc_R_rxn01145_M_cpd00184_c)^1*(kG_M_cpd00009_c*R_rxn01145_kmc_R_rxn01145_M_cpd00009_c)^1))/((1 + M_cpd00001_c*c/R_rxn01145_kmc_R_rxn01145_M_cpd00001_c)*(1 + M_cpd00298_c*c/R_rxn01145_kmc_R_rxn01145_M_cpd00298_c))); R_rxn01145 is "5'-nucleotidase (dTMP)";  // hasProperty ec-code:3.1.3.5
    R_rxn01145_kmc_R_rxn01145_M_cpd00001_c = 1 substance; R_rxn01145_kmc_R_rxn01145_M_cpd00298_c = 1 substance; R_rxn01145_kmc_R_rxn01145_M_cpd00067_c = 1 substance; R_rxn01145_kmc_R_rxn01145_M_cpd00009_c = 1 substance; R_rxn01145_kmc_R_rxn01145_M_cpd00184_c = 1 substance; R_rxn01145_vmag_R_rxn01145 = 1 mole_per_second;
  // Thermodynamically independent convenience kinetics
  // GENE_ASSOCIATION: PA3625
  // SUBSYSTEM: Pyrimidine metabolism
  // EC Number: 3.1.3.5
  // Confidence Level:
  // AUTHORS:
  R_rxn00708: M_cpd00001_c + M_cpd00091_c => M_cpd00067_c + M_cpd00009_c + M_cpd00249_c; R_rxn00708_vmag_R_rxn00708*(M_cpd00001_c*c/R_rxn00708_kmc_R_rxn00708_M_cpd00001_c*(M_cpd00091_c*c/R_rxn00708_kmc_R_rxn00708_M_cpd00091_c)*sqrt((kG_M_cpd00001_c*R_rxn00708_kmc_R_rxn00708_M_cpd00001_c)^1*(kG_M_cpd00091_c*R_rxn00708_kmc_R_rxn00708_M_cpd00091_c)^1/((kG_M_cpd00067_c*R_rxn00708_kmc_R_rxn00708_M_cpd00067_c)^1*(kG_M_cpd00249_c*R_rxn00708_kmc_R_rxn00708_M_cpd00249_c)^1*(kG_M_cpd00009_c*R_rxn00708_kmc_R_rxn00708_M_cpd00009_c)^1))/((1 + M_cpd00001_c*c/R_rxn00708_kmc_R_rxn00708_M_cpd00001_c)*(1 + M_cpd00091_c*c/R_rxn00708_kmc_R_rxn00708_M_cpd00091_c))); R_rxn00708 is "5'-nucleotidase (UMP)";  // hasProperty ec-code:3.1.3.5
    R_rxn00708_kmc_R_rxn00708_M_cpd00001_c = 1 substance; R_rxn00708_kmc_R_rxn00708_M_cpd00091_c = 1 substance; R_rxn00708_kmc_R_rxn00708_M_cpd00067_c = 1 substance; R_rxn00708_kmc_R_rxn00708_M_cpd00009_c = 1 substance; R_rxn00708_kmc_R_rxn00708_M_cpd00249_c = 1 substance; R_rxn00708_vmag_R_rxn00708 = 1 mole_per_second;
  // Thermodynamically independent convenience kinetics
  // GENE_ASSOCIATION: PA3637
  // SUBSYSTEM: Pyrimidine metabolism
  // EC Number: 6.3.4.2
  // Confidence Level:
  // AUTHORS:
  R_rxn00412: M_cpd00001_c + M_cpd00002_c + M_cpd00053_c + M_cpd00062_c => 2 M_cpd00067_c + M_cpd00009_c + M_cpd00008_c + M_cpd00023_c + M_cpd00052_c; R_rxn00412_vmag_R_rxn00412*(M_cpd00001_c*c/R_rxn00412_kmc_R_rxn00412_M_cpd00001_c*(M_cpd00062_c*c/R_rxn00412_kmc_R_rxn00412_M_cpd00062_c)*(M_cpd00002_c*c/R_rxn00412_kmc_R_rxn00412_M_cpd00002_c)*(M_cpd00053_c*c/R_rxn00412_kmc_R_rxn00412_M_cpd00053_c)*sqrt((kG_M_cpd00001_c*R_rxn00412_kmc_R_rxn00412_M_cpd00001_c)^1*(kG_M_cpd00062_c*R_rxn00412_kmc_R_rxn00412_M_cpd00062_c)^1*(kG_M_cpd00002_c*R_rxn00412_kmc_R_rxn00412_M_cpd00002_c)^1*(kG_M_cpd00053_c*R_rxn00412_kmc_R_rxn00412_M_cpd00053_c)^1/((kG_M_cpd00067_c*R_rxn00412_kmc_R_rxn00412_M_cpd00067_c)^2*(kG_M_cpd00052_c*R_rxn00412_kmc_R_rxn00412_M_cpd00052_c)^1*(kG_M_cpd00009_c*R_rxn00412_kmc_R_rxn00412_M_cpd00009_c)^1*(kG_M_cpd00023_c*R_rxn00412_kmc_R_rxn00412_M_cpd00023_c)^1*(kG_M_cpd00008_c*R_rxn00412_kmc_R_rxn00412_M_cpd00008_c)^1))/((1 + M_cpd00001_c*c/R_rxn00412_kmc_R_rxn00412_M_cpd00001_c)*(1 + M_cpd00062_c*c/R_rxn00412_kmc_R_rxn00412_M_cpd00062_c)*(1 + M_cpd00002_c*c/R_rxn00412_kmc_R_rxn00412_M_cpd00002_c)*(1 + M_cpd00053_c*c/R_rxn00412_kmc_R_rxn00412_M_cpd00053_c))); R_rxn00412 is "CTP synthase (glutamine)";  // hasProperty ec-code:6.3.4.2
    R_rxn00412_kmc_R_rxn00412_M_cpd00001_c = 1 substance; R_rxn00412_kmc_R_rxn00412_M_cpd00002_c = 1 substance; R_rxn00412_kmc_R_rxn00412_M_cpd00053_c = 1 substance; R_rxn00412_kmc_R_rxn00412_M_cpd00062_c = 1 substance; R_rxn00412_kmc_R_rxn00412_M_cpd00067_c = 1 substance; R_rxn00412_kmc_R_rxn00412_M_cpd00009_c = 1 substance; R_rxn00412_kmc_R_rxn00412_M_cpd00008_c = 1 substance; R_rxn00412_kmc_R_rxn00412_M_cpd00023_c = 1 substance; R_rxn00412_kmc_R_rxn00412_M_cpd00052_c = 1 substance; R_rxn00412_vmag_R_rxn00412 = 1 mole_per_second;
  // GENE_ASSOCIATION: PA3637
  // SUBSYSTEM: Pyrimidine metabolism
  // EC Number: 6.3.4.2
  // Confidence Level:
  // AUTHORS:
  R_rxn00410: M_cpd00002_c + M_cpd00013_c + M_cpd00062_c -> 2 M_cpd00067_c + M_cpd00009_c + M_cpd00008_c + M_cpd00052_c; (R_rxn00410_vmaf_R_rxn00410*(M_cpd00002_c*c/R_rxn00410_kmc_R_rxn00410_M_cpd00002_c)^R_rxn00410_hco_R_rxn00410*(M_cpd00013_c*c/R_rxn00410_kmc_R_rxn00410_M_cpd00013_c)^R_rxn00410_hco_R_rxn00410*(M_cpd00062_c*c/R_rxn00410_kmc_R_rxn00410_M_cpd00062_c)^R_rxn00410_hco_R_rxn00410 - R_rxn00410_vmar_R_rxn00410*(M_cpd00067_c*c/R_rxn00410_kmc_R_rxn00410_M_cpd00067_c)^(2*R_rxn00410_hco_R_rxn00410)*(M_cpd00009_c*c/R_rxn00410_kmc_R_rxn00410_M_cpd00009_c)^R_rxn00410_hco_R_rxn00410*(M_cpd00008_c*c/R_rxn00410_kmc_R_rxn00410_M_cpd00008_c)^R_rxn00410_hco_R_rxn00410*(M_cpd00052_c*c/R_rxn00410_kmc_R_rxn00410_M_cpd00052_c)^R_rxn00410_hco_R_rxn00410)/((1 + M_cpd00002_c*c/R_rxn00410_kmc_R_rxn00410_M_cpd00002_c)^R_rxn00410_hco_R_rxn00410*(1 + M_cpd00013_c*c/R_rxn00410_kmc_R_rxn00410_M_cpd00013_c)^R_rxn00410_hco_R_rxn00410*(1 + M_cpd00062_c*c/R_rxn00410_kmc_R_rxn00410_M_cpd00062_c)^R_rxn00410_hco_R_rxn00410 + (1 + M_cpd00067_c*c/R_rxn00410_kmc_R_rxn00410_M_cpd00067_c)^(2*R_rxn00410_hco_R_rxn00410)*(1 + M_cpd00009_c*c/R_rxn00410_kmc_R_rxn00410_M_cpd00009_c)^R_rxn00410_hco_R_rxn00410*(1 + M_cpd00008_c*c/R_rxn00410_kmc_R_rxn00410_M_cpd00008_c)^R_rxn00410_hco_R_rxn00410*(1 + M_cpd00052_c*c/R_rxn00410_kmc_R_rxn00410_M_cpd00052_c)^R_rxn00410_hco_R_rxn00410 - 1); R_rxn00410 is "UTPammonia ligase(ADP-forming)";  // hasProperty ec-code:6.3.4.2
    R_rxn00410_vmaf_R_rxn00410 = 1 mole_per_second; R_rxn00410_hco_R_rxn00410 = 1 dimensionless; R_rxn00410_kmc_R_rxn00410_M_cpd00002_c = 1 substance; R_rxn00410_kmc_R_rxn00410_M_cpd00013_c = 1 substance; R_rxn00410_kmc_R_rxn00410_M_cpd00062_c = 1 substance; R_rxn00410_vmar_R_rxn00410 = 1 mole_per_second; R_rxn00410_kmc_R_rxn00410_M_cpd00067_c = 1 substance; R_rxn00410_kmc_R_rxn00410_M_cpd00009_c = 1 substance; R_rxn00410_kmc_R_rxn00410_M_cpd00008_c = 1 substance; R_rxn00410_kmc_R_rxn00410_M_cpd00052_c = 1 substance;
  // Reversibel rapid-equilibrium random order ternary-complex mechanism, two products
  // GENE_ASSOCIATION: PA3654
  // SUBSYSTEM: Pyrimidine metabolism
  // EC Number: 2.7.4.4,2.7.4.14,2.7.4.22,2.7.4.-
  // Confidence Level:
  // AUTHORS:
  R_rxn00119: M_cpd00002_c + M_cpd00091_c -> M_cpd00008_c + M_cpd00014_c; (R_rxn00119_vmaf_R_rxn00119/(R_rxn00119_kic_R_rxn00119_M_cpd00002_c*R_rxn00119_kmc_R_rxn00119_M_cpd00091_c)*M_cpd00002_c*c*M_cpd00091_c*c - R_rxn00119_vmar_R_rxn00119/(R_rxn00119_kic_R_rxn00119_M_cpd00014_c*R_rxn00119_kmc_R_rxn00119_M_cpd00008_c)*M_cpd00008_c*c*M_cpd00014_c*c)/(1 + M_cpd00002_c*c*M_cpd00091_c*c/(R_rxn00119_kic_R_rxn00119_M_cpd00002_c*R_rxn00119_kmc_R_rxn00119_M_cpd00091_c) + M_cpd00002_c*c/R_rxn00119_kic_R_rxn00119_M_cpd00002_c + M_cpd00008_c*c*M_cpd00014_c*c/(R_rxn00119_kic_R_rxn00119_M_cpd00014_c*R_rxn00119_kmc_R_rxn00119_M_cpd00008_c) + M_cpd00091_c*c/R_rxn00119_kic_R_rxn00119_M_cpd00091_c + M_cpd00014_c*c/R_rxn00119_kic_R_rxn00119_M_cpd00014_c + M_cpd00008_c*c/R_rxn00119_kic_R_rxn00119_M_cpd00008_c); R_rxn00119 is "UMP kinase";  // hasProperty ec-code:2.7.4.4 ec-code:2.7.4.14 ec-code:2.7.4.22 ec-code:2.7.4.-
    R_rxn00119_vmaf_R_rxn00119 = 1 mole_per_second; R_rxn00119_vmar_R_rxn00119 = 1 mole_per_second; R_rxn00119_kmc_R_rxn00119_M_cpd00091_c = 1 substance; R_rxn00119_kmc_R_rxn00119_M_cpd00008_c = 1 substance; R_rxn00119_kic_R_rxn00119_M_cpd00008_c = 1 substance; R_rxn00119_kic_R_rxn00119_M_cpd00014_c = 1 substance; R_rxn00119_kic_R_rxn00119_M_cpd00002_c = 1 substance; R_rxn00119_kic_R_rxn00119_M_cpd00091_c = 1 substance;
  // Reversibel rapid-equilibrium random order ternary-complex mechanism, two products
  // GENE_ASSOCIATION: PA3654
  // SUBSYSTEM: Pyrimidine metabolism
  // EC Number: 2.7.4.4,2.7.4.9
  // Confidence Level:
  // AUTHORS:
  R_rxn01517: M_cpd00002_c + M_cpd00299_c -> M_cpd00008_c + M_cpd00978_c; (R_rxn01517_vmaf_R_rxn01517/(R_rxn01517_kic_R_rxn01517_M_cpd00002_c*R_rxn01517_kmc_R_rxn01517_M_cpd00299_c)*M_cpd00002_c*c*M_cpd00299_c*c - R_rxn01517_vmar_R_rxn01517/(R_rxn01517_kic_R_rxn01517_M_cpd00978_c*R_rxn01517_kmc_R_rxn01517_M_cpd00008_c)*M_cpd00008_c*c*M_cpd00978_c*c)/(1 + M_cpd00002_c*c*M_cpd00299_c*c/(R_rxn01517_kic_R_rxn01517_M_cpd00002_c*R_rxn01517_kmc_R_rxn01517_M_cpd00299_c) + M_cpd00002_c*c/R_rxn01517_kic_R_rxn01517_M_cpd00002_c + M_cpd00008_c*c*M_cpd00978_c*c/(R_rxn01517_kic_R_rxn01517_M_cpd00978_c*R_rxn01517_kmc_R_rxn01517_M_cpd00008_c) + M_cpd00299_c*c/R_rxn01517_kic_R_rxn01517_M_cpd00299_c + M_cpd00978_c*c/R_rxn01517_kic_R_rxn01517_M_cpd00978_c + M_cpd00008_c*c/R_rxn01517_kic_R_rxn01517_M_cpd00008_c); R_rxn01517 is "uridylate kinase (dUMP)";  // hasProperty ec-code:2.7.4.4 ec-code:2.7.4.9
    R_rxn01517_vmaf_R_rxn01517 = 1 mole_per_second; R_rxn01517_vmar_R_rxn01517 = 1 mole_per_second; R_rxn01517_kmc_R_rxn01517_M_cpd00299_c = 1 substance; R_rxn01517_kmc_R_rxn01517_M_cpd00008_c = 1 substance; R_rxn01517_kic_R_rxn01517_M_cpd00008_c = 1 substance; R_rxn01517_kic_R_rxn01517_M_cpd00978_c = 1 substance; R_rxn01517_kic_R_rxn01517_M_cpd00002_c = 1 substance; R_rxn01517_kic_R_rxn01517_M_cpd00299_c = 1 substance;
  // Reversibel rapid-equilibrium random order ternary-complex mechanism, two products
  // GENE_ASSOCIATION: PA3807
  // SUBSYSTEM: Pyrimidine metabolism
  // EC Number: 2.7.4.6
  // Confidence Level:
  // AUTHORS:
  R_rxn00409: M_cpd00002_c + M_cpd00096_c -> M_cpd00008_c + M_cpd00052_c; (R_rxn00409_vmaf_R_rxn00409/(R_rxn00409_kic_R_rxn00409_M_cpd00002_c*R_rxn00409_kmc_R_rxn00409_M_cpd00096_c)*M_cpd00002_c*c*M_cpd00096_c*c - R_rxn00409_vmar_R_rxn00409/(R_rxn00409_kic_R_rxn00409_M_cpd00052_c*R_rxn00409_kmc_R_rxn00409_M_cpd00008_c)*M_cpd00008_c*c*M_cpd00052_c*c)/(1 + M_cpd00002_c*c*M_cpd00096_c*c/(R_rxn00409_kic_R_rxn00409_M_cpd00002_c*R_rxn00409_kmc_R_rxn00409_M_cpd00096_c) + M_cpd00002_c*c/R_rxn00409_kic_R_rxn00409_M_cpd00002_c + M_cpd00008_c*c*M_cpd00052_c*c/(R_rxn00409_kic_R_rxn00409_M_cpd00052_c*R_rxn00409_kmc_R_rxn00409_M_cpd00008_c) + M_cpd00096_c*c/R_rxn00409_kic_R_rxn00409_M_cpd00096_c + M_cpd00052_c*c/R_rxn00409_kic_R_rxn00409_M_cpd00052_c + M_cpd00008_c*c/R_rxn00409_kic_R_rxn00409_M_cpd00008_c); R_rxn00409 is "nucleoside-diphosphate kinase (ATP:CDP)";  // hasProperty ec-code:2.7.4.6
    R_rxn00409_vmaf_R_rxn00409 = 1 mole_per_second; R_rxn00409_vmar_R_rxn00409 = 1 mole_per_second; R_rxn00409_kmc_R_rxn00409_M_cpd00096_c = 1 substance; R_rxn00409_kmc_R_rxn00409_M_cpd00008_c = 1 substance; R_rxn00409_kic_R_rxn00409_M_cpd00008_c = 1 substance; R_rxn00409_kic_R_rxn00409_M_cpd00052_c = 1 substance; R_rxn00409_kic_R_rxn00409_M_cpd00002_c = 1 substance; R_rxn00409_kic_R_rxn00409_M_cpd00096_c = 1 substance;
  // Reversibel rapid-equilibrium random order ternary-complex mechanism, two products
  // GENE_ASSOCIATION: PA3807
  // SUBSYSTEM: Pyrimidine metabolism
  // EC Number: 2.7.4.6
  // Confidence Level:
  // AUTHORS:
  R_rxn01673: M_cpd00002_c + M_cpd00533_c -> M_cpd00008_c + M_cpd00356_c; (R_rxn01673_vmaf_R_rxn01673/(R_rxn01673_kic_R_rxn01673_M_cpd00002_c*R_rxn01673_kmc_R_rxn01673_M_cpd00533_c)*M_cpd00002_c*c*M_cpd00533_c*c - R_rxn01673_vmar_R_rxn01673/(R_rxn01673_kic_R_rxn01673_M_cpd00356_c*R_rxn01673_kmc_R_rxn01673_M_cpd00008_c)*M_cpd00008_c*c*M_cpd00356_c*c)/(1 + M_cpd00002_c*c*M_cpd00533_c*c/(R_rxn01673_kic_R_rxn01673_M_cpd00002_c*R_rxn01673_kmc_R_rxn01673_M_cpd00533_c) + M_cpd00002_c*c/R_rxn01673_kic_R_rxn01673_M_cpd00002_c + M_cpd00008_c*c*M_cpd00356_c*c/(R_rxn01673_kic_R_rxn01673_M_cpd00356_c*R_rxn01673_kmc_R_rxn01673_M_cpd00008_c) + M_cpd00533_c*c/R_rxn01673_kic_R_rxn01673_M_cpd00533_c + M_cpd00356_c*c/R_rxn01673_kic_R_rxn01673_M_cpd00356_c + M_cpd00008_c*c/R_rxn01673_kic_R_rxn01673_M_cpd00008_c); R_rxn01673 is "nucleoside-diphosphate kinase (ATP:dCDP)";  // hasProperty ec-code:2.7.4.6
    R_rxn01673_vmaf_R_rxn01673 = 1 mole_per_second; R_rxn01673_vmar_R_rxn01673 = 1 mole_per_second; R_rxn01673_kmc_R_rxn01673_M_cpd00533_c = 1 substance; R_rxn01673_kmc_R_rxn01673_M_cpd00008_c = 1 substance; R_rxn01673_kic_R_rxn01673_M_cpd00008_c = 1 substance; R_rxn01673_kic_R_rxn01673_M_cpd00356_c = 1 substance; R_rxn01673_kic_R_rxn01673_M_cpd00002_c = 1 substance; R_rxn01673_kic_R_rxn01673_M_cpd00533_c = 1 substance;
  // Reversibel rapid-equilibrium random order ternary-complex mechanism, two products
  // GENE_ASSOCIATION: PA3807
  // SUBSYSTEM: Pyrimidine metabolism
  // EC Number: 2.7.4.6
  // Confidence Level:
  // AUTHORS:
  R_rxn01512: M_cpd00002_c + M_cpd00297_c -> M_cpd00008_c + M_cpd00357_c; (R_rxn01512_vmaf_R_rxn01512/(R_rxn01512_kic_R_rxn01512_M_cpd00002_c*R_rxn01512_kmc_R_rxn01512_M_cpd00297_c)*M_cpd00002_c*c*M_cpd00297_c*c - R_rxn01512_vmar_R_rxn01512/(R_rxn01512_kic_R_rxn01512_M_cpd00357_c*R_rxn01512_kmc_R_rxn01512_M_cpd00008_c)*M_cpd00008_c*c*M_cpd00357_c*c)/(1 + M_cpd00002_c*c*M_cpd00297_c*c/(R_rxn01512_kic_R_rxn01512_M_cpd00002_c*R_rxn01512_kmc_R_rxn01512_M_cpd00297_c) + M_cpd00002_c*c/R_rxn01512_kic_R_rxn01512_M_cpd00002_c + M_cpd00008_c*c*M_cpd00357_c*c/(R_rxn01512_kic_R_rxn01512_M_cpd00357_c*R_rxn01512_kmc_R_rxn01512_M_cpd00008_c) + M_cpd00297_c*c/R_rxn01512_kic_R_rxn01512_M_cpd00297_c + M_cpd00357_c*c/R_rxn01512_kic_R_rxn01512_M_cpd00357_c + M_cpd00008_c*c/R_rxn01512_kic_R_rxn01512_M_cpd00008_c); R_rxn01512 is "nucleoside-diphosphate kinase (ATP:dTDP)";  // hasProperty ec-code:2.7.4.6
    R_rxn01512_vmaf_R_rxn01512 = 1 mole_per_second; R_rxn01512_vmar_R_rxn01512 = 1 mole_per_second; R_rxn01512_kmc_R_rxn01512_M_cpd00297_c = 1 substance; R_rxn01512_kmc_R_rxn01512_M_cpd00008_c = 1 substance; R_rxn01512_kic_R_rxn01512_M_cpd00008_c = 1 substance; R_rxn01512_kic_R_rxn01512_M_cpd00357_c = 1 substance; R_rxn01512_kic_R_rxn01512_M_cpd00002_c = 1 substance; R_rxn01512_kic_R_rxn01512_M_cpd00297_c = 1 substance;
  // Reversibel rapid-equilibrium random order ternary-complex mechanism, two products
  // GENE_ASSOCIATION: PA3807
  // SUBSYSTEM: Pyrimidine metabolism
  // EC Number: 2.7.4.6
  // Confidence Level:
  // AUTHORS:
  R_rxn01678: M_cpd00002_c + M_cpd00978_c -> M_cpd00008_c + M_cpd00358_c; (R_rxn01678_vmaf_R_rxn01678/(R_rxn01678_kic_R_rxn01678_M_cpd00002_c*R_rxn01678_kmc_R_rxn01678_M_cpd00978_c)*M_cpd00002_c*c*M_cpd00978_c*c - R_rxn01678_vmar_R_rxn01678/(R_rxn01678_kic_R_rxn01678_M_cpd00358_c*R_rxn01678_kmc_R_rxn01678_M_cpd00008_c)*M_cpd00008_c*c*M_cpd00358_c*c)/(1 + M_cpd00002_c*c*M_cpd00978_c*c/(R_rxn01678_kic_R_rxn01678_M_cpd00002_c*R_rxn01678_kmc_R_rxn01678_M_cpd00978_c) + M_cpd00002_c*c/R_rxn01678_kic_R_rxn01678_M_cpd00002_c + M_cpd00008_c*c*M_cpd00358_c*c/(R_rxn01678_kic_R_rxn01678_M_cpd00358_c*R_rxn01678_kmc_R_rxn01678_M_cpd00008_c) + M_cpd00978_c*c/R_rxn01678_kic_R_rxn01678_M_cpd00978_c + M_cpd00358_c*c/R_rxn01678_kic_R_rxn01678_M_cpd00358_c + M_cpd00008_c*c/R_rxn01678_kic_R_rxn01678_M_cpd00008_c); R_rxn01678 is "nucleoside-diphosphate kinase (ATP:dUDP)";  // hasProperty ec-code:2.7.4.6
    R_rxn01678_vmaf_R_rxn01678 = 1 mole_per_second; R_rxn01678_vmar_R_rxn01678 = 1 mole_per_second; R_rxn01678_kmc_R_rxn01678_M_cpd00978_c = 1 substance; R_rxn01678_kmc_R_rxn01678_M_cpd00008_c = 1 substance; R_rxn01678_kic_R_rxn01678_M_cpd00008_c = 1 substance; R_rxn01678_kic_R_rxn01678_M_cpd00358_c = 1 substance; R_rxn01678_kic_R_rxn01678_M_cpd00002_c = 1 substance; R_rxn01678_kic_R_rxn01678_M_cpd00978_c = 1 substance;
  // Reversibel rapid-equilibrium random order ternary-complex mechanism, two products
  // GENE_ASSOCIATION: PA3807
  // SUBSYSTEM: Pyrimidine metabolism
  // EC Number: 2.7.4.6
  // Confidence Level:
  // AUTHORS:
  R_rxn00117: M_cpd00002_c + M_cpd00014_c -> M_cpd00008_c + M_cpd00062_c; (R_rxn00117_vmaf_R_rxn00117/(R_rxn00117_kic_R_rxn00117_M_cpd00002_c*R_rxn00117_kmc_R_rxn00117_M_cpd00014_c)*M_cpd00002_c*c*M_cpd00014_c*c - R_rxn00117_vmar_R_rxn00117/(R_rxn00117_kic_R_rxn00117_M_cpd00062_c*R_rxn00117_kmc_R_rxn00117_M_cpd00008_c)*M_cpd00008_c*c*M_cpd00062_c*c)/(1 + M_cpd00002_c*c*M_cpd00014_c*c/(R_rxn00117_kic_R_rxn00117_M_cpd00002_c*R_rxn00117_kmc_R_rxn00117_M_cpd00014_c) + M_cpd00002_c*c/R_rxn00117_kic_R_rxn00117_M_cpd00002_c + M_cpd00008_c*c*M_cpd00062_c*c/(R_rxn00117_kic_R_rxn00117_M_cpd00062_c*R_rxn00117_kmc_R_rxn00117_M_cpd00008_c) + M_cpd00014_c*c/R_rxn00117_kic_R_rxn00117_M_cpd00014_c + M_cpd00062_c*c/R_rxn00117_kic_R_rxn00117_M_cpd00062_c + M_cpd00008_c*c/R_rxn00117_kic_R_rxn00117_M_cpd00008_c); R_rxn00117 is "nucleoside-diphosphate kinase (ATP:UDP)";  // hasProperty ec-code:2.7.4.6
    R_rxn00117_vmaf_R_rxn00117 = 1 mole_per_second; R_rxn00117_vmar_R_rxn00117 = 1 mole_per_second; R_rxn00117_kmc_R_rxn00117_M_cpd00014_c = 1 substance; R_rxn00117_kmc_R_rxn00117_M_cpd00008_c = 1 substance; R_rxn00117_kic_R_rxn00117_M_cpd00008_c = 1 substance; R_rxn00117_kic_R_rxn00117_M_cpd00062_c = 1 substance; R_rxn00117_kic_R_rxn00117_M_cpd00002_c = 1 substance; R_rxn00117_kic_R_rxn00117_M_cpd00014_c = 1 substance;
  // Thermodynamically independent convenience kinetics
  // GENE_ASSOCIATION: PA5067
  // SUBSYSTEM: Pyrimidine metabolism
  // EC Number: 3.6.1.5, 3.6.1.39
  // Confidence Level:
  // AUTHORS:
  R_rxn01514: M_cpd00001_c + M_cpd00357_c => M_cpd00067_c + M_cpd00009_c + M_cpd00297_c; R_rxn01514_vmag_R_rxn01514*(M_cpd00001_c*c/R_rxn01514_kmc_R_rxn01514_M_cpd00001_c*(M_cpd00357_c*c/R_rxn01514_kmc_R_rxn01514_M_cpd00357_c)*sqrt((kG_M_cpd00001_c*R_rxn01514_kmc_R_rxn01514_M_cpd00001_c)^1*(kG_M_cpd00357_c*R_rxn01514_kmc_R_rxn01514_M_cpd00357_c)^1/((kG_M_cpd00067_c*R_rxn01514_kmc_R_rxn01514_M_cpd00067_c)^1*(kG_M_cpd00297_c*R_rxn01514_kmc_R_rxn01514_M_cpd00297_c)^1*(kG_M_cpd00009_c*R_rxn01514_kmc_R_rxn01514_M_cpd00009_c)^1))/((1 + M_cpd00001_c*c/R_rxn01514_kmc_R_rxn01514_M_cpd00001_c)*(1 + M_cpd00357_c*c/R_rxn01514_kmc_R_rxn01514_M_cpd00357_c))); R_rxn01514 is "thymidine-triphosphatase irreversible";  // hasProperty ec-code:3.6.1.5 ec-code: 3.6.1.39
    R_rxn01514_kmc_R_rxn01514_M_cpd00001_c = 1 substance; R_rxn01514_kmc_R_rxn01514_M_cpd00357_c = 1 substance; R_rxn01514_kmc_R_rxn01514_M_cpd00067_c = 1 substance; R_rxn01514_kmc_R_rxn01514_M_cpd00009_c = 1 substance; R_rxn01514_kmc_R_rxn01514_M_cpd00297_c = 1 substance; R_rxn01514_vmag_R_rxn01514 = 1 mole_per_second;
  // Irreversibel rapid-equilibrium random order ternary-complex mechanism, two products
  // GENE_ASSOCIATION: PA5321
  // SUBSYSTEM: Pyrimidine metabolism
  // EC Number: 3.6.1.19,3.6.1.23
  // Confidence Level:
  // AUTHORS:
  R_rxn01519: M_cpd00001_c + M_cpd00358_c => M_cpd00012_c + M_cpd00299_c; R_rxn01519_vmax_R_rxn01519*M_cpd00358_c*c*M_cpd00001_c*c/(R_rxn01519_kic_R_rxn01519_M_cpd00001_c*R_rxn01519_kmc_R_rxn01519_M_cpd00358_c + M_cpd00001_c*c*M_cpd00358_c*c + R_rxn01519_kmc_R_rxn01519_M_cpd00358_c*M_cpd00001_c*c + R_rxn01519_kmc_R_rxn01519_M_cpd00001_c*M_cpd00358_c*c); R_rxn01519 is "dUTP diphosphatase";  // hasProperty ec-code:3.6.1.19 ec-code:3.6.1.23
    R_rxn01519_vmax_R_rxn01519 = 1 mole_per_second; R_rxn01519_kmc_R_rxn01519_M_cpd00001_c = 1 substance; R_rxn01519_kmc_R_rxn01519_M_cpd00358_c = 1 substance; R_rxn01519_kic_R_rxn01519_M_cpd00001_c = 1 substance;
  // Reversibel rapid-equilibrium random order ternary-complex mechanism, two products
  // GENE_ASSOCIATION: PA5331
  // SUBSYSTEM: Pyrimidine metabolism
  // EC Number: 2.4.2.10
  // Confidence Level:
  // AUTHORS:
  R_rxn01362: M_cpd00012_c + M_cpd00810_c -> M_cpd00247_c + M_cpd00103_c; (R_rxn01362_vmaf_R_rxn01362/(R_rxn01362_kic_R_rxn01362_M_cpd00012_c*R_rxn01362_kmc_R_rxn01362_M_cpd00810_c)*M_cpd00012_c*c*M_cpd00810_c*c - R_rxn01362_vmar_R_rxn01362/(R_rxn01362_kic_R_rxn01362_M_cpd00103_c*R_rxn01362_kmc_R_rxn01362_M_cpd00247_c)*M_cpd00247_c*c*M_cpd00103_c*c)/(1 + M_cpd00012_c*c*M_cpd00810_c*c/(R_rxn01362_kic_R_rxn01362_M_cpd00012_c*R_rxn01362_kmc_R_rxn01362_M_cpd00810_c) + M_cpd00012_c*c/R_rxn01362_kic_R_rxn01362_M_cpd00012_c + M_cpd00247_c*c*M_cpd00103_c*c/(R_rxn01362_kic_R_rxn01362_M_cpd00103_c*R_rxn01362_kmc_R_rxn01362_M_cpd00247_c) + M_cpd00810_c*c/R_rxn01362_kic_R_rxn01362_M_cpd00810_c + M_cpd00103_c*c/R_rxn01362_kic_R_rxn01362_M_cpd00103_c + M_cpd00247_c*c/R_rxn01362_kic_R_rxn01362_M_cpd00247_c); R_rxn01362 is "orotate phosphoribosyltransferase";  // hasProperty ec-code:2.4.2.10
    R_rxn01362_vmaf_R_rxn01362 = 1 mole_per_second; R_rxn01362_vmar_R_rxn01362 = 1 mole_per_second; R_rxn01362_kmc_R_rxn01362_M_cpd00810_c = 1 substance; R_rxn01362_kmc_R_rxn01362_M_cpd00247_c = 1 substance; R_rxn01362_kic_R_rxn01362_M_cpd00247_c = 1 substance; R_rxn01362_kic_R_rxn01362_M_cpd00103_c = 1 substance; R_rxn01362_kic_R_rxn01362_M_cpd00012_c = 1 substance; R_rxn01362_kic_R_rxn01362_M_cpd00810_c = 1 substance;
  R_rxn05289_M_cpd00067_c_drain: M_cpd00067_c => ; (vmaf_R_rxn05289*(M_cpd00067_c*c/kmc_R_rxn05289_M_cpd00067_c)^hco_R_rxn05289*(M_cpd00005_c*c/kmc_R_rxn05289_M_cpd00005_c)^hco_R_rxn05289*(M_cpd11420_c*c/kmc_R_rxn05289_M_cpd11420_c)^hco_R_rxn05289 - vmar_R_rxn05289*(M_cpd00006_c*c/kmc_R_rxn05289_M_cpd00006_c)^hco_R_rxn05289*(M_cpd11421_c*c/kmc_R_rxn05289_M_cpd11421_c)^hco_R_rxn05289)/((1 + M_cpd00067_c*c/kmc_R_rxn05289_M_cpd00067_c)^hco_R_rxn05289*(1 + M_cpd00005_c*c/kmc_R_rxn05289_M_cpd00005_c)^hco_R_rxn05289*(1 + M_cpd11420_c*c/kmc_R_rxn05289_M_cpd11420_c)^hco_R_rxn05289 + (1 + M_cpd00006_c*c/kmc_R_rxn05289_M_cpd00006_c)^hco_R_rxn05289*(1 + M_cpd11421_c*c/kmc_R_rxn05289_M_cpd11421_c)^hco_R_rxn05289 - 1);  // modifiers: M_cpd11420_c, M_cpd00005_c, M_cpd00006_c, M_cpd11421_c
  R_rxn01465_M_cpd00067_c_drain: M_cpd00067_c => ; (vmaf_R_rxn01465/(kic_R_rxn01465_M_cpd00001_c*kmc_R_rxn01465_M_cpd00282_c)*M_cpd00001_c*c*M_cpd00282_c*c - vmar_R_rxn01465/(kic_R_rxn01465_M_cpd00343_c*kmc_R_rxn01465_M_cpd00067_c)*M_cpd00067_c*c*M_cpd00343_c*c)/(1 + M_cpd00001_c*c*M_cpd00282_c*c/(kic_R_rxn01465_M_cpd00001_c*kmc_R_rxn01465_M_cpd00282_c) + M_cpd00001_c*c/kic_R_rxn01465_M_cpd00001_c + M_cpd00067_c*c*M_cpd00343_c*c/(kic_R_rxn01465_M_cpd00343_c*kmc_R_rxn01465_M_cpd00067_c) + M_cpd00282_c*c/kic_R_rxn01465_M_cpd00282_c + M_cpd00343_c*c/kic_R_rxn01465_M_cpd00343_c + M_cpd00067_c*c/kic_R_rxn01465_M_cpd00067_c);  // modifiers: M_cpd00343_c, M_cpd00001_c, M_cpd00282_c
  R_rxn00410_M_cpd00067_c_drain: M_cpd00067_c => ; (vmaf_R_rxn00410*(M_cpd00002_c*c/kmc_R_rxn00410_M_cpd00002_c)^hco_R_rxn00410*(M_cpd00013_c*c/kmc_R_rxn00410_M_cpd00013_c)^hco_R_rxn00410*(M_cpd00062_c*c/kmc_R_rxn00410_M_cpd00062_c)^hco_R_rxn00410 - vmar_R_rxn00410*(M_cpd00067_c*c/kmc_R_rxn00410_M_cpd00067_c)^(2*hco_R_rxn00410)*(M_cpd00009_c*c/kmc_R_rxn00410_M_cpd00009_c)^hco_R_rxn00410*(M_cpd00008_c*c/kmc_R_rxn00410_M_cpd00008_c)^hco_R_rxn00410*(M_cpd00052_c*c/kmc_R_rxn00410_M_cpd00052_c)^hco_R_rxn00410)/((1 + M_cpd00002_c*c/kmc_R_rxn00410_M_cpd00002_c)^hco_R_rxn00410*(1 + M_cpd00013_c*c/kmc_R_rxn00410_M_cpd00013_c)^hco_R_rxn00410*(1 + M_cpd00062_c*c/kmc_R_rxn00410_M_cpd00062_c)^hco_R_rxn00410 + (1 + M_cpd00067_c*c/kmc_R_rxn00410_M_cpd00067_c)^(2*hco_R_rxn00410)*(1 + M_cpd00009_c*c/kmc_R_rxn00410_M_cpd00009_c)^hco_R_rxn00410*(1 + M_cpd00008_c*c/kmc_R_rxn00410_M_cpd00008_c)^hco_R_rxn00410*(1 + M_cpd00052_c*c/kmc_R_rxn00410_M_cpd00052_c)^hco_R_rxn00410 - 1);  // modifiers: M_cpd00013_c, M_cpd00009_c, M_cpd00062_c, M_cpd00008_c, M_cpd00002_c, M_cpd00052_c
  R_rxn01465_M_cpd00001_c_fill: => M_cpd00001_c; R_rxn01465_M_cpd00001_c_fill_FILL_RATE;
    R_rxn01465_M_cpd00001_c_fill_FILL_RATE = 1 mmol_per_gDW_per_hr;
  R_rxn01465_M_cpd00001_c_drain: M_cpd00001_c => ; (vmaf_R_rxn01465/(kic_R_rxn01465_M_cpd00001_c*kmc_R_rxn01465_M_cpd00282_c)*M_cpd00001_c*c*M_cpd00282_c*c - vmar_R_rxn01465/(kic_R_rxn01465_M_cpd00343_c*kmc_R_rxn01465_M_cpd00067_c)*M_cpd00067_c*c*M_cpd00343_c*c)/(1 + M_cpd00001_c*c*M_cpd00282_c*c/(kic_R_rxn01465_M_cpd00001_c*kmc_R_rxn01465_M_cpd00282_c) + M_cpd00001_c*c/kic_R_rxn01465_M_cpd00001_c + M_cpd00067_c*c*M_cpd00343_c*c/(kic_R_rxn01465_M_cpd00343_c*kmc_R_rxn01465_M_cpd00067_c) + M_cpd00282_c*c/kic_R_rxn01465_M_cpd00282_c + M_cpd00343_c*c/kic_R_rxn01465_M_cpd00343_c + M_cpd00067_c*c/kic_R_rxn01465_M_cpd00067_c);  // modifiers: M_cpd00343_c, M_cpd00067_c, M_cpd00282_c
  R_rxn05289_M_cpd00006_c_fill: => M_cpd00006_c; R_rxn05289_M_cpd00006_c_fill_FILL_RATE;
    R_rxn05289_M_cpd00006_c_fill_FILL_RATE = 1 mmol_per_gDW_per_hr;
  R_rxn05289_M_cpd00006_c_drain: M_cpd00006_c => ; (vmaf_R_rxn05289*(M_cpd00067_c*c/kmc_R_rxn05289_M_cpd00067_c)^hco_R_rxn05289*(M_cpd00005_c*c/kmc_R_rxn05289_M_cpd00005_c)^hco_R_rxn05289*(M_cpd11420_c*c/kmc_R_rxn05289_M_cpd11420_c)^hco_R_rxn05289 - vmar_R_rxn05289*(M_cpd00006_c*c/kmc_R_rxn05289_M_cpd00006_c)^hco_R_rxn05289*(M_cpd11421_c*c/kmc_R_rxn05289_M_cpd11421_c)^hco_R_rxn05289)/((1 + M_cpd00067_c*c/kmc_R_rxn05289_M_cpd00067_c)^hco_R_rxn05289*(1 + M_cpd00005_c*c/kmc_R_rxn05289_M_cpd00005_c)^hco_R_rxn05289*(1 + M_cpd11420_c*c/kmc_R_rxn05289_M_cpd11420_c)^hco_R_rxn05289 + (1 + M_cpd00006_c*c/kmc_R_rxn05289_M_cpd00006_c)^hco_R_rxn05289*(1 + M_cpd11421_c*c/kmc_R_rxn05289_M_cpd11421_c)^hco_R_rxn05289 - 1);  // modifiers: M_cpd11420_c, M_cpd00005_c, M_cpd00067_c, M_cpd11421_c
  R_rxn05289_M_cpd00005_c_fill: => M_cpd00005_c; R_rxn05289_M_cpd00005_c_fill_FILL_RATE;
    R_rxn05289_M_cpd00005_c_fill_FILL_RATE = 1 mmol_per_gDW_per_hr;
  R_rxn05289_M_cpd00005_c_drain: M_cpd00005_c => ; (vmaf_R_rxn05289*(M_cpd00067_c*c/kmc_R_rxn05289_M_cpd00067_c)^hco_R_rxn05289*(M_cpd00005_c*c/kmc_R_rxn05289_M_cpd00005_c)^hco_R_rxn05289*(M_cpd11420_c*c/kmc_R_rxn05289_M_cpd11420_c)^hco_R_rxn05289 - vmar_R_rxn05289*(M_cpd00006_c*c/kmc_R_rxn05289_M_cpd00006_c)^hco_R_rxn05289*(M_cpd11421_c*c/kmc_R_rxn05289_M_cpd11421_c)^hco_R_rxn05289)/((1 + M_cpd00067_c*c/kmc_R_rxn05289_M_cpd00067_c)^hco_R_rxn05289*(1 + M_cpd00005_c*c/kmc_R_rxn05289_M_cpd00005_c)^hco_R_rxn05289*(1 + M_cpd11420_c*c/kmc_R_rxn05289_M_cpd11420_c)^hco_R_rxn05289 + (1 + M_cpd00006_c*c/kmc_R_rxn05289_M_cpd00006_c)^hco_R_rxn05289*(1 + M_cpd11421_c*c/kmc_R_rxn05289_M_cpd11421_c)^hco_R_rxn05289 - 1);  // modifiers: M_cpd11420_c, M_cpd00006_c, M_cpd00067_c, M_cpd11421_c
  R_rxn00410_M_cpd00009_c_fill: => M_cpd00009_c; R_rxn00410_M_cpd00009_c_fill_FILL_RATE;
    R_rxn00410_M_cpd00009_c_fill_FILL_RATE = 1 mmol_per_gDW_per_hr;
  R_rxn00410_M_cpd00009_c_drain: M_cpd00009_c => ; (vmaf_R_rxn00410*(M_cpd00002_c*c/kmc_R_rxn00410_M_cpd00002_c)^hco_R_rxn00410*(M_cpd00013_c*c/kmc_R_rxn00410_M_cpd00013_c)^hco_R_rxn00410*(M_cpd00062_c*c/kmc_R_rxn00410_M_cpd00062_c)^hco_R_rxn00410 - vmar_R_rxn00410*(M_cpd00067_c*c/kmc_R_rxn00410_M_cpd00067_c)^(2*hco_R_rxn00410)*(M_cpd00009_c*c/kmc_R_rxn00410_M_cpd00009_c)^hco_R_rxn00410*(M_cpd00008_c*c/kmc_R_rxn00410_M_cpd00008_c)^hco_R_rxn00410*(M_cpd00052_c*c/kmc_R_rxn00410_M_cpd00052_c)^hco_R_rxn00410)/((1 + M_cpd00002_c*c/kmc_R_rxn00410_M_cpd00002_c)^hco_R_rxn00410*(1 + M_cpd00013_c*c/kmc_R_rxn00410_M_cpd00013_c)^hco_R_rxn00410*(1 + M_cpd00062_c*c/kmc_R_rxn00410_M_cpd00062_c)^hco_R_rxn00410 + (1 + M_cpd00067_c*c/kmc_R_rxn00410_M_cpd00067_c)^(2*hco_R_rxn00410)*(1 + M_cpd00009_c*c/kmc_R_rxn00410_M_cpd00009_c)^hco_R_rxn00410*(1 + M_cpd00008_c*c/kmc_R_rxn00410_M_cpd00008_c)^hco_R_rxn00410*(1 + M_cpd00052_c*c/kmc_R_rxn00410_M_cpd00052_c)^hco_R_rxn00410 - 1);  // modifiers: M_cpd00013_c, M_cpd00062_c, M_cpd00008_c, M_cpd00067_c, M_cpd00002_c, M_cpd00052_c
  R_rxn08335_M_cpd15560_c_fill: => M_cpd15560_c; R_rxn08335_M_cpd15560_c_fill_FILL_RATE;
    R_rxn08335_M_cpd15560_c_fill_FILL_RATE = 1 mmol_per_gDW_per_hr;
  R_rxn08335_M_cpd15560_c_drain: M_cpd15560_c => ; (vmaf_R_rxn08335/(kic_R_rxn08335_M_cpd15560_c*kmc_R_rxn08335_M_cpd00282_c)*M_cpd15560_c*c*M_cpd00282_c*c - vmar_R_rxn08335/(kic_R_rxn08335_M_cpd00247_c*kmc_R_rxn08335_M_cpd15561_c)*M_cpd15561_c*c*M_cpd00247_c*c)/(1 + M_cpd15560_c*c*M_cpd00282_c*c/(kic_R_rxn08335_M_cpd15560_c*kmc_R_rxn08335_M_cpd00282_c) + M_cpd15560_c*c/kic_R_rxn08335_M_cpd15560_c + M_cpd15561_c*c*M_cpd00247_c*c/(kic_R_rxn08335_M_cpd00247_c*kmc_R_rxn08335_M_cpd15561_c) + M_cpd00282_c*c/kic_R_rxn08335_M_cpd00282_c + M_cpd00247_c*c/kic_R_rxn08335_M_cpd00247_c + M_cpd15561_c*c/kic_R_rxn08335_M_cpd15561_c);  // modifiers: M_cpd15561_c, M_cpd00247_c, M_cpd00282_c
  R_rxn08335_M_cpd15561_c_fill: => M_cpd15561_c; R_rxn08335_M_cpd15561_c_fill_FILL_RATE;
    R_rxn08335_M_cpd15561_c_fill_FILL_RATE = 1 mmol_per_gDW_per_hr;
  R_rxn08335_M_cpd15561_c_drain: M_cpd15561_c => ; (vmaf_R_rxn08335/(kic_R_rxn08335_M_cpd15560_c*kmc_R_rxn08335_M_cpd00282_c)*M_cpd15560_c*c*M_cpd00282_c*c - vmar_R_rxn08335/(kic_R_rxn08335_M_cpd00247_c*kmc_R_rxn08335_M_cpd15561_c)*M_cpd15561_c*c*M_cpd00247_c*c)/(1 + M_cpd15560_c*c*M_cpd00282_c*c/(kic_R_rxn08335_M_cpd15560_c*kmc_R_rxn08335_M_cpd00282_c) + M_cpd15560_c*c/kic_R_rxn08335_M_cpd15560_c + M_cpd15561_c*c*M_cpd00247_c*c/(kic_R_rxn08335_M_cpd00247_c*kmc_R_rxn08335_M_cpd15561_c) + M_cpd00282_c*c/kic_R_rxn08335_M_cpd00282_c + M_cpd00247_c*c/kic_R_rxn08335_M_cpd00247_c + M_cpd15561_c*c/kic_R_rxn08335_M_cpd15561_c);  // modifiers: M_cpd00247_c, M_cpd15560_c, M_cpd00282_c
  R_rJB00259_M_cpd01351_c_fill: => M_cpd01351_c; R_rJB00259_M_cpd01351_c_fill_FILL_RATE;
    R_rJB00259_M_cpd01351_c_fill_FILL_RATE = 1 mmol_per_gDW_per_hr;
  R_rJB00259_M_cpd01351_c_drain: M_cpd01351_c => ; (vmaf_R_rJB00259/(kic_R_rJB00259_M_cpd01351_c*kmc_R_rJB00259_M_cpd00282_c)*M_cpd01351_c*c*M_cpd00282_c*c - vmar_R_rJB00259/(kic_R_rJB00259_M_cpd00247_c*kmc_R_rJB00259_M_cJB00125_c)*M_cJB00125_c*c*M_cpd00247_c*c)/(1 + M_cpd01351_c*c*M_cpd00282_c*c/(kic_R_rJB00259_M_cpd01351_c*kmc_R_rJB00259_M_cpd00282_c) + M_cpd01351_c*c/kic_R_rJB00259_M_cpd01351_c + M_cJB00125_c*c*M_cpd00247_c*c/(kic_R_rJB00259_M_cpd00247_c*kmc_R_rJB00259_M_cJB00125_c) + M_cpd00282_c*c/kic_R_rJB00259_M_cpd00282_c + M_cpd00247_c*c/kic_R_rJB00259_M_cpd00247_c + M_cJB00125_c*c/kic_R_rJB00259_M_cJB00125_c);  // modifiers: M_cJB00125_c, M_cpd00247_c, M_cpd00282_c
  R_rJB00259_M_cJB00125_c_fill: => M_cJB00125_c; R_rJB00259_M_cJB00125_c_fill_FILL_RATE;
    R_rJB00259_M_cJB00125_c_fill_FILL_RATE = 1 mmol_per_gDW_per_hr;
  R_rJB00259_M_cJB00125_c_drain: M_cJB00125_c => ; (vmaf_R_rJB00259/(kic_R_rJB00259_M_cpd01351_c*kmc_R_rJB00259_M_cpd00282_c)*M_cpd01351_c*c*M_cpd00282_c*c - vmar_R_rJB00259/(kic_R_rJB00259_M_cpd00247_c*kmc_R_rJB00259_M_cJB00125_c)*M_cJB00125_c*c*M_cpd00247_c*c)/(1 + M_cpd01351_c*c*M_cpd00282_c*c/(kic_R_rJB00259_M_cpd01351_c*kmc_R_rJB00259_M_cpd00282_c) + M_cpd01351_c*c/kic_R_rJB00259_M_cpd01351_c + M_cJB00125_c*c*M_cpd00247_c*c/(kic_R_rJB00259_M_cpd00247_c*kmc_R_rJB00259_M_cJB00125_c) + M_cpd00282_c*c/kic_R_rJB00259_M_cpd00282_c + M_cpd00247_c*c/kic_R_rJB00259_M_cpd00247_c + M_cJB00125_c*c/kic_R_rJB00259_M_cJB00125_c);  // modifiers: M_cpd00247_c, M_cpd00282_c, M_cpd01351_c
  R_rxn01513_M_cpd00002_c_drain: M_cpd00002_c => ; (vmaf_R_rxn01513/(kic_R_rxn01513_M_cpd00002_c*kmc_R_rxn01513_M_cpd00298_c)*M_cpd00002_c*c*M_cpd00298_c*c - vmar_R_rxn01513/(kic_R_rxn01513_M_cpd00297_c*kmc_R_rxn01513_M_cpd00008_c)*M_cpd00008_c*c*M_cpd00297_c*c)/(1 + M_cpd00002_c*c*M_cpd00298_c*c/(kic_R_rxn01513_M_cpd00002_c*kmc_R_rxn01513_M_cpd00298_c) + M_cpd00002_c*c/kic_R_rxn01513_M_cpd00002_c + M_cpd00008_c*c*M_cpd00297_c*c/(kic_R_rxn01513_M_cpd00297_c*kmc_R_rxn01513_M_cpd00008_c) + M_cpd00298_c*c/kic_R_rxn01513_M_cpd00298_c + M_cpd00297_c*c/kic_R_rxn01513_M_cpd00297_c + M_cpd00008_c*c/kic_R_rxn01513_M_cpd00008_c);  // modifiers: M_cpd00008_c, M_cpd00298_c, M_cpd00297_c
  R_rxn00364_M_cpd00002_c_drain: M_cpd00002_c => ; (vmaf_R_rxn00364/(kic_R_rxn00364_M_cpd00002_c*kmc_R_rxn00364_M_cpd00046_c)*M_cpd00002_c*c*M_cpd00046_c*c - vmar_R_rxn00364/(kic_R_rxn00364_M_cpd00096_c*kmc_R_rxn00364_M_cpd00008_c)*M_cpd00008_c*c*M_cpd00096_c*c)/(1 + M_cpd00002_c*c*M_cpd00046_c*c/(kic_R_rxn00364_M_cpd00002_c*kmc_R_rxn00364_M_cpd00046_c) + M_cpd00002_c*c/kic_R_rxn00364_M_cpd00002_c + M_cpd00008_c*c*M_cpd00096_c*c/(kic_R_rxn00364_M_cpd00096_c*kmc_R_rxn00364_M_cpd00008_c) + M_cpd00046_c*c/kic_R_rxn00364_M_cpd00046_c + M_cpd00096_c*c/kic_R_rxn00364_M_cpd00096_c + M_cpd00008_c*c/kic_R_rxn00364_M_cpd00008_c);  // modifiers: M_cpd00008_c, M_cpd00096_c, M_cpd00046_c
  R_rxn01219_M_cpd00002_c_drain: M_cpd00002_c => ; (vmaf_R_rxn01219/(kic_R_rxn01219_M_cpd00002_c*kmc_R_rxn01219_M_cpd00206_c)*M_cpd00002_c*c*M_cpd00206_c*c - vmar_R_rxn01219/(kic_R_rxn01219_M_cpd00533_c*kmc_R_rxn01219_M_cpd00008_c)*M_cpd00008_c*c*M_cpd00533_c*c)/(1 + M_cpd00002_c*c*M_cpd00206_c*c/(kic_R_rxn01219_M_cpd00002_c*kmc_R_rxn01219_M_cpd00206_c) + M_cpd00002_c*c/kic_R_rxn01219_M_cpd00002_c + M_cpd00008_c*c*M_cpd00533_c*c/(kic_R_rxn01219_M_cpd00533_c*kmc_R_rxn01219_M_cpd00008_c) + M_cpd00206_c*c/kic_R_rxn01219_M_cpd00206_c + M_cpd00533_c*c/kic_R_rxn01219_M_cpd00533_c + M_cpd00008_c*c/kic_R_rxn01219_M_cpd00008_c);  // modifiers: M_cpd00008_c, M_cpd00206_c, M_cpd00533_c
  R_rxn00410_M_cpd00002_c_drain: M_cpd00002_c => ; (vmaf_R_rxn00410*(M_cpd00002_c*c/kmc_R_rxn00410_M_cpd00002_c)^hco_R_rxn00410*(M_cpd00013_c*c/kmc_R_rxn00410_M_cpd00013_c)^hco_R_rxn00410*(M_cpd00062_c*c/kmc_R_rxn00410_M_cpd00062_c)^hco_R_rxn00410 - vmar_R_rxn00410*(M_cpd00067_c*c/kmc_R_rxn00410_M_cpd00067_c)^(2*hco_R_rxn00410)*(M_cpd00009_c*c/kmc_R_rxn00410_M_cpd00009_c)^hco_R_rxn00410*(M_cpd00008_c*c/kmc_R_rxn00410_M_cpd00008_c)^hco_R_rxn00410*(M_cpd00052_c*c/kmc_R_rxn00410_M_cpd00052_c)^hco_R_rxn00410)/((1 + M_cpd00002_c*c/kmc_R_rxn00410_M_cpd00002_c)^hco_R_rxn00410*(1 + M_cpd00013_c*c/kmc_R_rxn00410_M_cpd00013_c)^hco_R_rxn00410*(1 + M_cpd00062_c*c/kmc_R_rxn00410_M_cpd00062_c)^hco_R_rxn00410 + (1 + M_cpd00067_c*c/kmc_R_rxn00410_M_cpd00067_c)^(2*hco_R_rxn00410)*(1 + M_cpd00009_c*c/kmc_R_rxn00410_M_cpd00009_c)^hco_R_rxn00410*(1 + M_cpd00008_c*c/kmc_R_rxn00410_M_cpd00008_c)^hco_R_rxn00410*(1 + M_cpd00052_c*c/kmc_R_rxn00410_M_cpd00052_c)^hco_R_rxn00410 - 1);  // modifiers: M_cpd00013_c, M_cpd00009_c, M_cpd00062_c, M_cpd00008_c, M_cpd00067_c, M_cpd00052_c
  R_rxn00119_M_cpd00002_c_drain: M_cpd00002_c => ; (vmaf_R_rxn00119/(kic_R_rxn00119_M_cpd00002_c*kmc_R_rxn00119_M_cpd00091_c)*M_cpd00002_c*c*M_cpd00091_c*c - vmar_R_rxn00119/(kic_R_rxn00119_M_cpd00014_c*kmc_R_rxn00119_M_cpd00008_c)*M_cpd00008_c*c*M_cpd00014_c*c)/(1 + M_cpd00002_c*c*M_cpd00091_c*c/(kic_R_rxn00119_M_cpd00002_c*kmc_R_rxn00119_M_cpd00091_c) + M_cpd00002_c*c/kic_R_rxn00119_M_cpd00002_c + M_cpd00008_c*c*M_cpd00014_c*c/(kic_R_rxn00119_M_cpd00014_c*kmc_R_rxn00119_M_cpd00008_c) + M_cpd00091_c*c/kic_R_rxn00119_M_cpd00091_c + M_cpd00014_c*c/kic_R_rxn00119_M_cpd00014_c + M_cpd00008_c*c/kic_R_rxn00119_M_cpd00008_c);  // modifiers: M_cpd00008_c, M_cpd00091_c, M_cpd00014_c
  R_rxn01517_M_cpd00002_c_drain: M_cpd00002_c => ; (vmaf_R_rxn01517/(kic_R_rxn01517_M_cpd00002_c*kmc_R_rxn01517_M_cpd00299_c)*M_cpd00002_c*c*M_cpd00299_c*c - vmar_R_rxn01517/(kic_R_rxn01517_M_cpd00978_c*kmc_R_rxn01517_M_cpd00008_c)*M_cpd00008_c*c*M_cpd00978_c*c)/(1 + M_cpd00002_c*c*M_cpd00299_c*c/(kic_R_rxn01517_M_cpd00002_c*kmc_R_rxn01517_M_cpd00299_c) + M_cpd00002_c*c/kic_R_rxn01517_M_cpd00002_c + M_cpd00008_c*c*M_cpd00978_c*c/(kic_R_rxn01517_M_cpd00978_c*kmc_R_rxn01517_M_cpd00008_c) + M_cpd00299_c*c/kic_R_rxn01517_M_cpd00299_c + M_cpd00978_c*c/kic_R_rxn01517_M_cpd00978_c + M_cpd00008_c*c/kic_R_rxn01517_M_cpd00008_c);  // modifiers: M_cpd00299_c, M_cpd00978_c, M_cpd00008_c
  R_rxn00409_M_cpd00002_c_drain: M_cpd00002_c => ; (vmaf_R_rxn00409/(kic_R_rxn00409_M_cpd00002_c*kmc_R_rxn00409_M_cpd00096_c)*M_cpd00002_c*c*M_cpd00096_c*c - vmar_R_rxn00409/(kic_R_rxn00409_M_cpd00052_c*kmc_R_rxn00409_M_cpd00008_c)*M_cpd00008_c*c*M_cpd00052_c*c)/(1 + M_cpd00002_c*c*M_cpd00096_c*c/(kic_R_rxn00409_M_cpd00002_c*kmc_R_rxn00409_M_cpd00096_c) + M_cpd00002_c*c/kic_R_rxn00409_M_cpd00002_c + M_cpd00008_c*c*M_cpd00052_c*c/(kic_R_rxn00409_M_cpd00052_c*kmc_R_rxn00409_M_cpd00008_c) + M_cpd00096_c*c/kic_R_rxn00409_M_cpd00096_c + M_cpd00052_c*c/kic_R_rxn00409_M_cpd00052_c + M_cpd00008_c*c/kic_R_rxn00409_M_cpd00008_c);  // modifiers: M_cpd00008_c, M_cpd00096_c, M_cpd00052_c
  R_rxn01673_M_cpd00002_c_drain: M_cpd00002_c => ; (vmaf_R_rxn01673/(kic_R_rxn01673_M_cpd00002_c*kmc_R_rxn01673_M_cpd00533_c)*M_cpd00002_c*c*M_cpd00533_c*c - vmar_R_rxn01673/(kic_R_rxn01673_M_cpd00356_c*kmc_R_rxn01673_M_cpd00008_c)*M_cpd00008_c*c*M_cpd00356_c*c)/(1 + M_cpd00002_c*c*M_cpd00533_c*c/(kic_R_rxn01673_M_cpd00002_c*kmc_R_rxn01673_M_cpd00533_c) + M_cpd00002_c*c/kic_R_rxn01673_M_cpd00002_c + M_cpd00008_c*c*M_cpd00356_c*c/(kic_R_rxn01673_M_cpd00356_c*kmc_R_rxn01673_M_cpd00008_c) + M_cpd00533_c*c/kic_R_rxn01673_M_cpd00533_c + M_cpd00356_c*c/kic_R_rxn01673_M_cpd00356_c + M_cpd00008_c*c/kic_R_rxn01673_M_cpd00008_c);  // modifiers: M_cpd00008_c, M_cpd00533_c, M_cpd00356_c
  R_rxn01512_M_cpd00002_c_drain: M_cpd00002_c => ; (vmaf_R_rxn01512/(kic_R_rxn01512_M_cpd00002_c*kmc_R_rxn01512_M_cpd00297_c)*M_cpd00002_c*c*M_cpd00297_c*c - vmar_R_rxn01512/(kic_R_rxn01512_M_cpd00357_c*kmc_R_rxn01512_M_cpd00008_c)*M_cpd00008_c*c*M_cpd00357_c*c)/(1 + M_cpd00002_c*c*M_cpd00297_c*c/(kic_R_rxn01512_M_cpd00002_c*kmc_R_rxn01512_M_cpd00297_c) + M_cpd00002_c*c/kic_R_rxn01512_M_cpd00002_c + M_cpd00008_c*c*M_cpd00357_c*c/(kic_R_rxn01512_M_cpd00357_c*kmc_R_rxn01512_M_cpd00008_c) + M_cpd00297_c*c/kic_R_rxn01512_M_cpd00297_c + M_cpd00357_c*c/kic_R_rxn01512_M_cpd00357_c + M_cpd00008_c*c/kic_R_rxn01512_M_cpd00008_c);  // modifiers: M_cpd00008_c, M_cpd00357_c, M_cpd00297_c
  R_rxn01678_M_cpd00002_c_drain: M_cpd00002_c => ; (vmaf_R_rxn01678/(kic_R_rxn01678_M_cpd00002_c*kmc_R_rxn01678_M_cpd00978_c)*M_cpd00002_c*c*M_cpd00978_c*c - vmar_R_rxn01678/(kic_R_rxn01678_M_cpd00358_c*kmc_R_rxn01678_M_cpd00008_c)*M_cpd00008_c*c*M_cpd00358_c*c)/(1 + M_cpd00002_c*c*M_cpd00978_c*c/(kic_R_rxn01678_M_cpd00002_c*kmc_R_rxn01678_M_cpd00978_c) + M_cpd00002_c*c/kic_R_rxn01678_M_cpd00002_c + M_cpd00008_c*c*M_cpd00358_c*c/(kic_R_rxn01678_M_cpd00358_c*kmc_R_rxn01678_M_cpd00008_c) + M_cpd00978_c*c/kic_R_rxn01678_M_cpd00978_c + M_cpd00358_c*c/kic_R_rxn01678_M_cpd00358_c + M_cpd00008_c*c/kic_R_rxn01678_M_cpd00008_c);  // modifiers: M_cpd00008_c, M_cpd00978_c, M_cpd00358_c
  R_rxn00117_M_cpd00002_c_drain: M_cpd00002_c => ; (vmaf_R_rxn00117/(kic_R_rxn00117_M_cpd00002_c*kmc_R_rxn00117_M_cpd00014_c)*M_cpd00002_c*c*M_cpd00014_c*c - vmar_R_rxn00117/(kic_R_rxn00117_M_cpd00062_c*kmc_R_rxn00117_M_cpd00008_c)*M_cpd00008_c*c*M_cpd00062_c*c)/(1 + M_cpd00002_c*c*M_cpd00014_c*c/(kic_R_rxn00117_M_cpd00002_c*kmc_R_rxn00117_M_cpd00014_c) + M_cpd00002_c*c/kic_R_rxn00117_M_cpd00002_c + M_cpd00008_c*c*M_cpd00062_c*c/(kic_R_rxn00117_M_cpd00062_c*kmc_R_rxn00117_M_cpd00008_c) + M_cpd00014_c*c/kic_R_rxn00117_M_cpd00014_c + M_cpd00062_c*c/kic_R_rxn00117_M_cpd00062_c + M_cpd00008_c*c/kic_R_rxn00117_M_cpd00008_c);  // modifiers: M_cpd00008_c, M_cpd00062_c, M_cpd00014_c
  R_rxn01513_M_cpd00008_c_drain: M_cpd00008_c => ; (vmaf_R_rxn01513/(kic_R_rxn01513_M_cpd00002_c*kmc_R_rxn01513_M_cpd00298_c)*M_cpd00002_c*c*M_cpd00298_c*c - vmar_R_rxn01513/(kic_R_rxn01513_M_cpd00297_c*kmc_R_rxn01513_M_cpd00008_c)*M_cpd00008_c*c*M_cpd00297_c*c)/(1 + M_cpd00002_c*c*M_cpd00298_c*c/(kic_R_rxn01513_M_cpd00002_c*kmc_R_rxn01513_M_cpd00298_c) + M_cpd00002_c*c/kic_R_rxn01513_M_cpd00002_c + M_cpd00008_c*c*M_cpd00297_c*c/(kic_R_rxn01513_M_cpd00297_c*kmc_R_rxn01513_M_cpd00008_c) + M_cpd00298_c*c/kic_R_rxn01513_M_cpd00298_c + M_cpd00297_c*c/kic_R_rxn01513_M_cpd00297_c + M_cpd00008_c*c/kic_R_rxn01513_M_cpd00008_c);  // modifiers: M_cpd00002_c, M_cpd00298_c, M_cpd00297_c
  R_rxn00364_M_cpd00008_c_drain: M_cpd00008_c => ; (vmaf_R_rxn00364/(kic_R_rxn00364_M_cpd00002_c*kmc_R_rxn00364_M_cpd00046_c)*M_cpd00002_c*c*M_cpd00046_c*c - vmar_R_rxn00364/(kic_R_rxn00364_M_cpd00096_c*kmc_R_rxn00364_M_cpd00008_c)*M_cpd00008_c*c*M_cpd00096_c*c)/(1 + M_cpd00002_c*c*M_cpd00046_c*c/(kic_R_rxn00364_M_cpd00002_c*kmc_R_rxn00364_M_cpd00046_c) + M_cpd00002_c*c/kic_R_rxn00364_M_cpd00002_c + M_cpd00008_c*c*M_cpd00096_c*c/(kic_R_rxn00364_M_cpd00096_c*kmc_R_rxn00364_M_cpd00008_c) + M_cpd00046_c*c/kic_R_rxn00364_M_cpd00046_c + M_cpd00096_c*c/kic_R_rxn00364_M_cpd00096_c + M_cpd00008_c*c/kic_R_rxn00364_M_cpd00008_c);  // modifiers: M_cpd00002_c, M_cpd00096_c, M_cpd00046_c
  R_rxn01219_M_cpd00008_c_drain: M_cpd00008_c => ; (vmaf_R_rxn01219/(kic_R_rxn01219_M_cpd00002_c*kmc_R_rxn01219_M_cpd00206_c)*M_cpd00002_c*c*M_cpd00206_c*c - vmar_R_rxn01219/(kic_R_rxn01219_M_cpd00533_c*kmc_R_rxn01219_M_cpd00008_c)*M_cpd00008_c*c*M_cpd00533_c*c)/(1 + M_cpd00002_c*c*M_cpd00206_c*c/(kic_R_rxn01219_M_cpd00002_c*kmc_R_rxn01219_M_cpd00206_c) + M_cpd00002_c*c/kic_R_rxn01219_M_cpd00002_c + M_cpd00008_c*c*M_cpd00533_c*c/(kic_R_rxn01219_M_cpd00533_c*kmc_R_rxn01219_M_cpd00008_c) + M_cpd00206_c*c/kic_R_rxn01219_M_cpd00206_c + M_cpd00533_c*c/kic_R_rxn01219_M_cpd00533_c + M_cpd00008_c*c/kic_R_rxn01219_M_cpd00008_c);  // modifiers: M_cpd00002_c, M_cpd00206_c, M_cpd00533_c
  R_rxn00410_M_cpd00008_c_drain: M_cpd00008_c => ; (vmaf_R_rxn00410*(M_cpd00002_c*c/kmc_R_rxn00410_M_cpd00002_c)^hco_R_rxn00410*(M_cpd00013_c*c/kmc_R_rxn00410_M_cpd00013_c)^hco_R_rxn00410*(M_cpd00062_c*c/kmc_R_rxn00410_M_cpd00062_c)^hco_R_rxn00410 - vmar_R_rxn00410*(M_cpd00067_c*c/kmc_R_rxn00410_M_cpd00067_c)^(2*hco_R_rxn00410)*(M_cpd00009_c*c/kmc_R_rxn00410_M_cpd00009_c)^hco_R_rxn00410*(M_cpd00008_c*c/kmc_R_rxn00410_M_cpd00008_c)^hco_R_rxn00410*(M_cpd00052_c*c/kmc_R_rxn00410_M_cpd00052_c)^hco_R_rxn00410)/((1 + M_cpd00002_c*c/kmc_R_rxn00410_M_cpd00002_c)^hco_R_rxn00410*(1 + M_cpd00013_c*c/kmc_R_rxn00410_M_cpd00013_c)^hco_R_rxn00410*(1 + M_cpd00062_c*c/kmc_R_rxn00410_M_cpd00062_c)^hco_R_rxn00410 + (1 + M_cpd00067_c*c/kmc_R_rxn00410_M_cpd00067_c)^(2*hco_R_rxn00410)*(1 + M_cpd00009_c*c/kmc_R_rxn00410_M_cpd00009_c)^hco_R_rxn00410*(1 + M_cpd00008_c*c/kmc_R_rxn00410_M_cpd00008_c)^hco_R_rxn00410*(1 + M_cpd00052_c*c/kmc_R_rxn00410_M_cpd00052_c)^hco_R_rxn00410 - 1);  // modifiers: M_cpd00013_c, M_cpd00009_c, M_cpd00062_c, M_cpd00067_c, M_cpd00002_c, M_cpd00052_c
  R_rxn00119_M_cpd00008_c_drain: M_cpd00008_c => ; (vmaf_R_rxn00119/(kic_R_rxn00119_M_cpd00002_c*kmc_R_rxn00119_M_cpd00091_c)*M_cpd00002_c*c*M_cpd00091_c*c - vmar_R_rxn00119/(kic_R_rxn00119_M_cpd00014_c*kmc_R_rxn00119_M_cpd00008_c)*M_cpd00008_c*c*M_cpd00014_c*c)/(1 + M_cpd00002_c*c*M_cpd00091_c*c/(kic_R_rxn00119_M_cpd00002_c*kmc_R_rxn00119_M_cpd00091_c) + M_cpd00002_c*c/kic_R_rxn00119_M_cpd00002_c + M_cpd00008_c*c*M_cpd00014_c*c/(kic_R_rxn00119_M_cpd00014_c*kmc_R_rxn00119_M_cpd00008_c) + M_cpd00091_c*c/kic_R_rxn00119_M_cpd00091_c + M_cpd00014_c*c/kic_R_rxn00119_M_cpd00014_c + M_cpd00008_c*c/kic_R_rxn00119_M_cpd00008_c);  // modifiers: M_cpd00002_c, M_cpd00091_c, M_cpd00014_c
  R_rxn01517_M_cpd00008_c_drain: M_cpd00008_c => ; (vmaf_R_rxn01517/(kic_R_rxn01517_M_cpd00002_c*kmc_R_rxn01517_M_cpd00299_c)*M_cpd00002_c*c*M_cpd00299_c*c - vmar_R_rxn01517/(kic_R_rxn01517_M_cpd00978_c*kmc_R_rxn01517_M_cpd00008_c)*M_cpd00008_c*c*M_cpd00978_c*c)/(1 + M_cpd00002_c*c*M_cpd00299_c*c/(kic_R_rxn01517_M_cpd00002_c*kmc_R_rxn01517_M_cpd00299_c) + M_cpd00002_c*c/kic_R_rxn01517_M_cpd00002_c + M_cpd00008_c*c*M_cpd00978_c*c/(kic_R_rxn01517_M_cpd00978_c*kmc_R_rxn01517_M_cpd00008_c) + M_cpd00299_c*c/kic_R_rxn01517_M_cpd00299_c + M_cpd00978_c*c/kic_R_rxn01517_M_cpd00978_c + M_cpd00008_c*c/kic_R_rxn01517_M_cpd00008_c);  // modifiers: M_cpd00002_c, M_cpd00299_c, M_cpd00978_c
  R_rxn00409_M_cpd00008_c_drain: M_cpd00008_c => ; (vmaf_R_rxn00409/(kic_R_rxn00409_M_cpd00002_c*kmc_R_rxn00409_M_cpd00096_c)*M_cpd00002_c*c*M_cpd00096_c*c - vmar_R_rxn00409/(kic_R_rxn00409_M_cpd00052_c*kmc_R_rxn00409_M_cpd00008_c)*M_cpd00008_c*c*M_cpd00052_c*c)/(1 + M_cpd00002_c*c*M_cpd00096_c*c/(kic_R_rxn00409_M_cpd00002_c*kmc_R_rxn00409_M_cpd00096_c) + M_cpd00002_c*c/kic_R_rxn00409_M_cpd00002_c + M_cpd00008_c*c*M_cpd00052_c*c/(kic_R_rxn00409_M_cpd00052_c*kmc_R_rxn00409_M_cpd00008_c) + M_cpd00096_c*c/kic_R_rxn00409_M_cpd00096_c + M_cpd00052_c*c/kic_R_rxn00409_M_cpd00052_c + M_cpd00008_c*c/kic_R_rxn00409_M_cpd00008_c);  // modifiers: M_cpd00002_c, M_cpd00096_c, M_cpd00052_c
  R_rxn01673_M_cpd00008_c_drain: M_cpd00008_c => ; (vmaf_R_rxn01673/(kic_R_rxn01673_M_cpd00002_c*kmc_R_rxn01673_M_cpd00533_c)*M_cpd00002_c*c*M_cpd00533_c*c - vmar_R_rxn01673/(kic_R_rxn01673_M_cpd00356_c*kmc_R_rxn01673_M_cpd00008_c)*M_cpd00008_c*c*M_cpd00356_c*c)/(1 + M_cpd00002_c*c*M_cpd00533_c*c/(kic_R_rxn01673_M_cpd00002_c*kmc_R_rxn01673_M_cpd00533_c) + M_cpd00002_c*c/kic_R_rxn01673_M_cpd00002_c + M_cpd00008_c*c*M_cpd00356_c*c/(kic_R_rxn01673_M_cpd00356_c*kmc_R_rxn01673_M_cpd00008_c) + M_cpd00533_c*c/kic_R_rxn01673_M_cpd00533_c + M_cpd00356_c*c/kic_R_rxn01673_M_cpd00356_c + M_cpd00008_c*c/kic_R_rxn01673_M_cpd00008_c);  // modifiers: M_cpd00002_c, M_cpd00533_c, M_cpd00356_c
  R_rxn01512_M_cpd00008_c_drain: M_cpd00008_c => ; (vmaf_R_rxn01512/(kic_R_rxn01512_M_cpd00002_c*kmc_R_rxn01512_M_cpd00297_c)*M_cpd00002_c*c*M_cpd00297_c*c - vmar_R_rxn01512/(kic_R_rxn01512_M_cpd00357_c*kmc_R_rxn01512_M_cpd00008_c)*M_cpd00008_c*c*M_cpd00357_c*c)/(1 + M_cpd00002_c*c*M_cpd00297_c*c/(kic_R_rxn01512_M_cpd00002_c*kmc_R_rxn01512_M_cpd00297_c) + M_cpd00002_c*c/kic_R_rxn01512_M_cpd00002_c + M_cpd00008_c*c*M_cpd00357_c*c/(kic_R_rxn01512_M_cpd00357_c*kmc_R_rxn01512_M_cpd00008_c) + M_cpd00297_c*c/kic_R_rxn01512_M_cpd00297_c + M_cpd00357_c*c/kic_R_rxn01512_M_cpd00357_c + M_cpd00008_c*c/kic_R_rxn01512_M_cpd00008_c);  // modifiers: M_cpd00002_c, M_cpd00357_c, M_cpd00297_c
  R_rxn01678_M_cpd00008_c_drain: M_cpd00008_c => ; (vmaf_R_rxn01678/(kic_R_rxn01678_M_cpd00002_c*kmc_R_rxn01678_M_cpd00978_c)*M_cpd00002_c*c*M_cpd00978_c*c - vmar_R_rxn01678/(kic_R_rxn01678_M_cpd00358_c*kmc_R_rxn01678_M_cpd00008_c)*M_cpd00008_c*c*M_cpd00358_c*c)/(1 + M_cpd00002_c*c*M_cpd00978_c*c/(kic_R_rxn01678_M_cpd00002_c*kmc_R_rxn01678_M_cpd00978_c) + M_cpd00002_c*c/kic_R_rxn01678_M_cpd00002_c + M_cpd00008_c*c*M_cpd00358_c*c/(kic_R_rxn01678_M_cpd00358_c*kmc_R_rxn01678_M_cpd00008_c) + M_cpd00978_c*c/kic_R_rxn01678_M_cpd00978_c + M_cpd00358_c*c/kic_R_rxn01678_M_cpd00358_c + M_cpd00008_c*c/kic_R_rxn01678_M_cpd00008_c);  // modifiers: M_cpd00002_c, M_cpd00978_c, M_cpd00358_c
  R_rxn00117_M_cpd00008_c_drain: M_cpd00008_c => ; (vmaf_R_rxn00117/(kic_R_rxn00117_M_cpd00002_c*kmc_R_rxn00117_M_cpd00014_c)*M_cpd00002_c*c*M_cpd00014_c*c - vmar_R_rxn00117/(kic_R_rxn00117_M_cpd00062_c*kmc_R_rxn00117_M_cpd00008_c)*M_cpd00008_c*c*M_cpd00062_c*c)/(1 + M_cpd00002_c*c*M_cpd00014_c*c/(kic_R_rxn00117_M_cpd00002_c*kmc_R_rxn00117_M_cpd00014_c) + M_cpd00002_c*c/kic_R_rxn00117_M_cpd00002_c + M_cpd00008_c*c*M_cpd00062_c*c/(kic_R_rxn00117_M_cpd00062_c*kmc_R_rxn00117_M_cpd00008_c) + M_cpd00014_c*c/kic_R_rxn00117_M_cpd00014_c + M_cpd00062_c*c/kic_R_rxn00117_M_cpd00062_c + M_cpd00008_c*c/kic_R_rxn00117_M_cpd00008_c);  // modifiers: M_cpd00002_c, M_cpd00062_c, M_cpd00014_c
  R_rxn05289_M_cpd11420_c_fill: => M_cpd11420_c; R_rxn05289_M_cpd11420_c_fill_FILL_RATE;
    R_rxn05289_M_cpd11420_c_fill_FILL_RATE = 1 mmol_per_gDW_per_hr;
  R_rxn05289_M_cpd11420_c_drain: M_cpd11420_c => ; (vmaf_R_rxn05289*(M_cpd00067_c*c/kmc_R_rxn05289_M_cpd00067_c)^hco_R_rxn05289*(M_cpd00005_c*c/kmc_R_rxn05289_M_cpd00005_c)^hco_R_rxn05289*(M_cpd11420_c*c/kmc_R_rxn05289_M_cpd11420_c)^hco_R_rxn05289 - vmar_R_rxn05289*(M_cpd00006_c*c/kmc_R_rxn05289_M_cpd00006_c)^hco_R_rxn05289*(M_cpd11421_c*c/kmc_R_rxn05289_M_cpd11421_c)^hco_R_rxn05289)/((1 + M_cpd00067_c*c/kmc_R_rxn05289_M_cpd00067_c)^hco_R_rxn05289*(1 + M_cpd00005_c*c/kmc_R_rxn05289_M_cpd00005_c)^hco_R_rxn05289*(1 + M_cpd11420_c*c/kmc_R_rxn05289_M_cpd11420_c)^hco_R_rxn05289 + (1 + M_cpd00006_c*c/kmc_R_rxn05289_M_cpd00006_c)^hco_R_rxn05289*(1 + M_cpd11421_c*c/kmc_R_rxn05289_M_cpd11421_c)^hco_R_rxn05289 - 1);  // modifiers: M_cpd00005_c, M_cpd00006_c, M_cpd00067_c, M_cpd11421_c
  R_rxn05289_M_cpd11421_c_fill: => M_cpd11421_c; R_rxn05289_M_cpd11421_c_fill_FILL_RATE;
    R_rxn05289_M_cpd11421_c_fill_FILL_RATE = 1 mmol_per_gDW_per_hr;
  R_rxn05289_M_cpd11421_c_drain: M_cpd11421_c => ; (vmaf_R_rxn05289*(M_cpd00067_c*c/kmc_R_rxn05289_M_cpd00067_c)^hco_R_rxn05289*(M_cpd00005_c*c/kmc_R_rxn05289_M_cpd00005_c)^hco_R_rxn05289*(M_cpd11420_c*c/kmc_R_rxn05289_M_cpd11420_c)^hco_R_rxn05289 - vmar_R_rxn05289*(M_cpd00006_c*c/kmc_R_rxn05289_M_cpd00006_c)^hco_R_rxn05289*(M_cpd11421_c*c/kmc_R_rxn05289_M_cpd11421_c)^hco_R_rxn05289)/((1 + M_cpd00067_c*c/kmc_R_rxn05289_M_cpd00067_c)^hco_R_rxn05289*(1 + M_cpd00005_c*c/kmc_R_rxn05289_M_cpd00005_c)^hco_R_rxn05289*(1 + M_cpd11420_c*c/kmc_R_rxn05289_M_cpd11420_c)^hco_R_rxn05289 + (1 + M_cpd00006_c*c/kmc_R_rxn05289_M_cpd00006_c)^hco_R_rxn05289*(1 + M_cpd11421_c*c/kmc_R_rxn05289_M_cpd11421_c)^hco_R_rxn05289 - 1);  // modifiers: M_cpd11420_c, M_cpd00005_c, M_cpd00006_c, M_cpd00067_c
  R_rxn00410_M_cpd00013_c_fill: => M_cpd00013_c; R_rxn00410_M_cpd00013_c_fill_FILL_RATE;
    R_rxn00410_M_cpd00013_c_fill_FILL_RATE = 1 mmol_per_gDW_per_hr;
  R_rxn00410_M_cpd00013_c_drain: M_cpd00013_c => ; (vmaf_R_rxn00410*(M_cpd00002_c*c/kmc_R_rxn00410_M_cpd00002_c)^hco_R_rxn00410*(M_cpd00013_c*c/kmc_R_rxn00410_M_cpd00013_c)^hco_R_rxn00410*(M_cpd00062_c*c/kmc_R_rxn00410_M_cpd00062_c)^hco_R_rxn00410 - vmar_R_rxn00410*(M_cpd00067_c*c/kmc_R_rxn00410_M_cpd00067_c)^(2*hco_R_rxn00410)*(M_cpd00009_c*c/kmc_R_rxn00410_M_cpd00009_c)^hco_R_rxn00410*(M_cpd00008_c*c/kmc_R_rxn00410_M_cpd00008_c)^hco_R_rxn00410*(M_cpd00052_c*c/kmc_R_rxn00410_M_cpd00052_c)^hco_R_rxn00410)/((1 + M_cpd00002_c*c/kmc_R_rxn00410_M_cpd00002_c)^hco_R_rxn00410*(1 + M_cpd00013_c*c/kmc_R_rxn00410_M_cpd00013_c)^hco_R_rxn00410*(1 + M_cpd00062_c*c/kmc_R_rxn00410_M_cpd00062_c)^hco_R_rxn00410 + (1 + M_cpd00067_c*c/kmc_R_rxn00410_M_cpd00067_c)^(2*hco_R_rxn00410)*(1 + M_cpd00009_c*c/kmc_R_rxn00410_M_cpd00009_c)^hco_R_rxn00410*(1 + M_cpd00008_c*c/kmc_R_rxn00410_M_cpd00008_c)^hco_R_rxn00410*(1 + M_cpd00052_c*c/kmc_R_rxn00410_M_cpd00052_c)^hco_R_rxn00410 - 1);  // modifiers: M_cpd00009_c, M_cpd00062_c, M_cpd00008_c, M_cpd00067_c, M_cpd00002_c, M_cpd00052_c
  R_rxn01362_M_cpd00012_c_fill: => M_cpd00012_c; R_rxn01362_M_cpd00012_c_fill_FILL_RATE;
    R_rxn01362_M_cpd00012_c_fill_FILL_RATE = 1 mmol_per_gDW_per_hr;
  R_rxn01362_M_cpd00012_c_drain: M_cpd00012_c => ; (vmaf_R_rxn01362/(kic_R_rxn01362_M_cpd00012_c*kmc_R_rxn01362_M_cpd00810_c)*M_cpd00012_c*c*M_cpd00810_c*c - vmar_R_rxn01362/(kic_R_rxn01362_M_cpd00103_c*kmc_R_rxn01362_M_cpd00247_c)*M_cpd00247_c*c*M_cpd00103_c*c)/(1 + M_cpd00012_c*c*M_cpd00810_c*c/(kic_R_rxn01362_M_cpd00012_c*kmc_R_rxn01362_M_cpd00810_c) + M_cpd00012_c*c/kic_R_rxn01362_M_cpd00012_c + M_cpd00247_c*c*M_cpd00103_c*c/(kic_R_rxn01362_M_cpd00103_c*kmc_R_rxn01362_M_cpd00247_c) + M_cpd00810_c*c/kic_R_rxn01362_M_cpd00810_c + M_cpd00103_c*c/kic_R_rxn01362_M_cpd00103_c + M_cpd00247_c*c/kic_R_rxn01362_M_cpd00247_c);  // modifiers: M_cpd00810_c, M_cpd00103_c, M_cpd00247_c
  R_rxn00410_M_cpd00052_c_drain: M_cpd00052_c => ; (vmaf_R_rxn00410*(M_cpd00002_c*c/kmc_R_rxn00410_M_cpd00002_c)^hco_R_rxn00410*(M_cpd00013_c*c/kmc_R_rxn00410_M_cpd00013_c)^hco_R_rxn00410*(M_cpd00062_c*c/kmc_R_rxn00410_M_cpd00062_c)^hco_R_rxn00410 - vmar_R_rxn00410*(M_cpd00067_c*c/kmc_R_rxn00410_M_cpd00067_c)^(2*hco_R_rxn00410)*(M_cpd00009_c*c/kmc_R_rxn00410_M_cpd00009_c)^hco_R_rxn00410*(M_cpd00008_c*c/kmc_R_rxn00410_M_cpd00008_c)^hco_R_rxn00410*(M_cpd00052_c*c/kmc_R_rxn00410_M_cpd00052_c)^hco_R_rxn00410)/((1 + M_cpd00002_c*c/kmc_R_rxn00410_M_cpd00002_c)^hco_R_rxn00410*(1 + M_cpd00013_c*c/kmc_R_rxn00410_M_cpd00013_c)^hco_R_rxn00410*(1 + M_cpd00062_c*c/kmc_R_rxn00410_M_cpd00062_c)^hco_R_rxn00410 + (1 + M_cpd00067_c*c/kmc_R_rxn00410_M_cpd00067_c)^(2*hco_R_rxn00410)*(1 + M_cpd00009_c*c/kmc_R_rxn00410_M_cpd00009_c)^hco_R_rxn00410*(1 + M_cpd00008_c*c/kmc_R_rxn00410_M_cpd00008_c)^hco_R_rxn00410*(1 + M_cpd00052_c*c/kmc_R_rxn00410_M_cpd00052_c)^hco_R_rxn00410 - 1);  // modifiers: M_cpd00013_c, M_cpd00009_c, M_cpd00062_c, M_cpd00008_c, M_cpd00067_c, M_cpd00002_c
  R_rxn00409_M_cpd00052_c_drain: M_cpd00052_c => ; (vmaf_R_rxn00409/(kic_R_rxn00409_M_cpd00002_c*kmc_R_rxn00409_M_cpd00096_c)*M_cpd00002_c*c*M_cpd00096_c*c - vmar_R_rxn00409/(kic_R_rxn00409_M_cpd00052_c*kmc_R_rxn00409_M_cpd00008_c)*M_cpd00008_c*c*M_cpd00052_c*c)/(1 + M_cpd00002_c*c*M_cpd00096_c*c/(kic_R_rxn00409_M_cpd00002_c*kmc_R_rxn00409_M_cpd00096_c) + M_cpd00002_c*c/kic_R_rxn00409_M_cpd00002_c + M_cpd00008_c*c*M_cpd00052_c*c/(kic_R_rxn00409_M_cpd00052_c*kmc_R_rxn00409_M_cpd00008_c) + M_cpd00096_c*c/kic_R_rxn00409_M_cpd00096_c + M_cpd00052_c*c/kic_R_rxn00409_M_cpd00052_c + M_cpd00008_c*c/kic_R_rxn00409_M_cpd00008_c);  // modifiers: M_cpd00002_c, M_cpd00008_c, M_cpd00096_c
  R_rxn00119_M_cpd00014_c_drain: M_cpd00014_c => ; (vmaf_R_rxn00119/(kic_R_rxn00119_M_cpd00002_c*kmc_R_rxn00119_M_cpd00091_c)*M_cpd00002_c*c*M_cpd00091_c*c - vmar_R_rxn00119/(kic_R_rxn00119_M_cpd00014_c*kmc_R_rxn00119_M_cpd00008_c)*M_cpd00008_c*c*M_cpd00014_c*c)/(1 + M_cpd00002_c*c*M_cpd00091_c*c/(kic_R_rxn00119_M_cpd00002_c*kmc_R_rxn00119_M_cpd00091_c) + M_cpd00002_c*c/kic_R_rxn00119_M_cpd00002_c + M_cpd00008_c*c*M_cpd00014_c*c/(kic_R_rxn00119_M_cpd00014_c*kmc_R_rxn00119_M_cpd00008_c) + M_cpd00091_c*c/kic_R_rxn00119_M_cpd00091_c + M_cpd00014_c*c/kic_R_rxn00119_M_cpd00014_c + M_cpd00008_c*c/kic_R_rxn00119_M_cpd00008_c);  // modifiers: M_cpd00002_c, M_cpd00008_c, M_cpd00091_c
  R_rxn00117_M_cpd00014_c_drain: M_cpd00014_c => ; (vmaf_R_rxn00117/(kic_R_rxn00117_M_cpd00002_c*kmc_R_rxn00117_M_cpd00014_c)*M_cpd00002_c*c*M_cpd00014_c*c - vmar_R_rxn00117/(kic_R_rxn00117_M_cpd00062_c*kmc_R_rxn00117_M_cpd00008_c)*M_cpd00008_c*c*M_cpd00062_c*c)/(1 + M_cpd00002_c*c*M_cpd00014_c*c/(kic_R_rxn00117_M_cpd00002_c*kmc_R_rxn00117_M_cpd00014_c) + M_cpd00002_c*c/kic_R_rxn00117_M_cpd00002_c + M_cpd00008_c*c*M_cpd00062_c*c/(kic_R_rxn00117_M_cpd00062_c*kmc_R_rxn00117_M_cpd00008_c) + M_cpd00014_c*c/kic_R_rxn00117_M_cpd00014_c + M_cpd00062_c*c/kic_R_rxn00117_M_cpd00062_c + M_cpd00008_c*c/kic_R_rxn00117_M_cpd00008_c);  // modifiers: M_cpd00002_c, M_cpd00008_c, M_cpd00062_c
  R_rxn00364_M_cpd00046_c_fill: => M_cpd00046_c; R_rxn00364_M_cpd00046_c_fill_FILL_RATE;
    R_rxn00364_M_cpd00046_c_fill_FILL_RATE = 1 mmol_per_gDW_per_hr;
  R_rxn00364_M_cpd00046_c_drain: M_cpd00046_c => ; (vmaf_R_rxn00364/(kic_R_rxn00364_M_cpd00002_c*kmc_R_rxn00364_M_cpd00046_c)*M_cpd00002_c*c*M_cpd00046_c*c - vmar_R_rxn00364/(kic_R_rxn00364_M_cpd00096_c*kmc_R_rxn00364_M_cpd00008_c)*M_cpd00008_c*c*M_cpd00096_c*c)/(1 + M_cpd00002_c*c*M_cpd00046_c*c/(kic_R_rxn00364_M_cpd00002_c*kmc_R_rxn00364_M_cpd00046_c) + M_cpd00002_c*c/kic_R_rxn00364_M_cpd00002_c + M_cpd00008_c*c*M_cpd00096_c*c/(kic_R_rxn00364_M_cpd00096_c*kmc_R_rxn00364_M_cpd00008_c) + M_cpd00046_c*c/kic_R_rxn00364_M_cpd00046_c + M_cpd00096_c*c/kic_R_rxn00364_M_cpd00096_c + M_cpd00008_c*c/kic_R_rxn00364_M_cpd00008_c);  // modifiers: M_cpd00002_c, M_cpd00008_c, M_cpd00096_c
  R_rxn01362_M_cpd00103_c_fill: => M_cpd00103_c; R_rxn01362_M_cpd00103_c_fill_FILL_RATE;
    R_rxn01362_M_cpd00103_c_fill_FILL_RATE = 1 mmol_per_gDW_per_hr;
  R_rxn01362_M_cpd00103_c_drain: M_cpd00103_c => ; (vmaf_R_rxn01362/(kic_R_rxn01362_M_cpd00012_c*kmc_R_rxn01362_M_cpd00810_c)*M_cpd00012_c*c*M_cpd00810_c*c - vmar_R_rxn01362/(kic_R_rxn01362_M_cpd00103_c*kmc_R_rxn01362_M_cpd00247_c)*M_cpd00247_c*c*M_cpd00103_c*c)/(1 + M_cpd00012_c*c*M_cpd00810_c*c/(kic_R_rxn01362_M_cpd00012_c*kmc_R_rxn01362_M_cpd00810_c) + M_cpd00012_c*c/kic_R_rxn01362_M_cpd00012_c + M_cpd00247_c*c*M_cpd00103_c*c/(kic_R_rxn01362_M_cpd00103_c*kmc_R_rxn01362_M_cpd00247_c) + M_cpd00810_c*c/kic_R_rxn01362_M_cpd00810_c + M_cpd00103_c*c/kic_R_rxn01362_M_cpd00103_c + M_cpd00247_c*c/kic_R_rxn01362_M_cpd00247_c);  // modifiers: M_cpd00810_c, M_cpd00012_c, M_cpd00247_c
  R_rxn00119_M_cpd00091_c_fill: => M_cpd00091_c; R_rxn00119_M_cpd00091_c_fill_FILL_RATE;
    R_rxn00119_M_cpd00091_c_fill_FILL_RATE = 1 mmol_per_gDW_per_hr;
  R_rxn00119_M_cpd00091_c_drain: M_cpd00091_c => ; (vmaf_R_rxn00119/(kic_R_rxn00119_M_cpd00002_c*kmc_R_rxn00119_M_cpd00091_c)*M_cpd00002_c*c*M_cpd00091_c*c - vmar_R_rxn00119/(kic_R_rxn00119_M_cpd00014_c*kmc_R_rxn00119_M_cpd00008_c)*M_cpd00008_c*c*M_cpd00014_c*c)/(1 + M_cpd00002_c*c*M_cpd00091_c*c/(kic_R_rxn00119_M_cpd00002_c*kmc_R_rxn00119_M_cpd00091_c) + M_cpd00002_c*c/kic_R_rxn00119_M_cpd00002_c + M_cpd00008_c*c*M_cpd00014_c*c/(kic_R_rxn00119_M_cpd00014_c*kmc_R_rxn00119_M_cpd00008_c) + M_cpd00091_c*c/kic_R_rxn00119_M_cpd00091_c + M_cpd00014_c*c/kic_R_rxn00119_M_cpd00014_c + M_cpd00008_c*c/kic_R_rxn00119_M_cpd00008_c);  // modifiers: M_cpd00002_c, M_cpd00008_c, M_cpd00014_c
  R_rxn01673_M_cpd00356_c_fill: => M_cpd00356_c; R_rxn01673_M_cpd00356_c_fill_FILL_RATE;
    R_rxn01673_M_cpd00356_c_fill_FILL_RATE = 1 mmol_per_gDW_per_hr;
  R_rxn01673_M_cpd00356_c_drain: M_cpd00356_c => ; (vmaf_R_rxn01673/(kic_R_rxn01673_M_cpd00002_c*kmc_R_rxn01673_M_cpd00533_c)*M_cpd00002_c*c*M_cpd00533_c*c - vmar_R_rxn01673/(kic_R_rxn01673_M_cpd00356_c*kmc_R_rxn01673_M_cpd00008_c)*M_cpd00008_c*c*M_cpd00356_c*c)/(1 + M_cpd00002_c*c*M_cpd00533_c*c/(kic_R_rxn01673_M_cpd00002_c*kmc_R_rxn01673_M_cpd00533_c) + M_cpd00002_c*c/kic_R_rxn01673_M_cpd00002_c + M_cpd00008_c*c*M_cpd00356_c*c/(kic_R_rxn01673_M_cpd00356_c*kmc_R_rxn01673_M_cpd00008_c) + M_cpd00533_c*c/kic_R_rxn01673_M_cpd00533_c + M_cpd00356_c*c/kic_R_rxn01673_M_cpd00356_c + M_cpd00008_c*c/kic_R_rxn01673_M_cpd00008_c);  // modifiers: M_cpd00002_c, M_cpd00008_c, M_cpd00533_c
  R_rxn01512_M_cpd00357_c_fill: => M_cpd00357_c; R_rxn01512_M_cpd00357_c_fill_FILL_RATE;
    R_rxn01512_M_cpd00357_c_fill_FILL_RATE = 1 mmol_per_gDW_per_hr;
  R_rxn01512_M_cpd00357_c_drain: M_cpd00357_c => ; (vmaf_R_rxn01512/(kic_R_rxn01512_M_cpd00002_c*kmc_R_rxn01512_M_cpd00297_c)*M_cpd00002_c*c*M_cpd00297_c*c - vmar_R_rxn01512/(kic_R_rxn01512_M_cpd00357_c*kmc_R_rxn01512_M_cpd00008_c)*M_cpd00008_c*c*M_cpd00357_c*c)/(1 + M_cpd00002_c*c*M_cpd00297_c*c/(kic_R_rxn01512_M_cpd00002_c*kmc_R_rxn01512_M_cpd00297_c) + M_cpd00002_c*c/kic_R_rxn01512_M_cpd00002_c + M_cpd00008_c*c*M_cpd00357_c*c/(kic_R_rxn01512_M_cpd00357_c*kmc_R_rxn01512_M_cpd00008_c) + M_cpd00297_c*c/kic_R_rxn01512_M_cpd00297_c + M_cpd00357_c*c/kic_R_rxn01512_M_cpd00357_c + M_cpd00008_c*c/kic_R_rxn01512_M_cpd00008_c);  // modifiers: M_cpd00002_c, M_cpd00008_c, M_cpd00297_c
  R_fill_M_cpd00067_c: => M_cpd00067_c; R_fill_M_cpd00067_c_FILL_RATE;
    R_fill_M_cpd00067_c_FILL_RATE = 1 mmol_per_gDW_per_hr;
  R_fill_M_cpd00002_c: => M_cpd00002_c; R_fill_M_cpd00002_c_FILL_RATE;
    R_fill_M_cpd00002_c_FILL_RATE = 1 mmol_per_gDW_per_hr;
  R_fill_M_cpd00008_c: => M_cpd00008_c; R_fill_M_cpd00008_c_FILL_RATE;
    R_fill_M_cpd00008_c_FILL_RATE = 1 mmol_per_gDW_per_hr;
  R_fill_M_cpd00052_c: => M_cpd00052_c; R_fill_M_cpd00052_c_FILL_RATE;
    R_fill_M_cpd00052_c_FILL_RATE = 1 mmol_per_gDW_per_hr;
  R_fill_M_cpd00014_c: => M_cpd00014_c; R_fill_M_cpd00014_c_FILL_RATE;
    R_fill_M_cpd00014_c_FILL_RATE = 1 mmol_per_gDW_per_hr;

  // Unit definitions:
  unit mmol_per_gDW_per_hr = 1e-3 mole / (gram * 2.777778e-4 second);
  unit volume = litre;
  unit substance = mole;
  unit area = metre^2;
  unit mole_per_second = mole / second;
end
